# OpenSim document version 10600
# Copyright (c) 2013, Stanford University
# Permission is hereby granted, free of charge, to any person obtaining a copy of this software and associated documentation files (the "Software"), to deal in the Software without restriction, including without limitation the rights to use, copy, modify, merge, publish, distribute, sublicense, and/or sell copies of the Software, and to permit persons to whom the Software is furnished to do so, subject to the following conditions:
# The above copyright notice and this permission notice shall be included in all copies or substantial portions of the Software.
# THE SOFTWARE IS PROVIDED "AS IS", WITHOUT WARRANTY OF ANY KIND, EXPRESS OR IMPLIED, INCLUDING BUT NOT LIMITED TO THE WARRANTIES OF MERCHANTABILITY, FITNESS FOR A PARTICULAR PURPOSE AND NONINFRINGEMENT. IN NO EVENT SHALL THE AUTHORS OR COPYRIGHT HOLDERS BE LIABLE FOR ANY CLAIM, DAMAGES OR OTHER LIABILITY, WHETHER IN AN ACTION OF CONTRACT, TORT OR OTHERWISE, ARISING FROM, OUT OF OR IN CONNECTION WITH THE SOFTWARE OR THE USE OR OTHER DEALINGS IN THE
# SOFTWARE.
# Please cite: Hamner, S.R., Delp, S.L. (2013) Muscle contributions to fore-aft and vertical body mass center accelerations
# over a range of running speeds. Journal of Biomechanics, vol 46, pp 780-787.
ScaleTool subject02_scaled:
  mass: 76.47567 [kg]
  height: 0
  age: 0
  ModelScaler:
    apply: true
    scaling_order: measurements manualScale
    marker_file: ../ExportedData/Static_FJC.trc
    time_range: 0 1.98333
    preserve_mass_distribution: true
    output_scale_file: subject02_scaleSet_applied.xml
    MeasurementSet subject02:
      Measurement torso: apply=true
        MarkerPair: markers=(LACR LASI)
        MarkerPair: markers=(RACR RASI)
        MarkerPair: markers=(CLAV RASI)
        MarkerPair: markers=(CLAV LASI)
        MarkerPair: markers=(RASI C7)
        MarkerPair: markers=(LASI C7)
        BodyScale torso: axes=(X Y Z)
      Measurement pelvis_z: apply=true
        MarkerPair: markers=(RPSI LPSI)
        MarkerPair: markers=(RASI LASI)
        BodyScale pelvis: axes=(Y Z)
      Measurement thigh: apply=true
        MarkerPair: markers=(LHJC LLFC)
        MarkerPair: markers=(LHJC LMFC)
        MarkerPair: markers=(RHJC RMFC)
        MarkerPair: markers=(RHJC RLFC)
        BodyScale femur_r: axes=(X Y Z)
        BodyScale femur_l: axes=(X Y Z)
      Measurement shank: apply=true
        MarkerPair: markers=(LLFC LLMAL)
        MarkerPair: markers=(LMFC LMMAL)
        MarkerPair: markers=(RLFC RLMAL)
        MarkerPair: markers=(RMFC RMMAL)
        BodyScale tibia_r: axes=(X Y)
        BodyScale tibia_l: axes=(X Y)
      Measurement foot: apply=true
        MarkerPair: markers=(LCAL LMT5)
        MarkerPair: markers=(LCAL LTOE)
        MarkerPair: markers=(RCAL RTOE)
        MarkerPair: markers=(RCAL RMT5)
        BodyScale talus_r: axes=(X Y Z)
        BodyScale calcn_r: axes=(X Y Z)
        BodyScale toes_r: axes=(X Y Z)
        BodyScale talus_l: axes=(X Y Z)
        BodyScale calcn_l: axes=(X Y Z)
        BodyScale toes_l: axes=(X Y Z)
      Measurement humerus: apply=true
        MarkerPair: markers=(RPSH RLEL)
        MarkerPair: markers=(RASH RMEL)
        MarkerPair: markers=(LASH LMEL)
        MarkerPair: markers=(LPSH LLEL)
        MarkerPair: markers=(LACR LMEL)
        MarkerPair: markers=(LACR LLEL)
        MarkerPair: markers=(RACR RLEL)
        MarkerPair: markers=(RACR RMEL)
        BodyScale humerus_r: axes=(X Y Z)
        BodyScale humerus_l: axes=(X Y Z)
      Measurement radius_ulna: apply=true
        MarkerPair: markers=(LLEL LFAradius)
        MarkerPair: markers=(LMEL LFAulna)
        MarkerPair: markers=(RMEL RFAulna)
        MarkerPair: markers=(RLEL RFAradius)
        BodyScale ulna_r: axes=(X Y Z)
        BodyScale radius_r: axes=(X Y Z)
        BodyScale hand_r: axes=(X Y Z)
        BodyScale ulna_l: axes=(X Y Z)
        BodyScale radius_l: axes=(X Y Z)
        BodyScale hand_l: axes=(X Y Z)
      Measurement pelvis_Y: apply=false
        MarkerPair: markers=(LPSI LHJC)
        MarkerPair: markers=(RPSI RHJC)
        MarkerPair: markers=(RASI RHJC)
        MarkerPair: markers=(LASI LHJC)
      Measurement pelvis_X: apply=true
        MarkerPair: markers=(RASI RPSI)
        MarkerPair: markers=(LASI LPSI)
        BodyScale pelvis: axes=X
      Measurement shank_width: apply=true
        MarkerPair: markers=(LLMAL LMMAL)
        MarkerPair: markers=(RMMAL RLMAL)
        BodyScale tibia_r: axes=Z
        BodyScale tibia_l: axes=Z
    ScaleSet subject02_Scale:
      Scale: scales=(1.11031 1.11031 1.11031) segment=femur_r apply=false
      Scale: scales=(0.962095 0.962095 0.962095) segment=tibia_r apply=false
      Scale: scales=(1.1 1.1 1.1) segment=calcn_r apply=false
      Scale: scales=(1.1 1.1 1.1) segment=toes_r apply=false
      Scale: scales=(1.11031 1.11031 1.11031) segment=femur_l apply=false
      Scale: scales=(0.962095 0.962095 0.962095) segment=tibia_l apply=false
      Scale: scales=(1.1 1.1 1.1) segment=calcn_l apply=false
      Scale: scales=(1.1 1.1 1.1) segment=toes_l apply=false
      Scale: scales=(0.95 0.95 0.95) segment=humerus_r apply=false
      Scale: scales=(0.95 0.95 0.95) segment=humerus_l apply=false
  MarkerPlacer:
    apply: true
    marker_file: ../ExportedData/Static_FJC.trc
    time_range: 0 1.98333
    output_motion_file: subject02_static_output.mot
    output_model_file: subject02_adjusted_scaled.osim
    max_marker_movement: -1
    optimizer_algorithm: ipopt
    IKTaskSet subject02_Scale:
      IKMarkerTask RACR: apply=true weight=50
      IKMarkerTask LACR: apply=true weight=50
      IKMarkerTask C7: apply=true weight=100
      IKMarkerTask CLAV: apply=true weight=100
      IKMarkerTask RASH: apply=true weight=10
      IKMarkerTask RPSH: apply=true weight=10
      IKMarkerTask LASH: apply=true weight=10
      IKMarkerTask LPSH: apply=true weight=10
      IKMarkerTask RSJC: apply=false weight=50
      IKMarkerTask RLEL: apply=true weight=50
      IKMarkerTask RMEL: apply=true weight=50
      IKMarkerTask RFAradius: apply=true weight=50
      IKMarkerTask RFAulna: apply=true weight=50
      IKMarkerTask LSJC: apply=false weight=50
      IKMarkerTask LLEL: apply=true weight=50
      IKMarkerTask LMEL: apply=true weight=50
      IKMarkerTask LFAradius: apply=true weight=50
      IKMarkerTask LFAulna: apply=true weight=50
      IKMarkerTask RASI: apply=true weight=100
      IKMarkerTask LASI: apply=true weight=100
      IKMarkerTask RPSI: apply=true weight=100
      IKMarkerTask LPSI: apply=true weight=100
      IKMarkerTask LHJC: apply=true weight=1000
      IKMarkerTask RHJC: apply=true weight=1000
      IKMarkerTask RLFC: apply=true weight=100
      IKMarkerTask RMFC: apply=true weight=100
      IKMarkerTask RKJC: apply=false weight=100
      IKMarkerTask RLMAL: apply=true weight=100
      IKMarkerTask RMMAL: apply=true weight=100
      IKMarkerTask RAJC: apply=false weight=100
      IKMarkerTask RCAL: apply=true weight=25
      IKMarkerTask RTOE: apply=true weight=25
      IKMarkerTask RMT5: apply=true weight=25
      IKMarkerTask LLFC: apply=true weight=100
      IKMarkerTask LMFC: apply=true weight=100
      IKMarkerTask LKJC: apply=false weight=100
      IKMarkerTask LLMAL: apply=true weight=100
      IKMarkerTask LMMAL: apply=true weight=100
      IKMarkerTask LAJC: apply=false weight=100
      IKMarkerTask LCAL: apply=true weight=25
      IKMarkerTask LTOE: apply=true weight=25
      IKMarkerTask LMT5: apply=true weight=25
      IKCoordinateTask pelvis_tilt: apply=false weight=1 value_type=default_value value=0
      IKCoordinateTask pelvis_list: apply=true weight=1 value_type=default_value value=0
      IKCoordinateTask hip_flexion_r: apply=true weight=10 value_type=default_value value=0
      IKCoordinateTask hip_rotation_r: apply=true weight=1 value_type=manual_value value=0
      IKCoordinateTask knee_angle_r: apply=true weight=10 value_type=manual_value value=0
      IKCoordinateTask ankle_angle_r: apply=true weight=1 value_type=manual_value value=0
      IKCoordinateTask hip_flexion_l: apply=true weight=10 value_type=default_value value=0
      IKCoordinateTask hip_rotation_l: apply=true weight=1 value_type=default_value value=-0.08726646
      IKCoordinateTask knee_angle_l: apply=true weight=10 value_type=manual_value value=0
      IKCoordinateTask ankle_angle_l: apply=true weight=1 value_type=manual_value value=0
      IKCoordinateTask lumbar_bending: apply=true weight=0 value_type=default_value value=0
      IKCoordinateTask lumbar_rotation: apply=true weight=0 value_type=default_value value=0
      IKCoordinateTask arm_flex_r: apply=false weight=1 value_type=default_value value=0
      IKCoordinateTask arm_rot_r: apply=false weight=1 value_type=default_value value=0
      IKCoordinateTask elbow_flex_r: apply=false weight=1 value_type=default_value value=0.08726646
      IKCoordinateTask pro_sup_r: apply=false weight=1 value_type=manual_value value=1.570796
      IKCoordinateTask arm_flex_l: apply=false weight=1 value_type=default_value value=0
      IKCoordinateTask arm_rot_l: apply=false weight=1 value_type=default_value value=0
      IKCoordinateTask elbow_flex_l: apply=false weight=1 value_type=default_value value=0.08726646
      IKCoordinateTask pro_sup_l: apply=false weight=1 value_type=manual_value value=1.570796
