# OpenSim document version 40000
ForceSet subject10_run5_RRA_Actuators:
  PointActuator FX: min_control=-10000 max_control=10000 body=pelvis point=(-0.06857697 0 0) point_is_global=true
      direction=(1 0 0) optimal_force=1
  PointActuator FY: min_control=-10000 max_control=10000 body=pelvis point=(-0.06857697 0 0) point_is_global=true
      direction=(0 1 0) optimal_force=1
  PointActuator FZ: min_control=-10000 max_control=10000 body=pelvis point=(-0.06857697 0 0) point_is_global=true
      direction=(0 0 1) optimal_force=1
  TorqueActuator MZ: min_control=-10000 max_control=10000 bodyA=pelvis bodyB=ground torque_is_global=true axis=(0 0 1)
      optimal_force=1
  TorqueActuator MX: min_control=-10000 max_control=10000 bodyA=pelvis bodyB=ground torque_is_global=true axis=(1 0 0)
      optimal_force=1
  TorqueActuator MY: min_control=-10000 max_control=10000 bodyA=pelvis bodyB=ground torque_is_global=true axis=(0 1 0)
      optimal_force=1
  CoordinateActuator hip_flexion_r: min_control=-1 max_control=1 coordinate=hip_flexion_r optimal_force=1000
  CoordinateActuator hip_adduction_r: min_control=-1 max_control=1 coordinate=hip_adduction_r optimal_force=1000
  CoordinateActuator hip_rotation_r: min_control=-1 max_control=1 coordinate=hip_rotation_r optimal_force=1000
  CoordinateActuator knee_angle_r: min_control=-1 max_control=1 coordinate=knee_angle_r optimal_force=1000
  CoordinateActuator ankle_angle_r: min_control=-1 max_control=1 coordinate=ankle_angle_r optimal_force=1000
  CoordinateActuator hip_flexion_l: min_control=-1 max_control=1 coordinate=hip_flexion_l optimal_force=1000
  CoordinateActuator hip_adduction_l: min_control=-1 max_control=1 coordinate=hip_adduction_l optimal_force=1000
  CoordinateActuator hip_rotation_l: min_control=-1 max_control=1 coordinate=hip_rotation_l optimal_force=1000
  CoordinateActuator knee_angle_l: min_control=-1 max_control=1 coordinate=knee_angle_l optimal_force=1000
  CoordinateActuator ankle_angle_l: min_control=-1 max_control=1 coordinate=ankle_angle_l optimal_force=1000
  CoordinateActuator lumbar_extension: min_control=-1 max_control=1 coordinate=lumbar_extension optimal_force=1000
  CoordinateActuator lumbar_bending: min_control=-1 max_control=1 coordinate=lumbar_bending optimal_force=1000
  CoordinateActuator lumbar_rotation: min_control=-1 max_control=1 coordinate=lumbar_rotation optimal_force=1000
  CoordinateActuator arm_flex_r: min_control=-1 max_control=1 coordinate=arm_flex_r optimal_force=500
  CoordinateActuator arm_add_r: min_control=-1 max_control=1 coordinate=arm_add_r optimal_force=500
  CoordinateActuator arm_rot_r: min_control=-1 max_control=1 coordinate=arm_rot_r optimal_force=500
  CoordinateActuator elbow_flex_r: min_control=-1 max_control=1 coordinate=elbow_flex_r optimal_force=500
  CoordinateActuator pro_sup_r: min_control=-1 max_control=1 coordinate=pro_sup_r optimal_force=500
  CoordinateActuator arm_flex_l: min_control=-1 max_control=1 coordinate=arm_flex_l optimal_force=500
  CoordinateActuator arm_add_l: min_control=-1 max_control=1 coordinate=arm_add_l optimal_force=500
  CoordinateActuator arm_rot_l: min_control=-1 max_control=1 coordinate=arm_rot_l optimal_force=500
  CoordinateActuator elbow_flex_l: min_control=-1 max_control=1 coordinate=elbow_flex_l optimal_force=500
  CoordinateActuator pro_sup_l: min_control=-1 max_control=1 coordinate=pro_sup_l optimal_force=500
