# OpenSim document version 40000
MocoStudy mocoResidualReduction:
  MocoProblem problem:
    MocoPhase phases:
      ModelProcessor model:
        model: Model subject19_scaled:
          gravity: 0 -9.80665 0
          length_units: meters
          force_units: N
          credits:
            Delp S.L., Loan J.P., Hoy M.G., Zajac F.E., Topp E.L., Rosen J.M., Thelen D.G., Anderson F.C., Seth A., Hamner S.R.
          publications:
            Notes: 3D, 23 DOF gait model created by D.G. Thelen, Univ. of Wisconsin-Madison, and Samuel Hamner, Ajay Seth, Frank C. Anderson, and Scott L. Delp, Stanford University. Lower extremity joint defintions based on Delp et al. (1990). Low back joint and anthropometry based on Anderson and Pandy (1999, 2001). Planar knee model of Yamaguchi and Zajac (1989). Seth removed the patella to avoid kinematic constraints; insertions of the quadrucepts are handled with moving points in the tibia frame. Hamner added arms adapted from Holzbaur et al., 2005. Hamner, S.R., Seth, A, Delp, S.L.: Muscle contributions to propulsion and support during running. Journal of Biomechanics, 2010. Delp, S.L., Loan, J.P., Hoy, M.G., Zajac, F.E., Topp E.L., Rosen, J.M.: An interactive graphics-based model of the lower extremity to study orthopaedic surgical procedures, IEEE Transactions on Biomedical Engineering, vol. 37, pp. 757-767, 1990. Yamaguchi G.T., Zajac F.E.: A planar model of the knee joint to characterize the knee extensor mechanism." J . Biomech. vol. 21. pp. 1-10. 1989. Anderson F.C., Pandy M.G.: A dynamic optimization solution for vertical jumping in three dimensions. Computer Methods in Biomechanics and Biomedical Engineering 2:201-231, 1999. Anderson F.C., Pandy M.G.: Dynamic optimization of human walking. Journal of Biomechanical Engineering 123:381-390, 2001. Holzbaur, KR, WM Murray and SL Delp, 2005. A model of the upper extremity for simulating musculoskeletal surgery and analyzing neuromuscular control. Ann Biomed Eng 33(6): 829-840.
          Ground
          BodySet:
            Body pelvis: mass=10.20567 [kg] mass_center=(-0.06892611 0 0)
                inertia=(0.08538176 0.08538176 0.04194783 0 0 0) meshes=(sacrum.vtp pelvis.vtp l_pelvis.vtp)
            Body femur_r: mass=8.060373 mass_center=(0 -0.1832912 0) inertia=(0.1348878 0.03535894 0.1422417 0 0 0)
                meshes=femur_r.vtp
            Body tibia_r: mass=3.212832 mass_center=(0 -0.2019275 0) inertia=(0.05109043 0.005169865 0.05180002 0 0 0)
                meshes=(tibia_r.vtp fibula_r.vtp)
            Body talus_r: mass=0.08665763 mass_center=(0 0 0) inertia=(0.0009727381 0.0009727381 0.0009727381 0 0 0)
                meshes=talus_rv.vtp
            Body calcn_r: mass=1.08322 mass_center=(0.1059484 0.03178453 0)
                inertia=(0.001361833 0.003793679 0.003988226 0 0 0) meshes=foot.vtp
            Body toes_r: mass=0.1877004 mass_center=(0.03665816 0.006356906 -0.01854098)
                inertia=(9.727381e-5 0.0001945476 0.0009727381 0 0 0) meshes=bofoot.vtp
            Body femur_l: mass=8.060373 mass_center=(0 -0.1832912 0) inertia=(0.1348878 0.03535894 0.1422417 0 0 0)
                meshes=femur_l.vtp
            Body tibia_l: mass=3.212832 mass_center=(0 -0.2019275 0) inertia=(0.05075935 0.004507694 0.05075935 0 0 0)
                meshes=(tibia_l.vtp fibula_l.vtp)
            Body talus_l: mass=0.08665763 mass_center=(0 0 0) inertia=(0.0009727381 0.0009727381 0.0009727381 0 0 0)
                meshes=talus_lv.vtp
            Body calcn_l: mass=1.08322 mass_center=(0.1059484 0.03178453 0)
                inertia=(0.001361833 0.003793679 0.003988226 0 0 0) meshes=l_foot.vtp
            Body toes_l: mass=0.1877004 mass_center=(0.03665816 0.006356906 0.01854098)
                inertia=(9.727381e-5 0.0001945476 0.0009727381 0 0 0) meshes=l_bofoot.vtp
            Body torso: mass=23.2473 mass_center=(-0.03013793 0.3214713 0) inertia=(1.289543 0.6607324 1.25185 0 0 0)
                meshes=(hat_spine.vtp hat_jaw.vtp hat_skull.vtp hat_ribs_scap.vtp)
            Body humerus_r: mass=1.761316 mass_center=(0 -0.1532042 0)
                inertia=(0.008979006 0.003097479 0.01007864 0 0 0) meshes=humerus_rv.vtp
            Body ulna_r: mass=0.5264451 mass_center=(0 -0.1309821 0)
                inertia=(0.003031526 0.0006325061 0.003288418 0 0 0) meshes=ulna_rv.vtp
            Body radius_r: mass=0.5264451 mass_center=(0 -0.1309821 0)
                inertia=(0.003031526 0.0006325061 0.003288418 0 0 0) meshes=radius_rv.vtp
            Body hand_r: mass=0.3964587 mass_center=(0 -0.07400311 0)
                inertia=(0.0009129377 0.0005598396 0.001371453 0 0 0)
                meshes=(pisiform_rvs.vtp lunate_rvs.vtp scaphoid_rvs.vtp triquetrum_rvs.vtp hamate_rvs.vtp capitate_rvs.vtp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)
            Body humerus_l: mass=1.761316 mass_center=(0 -0.1532042 0)
                inertia=(0.008979006 0.003097479 0.01007864 0 0 0) meshes=humerus_lv.vtp
            Body ulna_l: mass=0.5264451 mass_center=(0 -0.1309821 0)
                inertia=(0.003031526 0.0006325061 0.003288418 0 0 0) meshes=ulna_lv.vtp
            Body radius_l: mass=0.5264451 mass_center=(0 -0.1309821 0)
                inertia=(0.003031526 0.0006325061 0.003288418 0 0 0) meshes=radius_lv.vtp
            Body hand_l: mass=0.3964587 mass_center=(0 -0.07400311 0)
                inertia=(0.0009129377 0.0005598396 0.001371453 0 0 0)
                meshes=(pisiform_lvs.vtp lunate_lvs.vtp scaphoid_lvs.vtp triquetrum_lvs.vtp hamate_lvs.vtp capitate_lvs.vtp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)
          JointSet:
            CustomJoint ground_pelvis: socket_parent_frame=ground_offset socket_child_frame=pelvis_offset
              Coordinate pelvis_tilt: default_value=0 range=(-3.141593 3.141593) clamped=true
              Coordinate pelvis_list: default_value=0 range=(-3.141593 3.141593) clamped=true
              Coordinate pelvis_rotation: default_value=0 range=(-3.141593 3.141593) clamped=true
              Coordinate pelvis_tx: default_value=0 range=(-10 10) clamped=true
              Coordinate pelvis_ty: default_value=0 range=(-10 10) clamped=true
              Coordinate pelvis_tz: default_value=0 range=(-10 10) clamped=true
              PhysicalOffsetFrame ground_offset: socket_parent=/ground translation=(0 0 0) [meters]
              PhysicalOffsetFrame pelvis_offset: socket_parent=/bodyset/pelvis translation=(0 0 0)
              SpatialTransform:
                TransformAxis rotation1: coordinates=pelvis_tilt axis=(0 0 1) LinearFunction(coefficients=1 0)
                TransformAxis rotation2: coordinates=pelvis_list axis=(1 0 0) LinearFunction(coefficients=1 0)
                TransformAxis rotation3: coordinates=pelvis_rotation axis=(0 1 0) LinearFunction(coefficients=1 0)
                TransformAxis translation1: coordinates=pelvis_tx axis=(1 0 0) LinearFunction(coefficients=1 0)
                TransformAxis translation2: coordinates=pelvis_ty axis=(0 1 0) LinearFunction(coefficients=1 0)
                TransformAxis translation3: coordinates=pelvis_tz axis=(0 0 1) LinearFunction(coefficients=1 0)
            CustomJoint hip_r: socket_parent_frame=pelvis_offset socket_child_frame=femur_r_offset
              Coordinate hip_flexion_r: default_value=0 range=(-2.094395 2.094395) clamped=true
              Coordinate hip_adduction_r: default_value=0 range=(-2.094395 2.094395) clamped=true
              Coordinate hip_rotation_r: default_value=0 range=(-2.094395 2.094395) clamped=true
              PhysicalOffsetFrame pelvis_offset: socket_parent=/bodyset/pelvis
                  translation=(-0.06892611 -0.0566841 0.08376782)
              PhysicalOffsetFrame femur_r_offset: socket_parent=/bodyset/femur_r translation=(0 0 0)
              SpatialTransform: axes_held_at_zero=(translation1 translation2 translation3)
                TransformAxis rotation1: coordinates=hip_flexion_r axis=(0 0 1) LinearFunction(coefficients=1 0)
                TransformAxis rotation2: coordinates=hip_adduction_r axis=(1 0 0) LinearFunction(coefficients=1 0)
                TransformAxis rotation3: coordinates=hip_rotation_r axis=(0 1 0) LinearFunction(coefficients=1 0)
            CustomJoint knee_r: socket_parent_frame=femur_r_offset socket_child_frame=tibia_r_offset
              Coordinate knee_angle_r: default_value=0 range=(-2.792527 0.1745329) clamped=true
              PhysicalOffsetFrame femur_r_offset: socket_parent=/bodyset/femur_r translation=(0 0 0)
              PhysicalOffsetFrame tibia_r_offset: socket_parent=/bodyset/tibia_r translation=(0 0 0)
              SpatialTransform: axes_held_at_zero=(rotation2 rotation3 translation3)
                TransformAxis rotation1: coordinates=knee_angle_r axis=(0 0 1) LinearFunction(coefficients=1 0)
                TransformAxis translation1: coordinates=knee_angle_r axis=(1 0 0)
                  MultiplierFunction: scale=1.078183
                    SimmSpline: x=(-2.0944 -1.74533 -1.39626 -1.0472 -0.698132 -0.349066 -0.174533 0.197344 0.337395 0.490178 1.52146 2.0944)
                        y=(-0.0032 0.00179 0.00411 0.0041 0.00212 -0.001 -0.0031 -0.005227 -0.005435 -0.005574 -0.005435 -0.00525)
                TransformAxis translation2: coordinates=knee_angle_r axis=(0 1 0)
                  MultiplierFunction: scale=1.078183
                    SimmSpline: x=(-2.0944 -1.22173 -0.523599 -0.349066 -0.174533 0.159149 2.0944)
                        y=(-0.4226 -0.4082 -0.399 -0.3976 -0.3966 -0.395264 -0.396)
            CustomJoint ankle_r: socket_parent_frame=tibia_r_offset socket_child_frame=talus_r_offset
              Coordinate ankle_angle_r: default_value=0 range=(-1.570796 1.570796) clamped=true
              PhysicalOffsetFrame tibia_r_offset: socket_parent=/bodyset/tibia_r translation=(0 -0.4650713 0)
              PhysicalOffsetFrame talus_r_offset: socket_parent=/bodyset/talus_r translation=(0 0 0)
              SpatialTransform: axes_held_at_zero=(rotation2 rotation3 translation1 translation2 translation3)
                TransformAxis rotation1: coordinates=ankle_angle_r axis=(-0.1050135 -0.1740224 0.9791263)
                    LinearFunction(coefficients=1 0)
            CustomJoint subtalar_r: socket_parent_frame=talus_r_offset socket_child_frame=calcn_r_offset
              Coordinate subtalar_angle_r: default_value=0 range=(-1.570796 1.570796) clamped=true locked=true
              PhysicalOffsetFrame talus_r_offset: socket_parent=/bodyset/talus_r
                  translation=(-0.05167105 -0.04444537 0.008391116)
              PhysicalOffsetFrame calcn_r_offset: socket_parent=/bodyset/calcn_r translation=(0 0 0)
              SpatialTransform: axes_held_at_zero=(rotation2 rotation3 translation1 translation2 translation3)
                TransformAxis rotation1: coordinates=subtalar_angle_r axis=(0.7871796 0.6047475 -0.1209495)
                    LinearFunction(coefficients=1 0)
            CustomJoint mtp_r: socket_parent_frame=calcn_r_offset socket_child_frame=toes_r_offset
              Coordinate mtp_angle_r: default_value=0 range=(-1.570796 1.570796) clamped=true locked=true
              PhysicalOffsetFrame calcn_r_offset: socket_parent=/bodyset/calcn_r
                  translation=(0.1894358 -0.002118969 0.001144243)
              PhysicalOffsetFrame toes_r_offset: socket_parent=/bodyset/toes_r translation=(0 0 0)
              SpatialTransform: axes_held_at_zero=(rotation2 rotation3 translation1 translation2 translation3)
                TransformAxis rotation1: coordinates=mtp_angle_r axis=(-0.5809544 0 0.8139361)
                    LinearFunction(coefficients=1 0)
            CustomJoint hip_l: socket_parent_frame=pelvis_offset socket_child_frame=femur_l_offset
              Coordinate hip_flexion_l: default_value=0 range=(-2.094395 2.094395) clamped=true
              Coordinate hip_adduction_l: default_value=0 range=(-2.094395 2.094395) clamped=true
              Coordinate hip_rotation_l: default_value=0 range=(-2.094395 2.094395) clamped=true
              PhysicalOffsetFrame pelvis_offset: socket_parent=/bodyset/pelvis
                  translation=(-0.06892611 -0.0566841 -0.08376782)
              PhysicalOffsetFrame femur_l_offset: socket_parent=/bodyset/femur_l translation=(0 0 0)
              SpatialTransform: axes_held_at_zero=(translation1 translation2 translation3)
                TransformAxis rotation1: coordinates=hip_flexion_l axis=(0 0 1) LinearFunction(coefficients=1 0)
                TransformAxis rotation2: coordinates=hip_adduction_l axis=(-1 0 0) LinearFunction(coefficients=1 0)
                TransformAxis rotation3: coordinates=hip_rotation_l axis=(0 -1 0) LinearFunction(coefficients=1 0)
            CustomJoint knee_l: socket_parent_frame=femur_l_offset socket_child_frame=tibia_l_offset
              Coordinate knee_angle_l: default_value=0 range=(-2.792527 0.1745329) clamped=true
              PhysicalOffsetFrame femur_l_offset: socket_parent=/bodyset/femur_l translation=(0 0 0)
              PhysicalOffsetFrame tibia_l_offset: socket_parent=/bodyset/tibia_l translation=(0 0 0)
              SpatialTransform: axes_held_at_zero=(rotation2 rotation3 translation3)
                TransformAxis rotation1: coordinates=knee_angle_l axis=(0 0 1) LinearFunction(coefficients=1 0)
                TransformAxis translation1: coordinates=knee_angle_l axis=(1 0 0)
                  MultiplierFunction: scale=1.078183
                    SimmSpline: x=(-2.0944 -1.74533 -1.39626 -1.0472 -0.698132 -0.349066 -0.174533 0.197344 0.337395 0.490178 1.52146 2.0944)
                        y=(-0.0032 0.00179 0.00411 0.0041 0.00212 -0.001 -0.0031 -0.005227 -0.005435 -0.005574 -0.005435 -0.00525)
                TransformAxis translation2: coordinates=knee_angle_l axis=(0 1 0)
                  MultiplierFunction: scale=1.078183
                    SimmSpline: x=(-2.0944 -1.22173 -0.523599 -0.349066 -0.174533 0.159149 2.0944)
                        y=(-0.4226 -0.4082 -0.399 -0.3976 -0.3966 -0.395264 -0.396)
            CustomJoint ankle_l: socket_parent_frame=tibia_l_offset socket_child_frame=talus_l_offset
              Coordinate ankle_angle_l: default_value=0 range=(-1.570796 1.570796) clamped=true
              PhysicalOffsetFrame tibia_l_offset: socket_parent=/bodyset/tibia_l translation=(0 -0.4650713 0)
              PhysicalOffsetFrame talus_l_offset: socket_parent=/bodyset/talus_l translation=(0 0 0)
              SpatialTransform: axes_held_at_zero=(rotation2 rotation3 translation1 translation2 translation3)
                TransformAxis rotation1: coordinates=ankle_angle_l axis=(0.1050135 0.1740224 0.9791263)
                    LinearFunction(coefficients=1 0)
            CustomJoint subtalar_l: socket_parent_frame=talus_l_offset socket_child_frame=calcn_l_offset
              Coordinate subtalar_angle_l: default_value=0 range=(-1.570796 1.570796) clamped=true locked=true
              PhysicalOffsetFrame talus_l_offset: socket_parent=/bodyset/talus_l
                  translation=(-0.05167105 -0.04444537 -0.008391116)
              PhysicalOffsetFrame calcn_l_offset: socket_parent=/bodyset/calcn_l translation=(0 0 0)
              SpatialTransform: axes_held_at_zero=(rotation2 rotation3 translation1 translation2 translation3)
                TransformAxis rotation1: coordinates=subtalar_angle_l axis=(-0.7871796 -0.6047475 -0.1209495)
                    LinearFunction(coefficients=1 0)
            CustomJoint mtp_l: socket_parent_frame=calcn_l_offset socket_child_frame=toes_l_offset
              Coordinate mtp_angle_l: default_value=0 range=(-1.047198 1.047198) clamped=false locked=true
              PhysicalOffsetFrame calcn_l_offset: socket_parent=/bodyset/calcn_l
                  translation=(0.1894358 -0.002118969 -0.001144243)
              PhysicalOffsetFrame toes_l_offset: socket_parent=/bodyset/toes_l translation=(0 0 0)
              SpatialTransform: axes_held_at_zero=(rotation2 rotation3 translation1 translation2 translation3)
                TransformAxis rotation1: coordinates=mtp_angle_l axis=(0.5809544 0 0.8139361)
                    LinearFunction(coefficients=1 0)
            CustomJoint back: socket_parent_frame=pelvis_offset socket_child_frame=torso_offset
              Coordinate lumbar_extension: default_value=0 range=(-1.570796 1.570796) clamped=true
              Coordinate lumbar_bending: default_value=0 range=(-1.570796 1.570796) clamped=true
              Coordinate lumbar_rotation: default_value=0 range=(-1.570796 1.570796) clamped=true
              PhysicalOffsetFrame pelvis_offset: socket_parent=/bodyset/pelvis translation=(-0.0981734 0.06989038 0)
              PhysicalOffsetFrame torso_offset: socket_parent=/bodyset/torso translation=(0 0 0)
              SpatialTransform: axes_held_at_zero=(translation1 translation2 translation3)
                TransformAxis rotation1: coordinates=lumbar_extension axis=(0 0 1) LinearFunction(coefficients=1 0)
                TransformAxis rotation2: coordinates=lumbar_bending axis=(1 0 0) LinearFunction(coefficients=1 0)
                TransformAxis rotation3: coordinates=lumbar_rotation axis=(0 1 0) LinearFunction(coefficients=1 0)
            CustomJoint acromial_r: socket_parent_frame=torso_offset socket_child_frame=humerus_r_offset
              Coordinate arm_flex_r: default_value=0 range=(-1.570796 1.570796) clamped=true
              Coordinate arm_add_r: default_value=0 range=(-2.094395 1.570796) clamped=true
              Coordinate arm_rot_r: default_value=0 range=(-1.570796 1.570796) clamped=true
              PhysicalOffsetFrame torso_offset: socket_parent=/bodyset/torso
                  translation=(0.003169506 0.373208 0.1707816)
              PhysicalOffsetFrame humerus_r_offset: socket_parent=/bodyset/humerus_r translation=(0 0 0)
              SpatialTransform: axes_held_at_zero=(translation1 translation2 translation3)
                TransformAxis rotation1: coordinates=arm_flex_r axis=(0 0 1) LinearFunction(coefficients=1 0)
                TransformAxis rotation2: coordinates=arm_add_r axis=(1 0 0) LinearFunction(coefficients=1 0)
                TransformAxis rotation3: coordinates=arm_rot_r axis=(0 1 0) LinearFunction(coefficients=1 0)
            CustomJoint elbow_r: socket_parent_frame=humerus_r_offset socket_child_frame=ulna_r_offset
              Coordinate elbow_flex_r: default_value=0 range=(0 2.618) clamped=true
              PhysicalOffsetFrame humerus_r_offset: socket_parent=/bodyset/humerus_r
                  translation=(0.01224128 -0.2666121 -0.008936026)
              PhysicalOffsetFrame ulna_r_offset: socket_parent=/bodyset/ulna_r translation=(0 0 0)
              SpatialTransform: axes_held_at_zero=(rotation2 rotation3 translation1 translation2 translation3)
                TransformAxis rotation1: coordinates=elbow_flex_r axis=(0.226047 0.022269 0.9738618)
                    LinearFunction(coefficients=1 0)
            CustomJoint radioulnar_r: socket_parent_frame=ulna_r_offset socket_child_frame=radius_r_offset
              Coordinate pro_sup_r: default_value=0 range=(0 3.141593) clamped=true
              PhysicalOffsetFrame ulna_r_offset: socket_parent=/bodyset/ulna_r
                  translation=(-0.007310653 -0.01413552 0.02834603)
              PhysicalOffsetFrame radius_r_offset: socket_parent=/bodyset/radius_r translation=(0 0 0)
              SpatialTransform: axes_held_at_zero=(rotation2 rotation3 translation1 translation2 translation3)
                TransformAxis rotation1: coordinates=pro_sup_r axis=(0.05639803 0.9984065 0.001952)
                    LinearFunction(coefficients=1 0)
            CustomJoint radius_hand_r: socket_parent_frame=radius_r_offset socket_child_frame=hand_r_offset
              Coordinate wrist_flex_r: default_value=0 range=(-1.22173 1.22173) clamped=true locked=true
              Coordinate wrist_dev_r: default_value=0 range=(-0.4363323 0.6108652) clamped=true locked=true
              PhysicalOffsetFrame radius_r_offset: socket_parent=/bodyset/radius_r
                  translation=(-0.009560251 -0.2563032 0.01479084)
              PhysicalOffsetFrame hand_r_offset: socket_parent=/bodyset/hand_r translation=(0 0 0)
              SpatialTransform: axes_held_at_zero=(rotation3 translation1 translation2 translation3)
                TransformAxis rotation1: coordinates=wrist_flex_r axis=(0 0 1) LinearFunction(coefficients=1 0)
                TransformAxis rotation2: coordinates=wrist_dev_r axis=(1 0 0) LinearFunction(coefficients=1 0)
            CustomJoint acromial_l: socket_parent_frame=torso_offset socket_child_frame=humerus_l_offset
              Coordinate arm_flex_l: default_value=0 range=(-1.570796 1.570796) clamped=true
              Coordinate arm_add_l: default_value=0 range=(-2.094395 1.570796) clamped=true
              Coordinate arm_rot_l: default_value=0 range=(-1.570796 1.570796) clamped=true
              PhysicalOffsetFrame torso_offset: socket_parent=/bodyset/torso
                  translation=(0.003169506 0.373208 -0.1707816)
              PhysicalOffsetFrame humerus_l_offset: socket_parent=/bodyset/humerus_l translation=(0 0 0)
              SpatialTransform: axes_held_at_zero=(translation1 translation2 translation3)
                TransformAxis rotation1: coordinates=arm_flex_l axis=(0 0 1) LinearFunction(coefficients=1 0)
                TransformAxis rotation2: coordinates=arm_add_l axis=(-1 0 0) LinearFunction(coefficients=1 0)
                TransformAxis rotation3: coordinates=arm_rot_l axis=(0 -1 0) LinearFunction(coefficients=1 0)
            CustomJoint elbow_l: socket_parent_frame=humerus_l_offset socket_child_frame=ulna_l_offset
              Coordinate elbow_flex_l: default_value=0 range=(0 2.618) clamped=true
              PhysicalOffsetFrame humerus_l_offset: socket_parent=/bodyset/humerus_l
                  translation=(0.01224128 -0.2666121 0.008936026)
              PhysicalOffsetFrame ulna_l_offset: socket_parent=/bodyset/ulna_l translation=(0 0 0)
              SpatialTransform: axes_held_at_zero=(rotation2 rotation3 translation1 translation2 translation3)
                TransformAxis rotation1: coordinates=elbow_flex_l axis=(-0.226047 -0.022269 0.9738618)
                    LinearFunction(coefficients=1 0)
            CustomJoint radioulnar_l: socket_parent_frame=ulna_l_offset socket_child_frame=radius_l_offset
              Coordinate pro_sup_l: default_value=0 range=(0 3.141593) clamped=true
              PhysicalOffsetFrame ulna_l_offset: socket_parent=/bodyset/ulna_l
                  translation=(-0.007310653 -0.01413552 -0.02834603)
              PhysicalOffsetFrame radius_l_offset: socket_parent=/bodyset/radius_l translation=(0 0 0)
              SpatialTransform: axes_held_at_zero=(rotation2 rotation3 translation1 translation2 translation3)
                TransformAxis rotation1: coordinates=pro_sup_l axis=(-0.05639803 -0.9984065 0.001952)
                    LinearFunction(coefficients=1 0)
            CustomJoint radius_hand_l: socket_parent_frame=radius_l_offset socket_child_frame=hand_l_offset
              Coordinate wrist_flex_l: default_value=0 range=(-1.22173 1.22173) clamped=true locked=true
              Coordinate wrist_dev_l: default_value=0 range=(-0.4363323 0.6108652) clamped=true locked=true
              PhysicalOffsetFrame radius_l_offset: socket_parent=/bodyset/radius_l
                  translation=(-0.009560251 -0.2563032 -0.01479084)
              PhysicalOffsetFrame hand_l_offset: socket_parent=/bodyset/hand_l translation=(0 0 0)
              SpatialTransform: axes_held_at_zero=(rotation3 translation1 translation2 translation3)
                TransformAxis rotation1: coordinates=wrist_flex_l axis=(0 0 1) LinearFunction(coefficients=1 0)
                TransformAxis rotation2: coordinates=wrist_dev_l axis=(-1 0 0) LinearFunction(coefficients=1 0)
          ForceSet:
            CoordinateActuator pelvis_tx_actuator: min_control=-10000 max_control=10000 coordinate=pelvis_tx
                optimal_force=1
            CoordinateActuator pelvis_ty_actuator: min_control=-10000 max_control=10000 coordinate=pelvis_ty
                optimal_force=1
            CoordinateActuator pelvis_tz_actuator: min_control=-10000 max_control=10000 coordinate=pelvis_tz
                optimal_force=1
            CoordinateActuator pelvis_tilt_actuator: min_control=-10000 max_control=10000 coordinate=pelvis_tilt
                optimal_force=1
            CoordinateActuator pelvis_list_actuator: min_control=-10000 max_control=10000 coordinate=pelvis_list
                optimal_force=1
            CoordinateActuator pelvis_rotation_actuator: min_control=-10000 max_control=10000
                coordinate=pelvis_rotation optimal_force=1
            CoordinateActuator hip_flexion_r_actuator: min_control=-1 max_control=1 coordinate=hip_flexion_r
                optimal_force=1000
            CoordinateActuator hip_adduction_r_actuator: min_control=-1 max_control=1 coordinate=hip_adduction_r
                optimal_force=1000
            CoordinateActuator hip_rotation_r_actuator: min_control=-1 max_control=1 coordinate=hip_rotation_r
                optimal_force=1000
            CoordinateActuator knee_angle_r_actuator: min_control=-1 max_control=1 coordinate=knee_angle_r
                optimal_force=1000
            CoordinateActuator ankle_angle_r_actuator: min_control=-1 max_control=1 coordinate=ankle_angle_r
                optimal_force=1000
            CoordinateActuator hip_flexion_l_actuator: min_control=-1 max_control=1 coordinate=hip_flexion_l
                optimal_force=1000
            CoordinateActuator hip_adduction_l_actuator: min_control=-1 max_control=1 coordinate=hip_adduction_l
                optimal_force=1000
            CoordinateActuator hip_rotation_l_actuator: min_control=-1 max_control=1 coordinate=hip_rotation_l
                optimal_force=1000
            CoordinateActuator knee_angle_l_actuator: min_control=-1 max_control=1 coordinate=knee_angle_l
                optimal_force=1000
            CoordinateActuator ankle_angle_l_actuator: min_control=-1 max_control=1 coordinate=ankle_angle_l
                optimal_force=1000
            CoordinateActuator lumbar_extension_actuator: min_control=-1 max_control=1 coordinate=lumbar_extension
                optimal_force=1000
            CoordinateActuator lumbar_bending_actuator: min_control=-1 max_control=1 coordinate=lumbar_bending
                optimal_force=1000
            CoordinateActuator lumbar_rotation_actuator: min_control=-1 max_control=1 coordinate=lumbar_rotation
                optimal_force=1000
            CoordinateActuator arm_flex_r_actuator: min_control=-1 max_control=1 coordinate=arm_flex_r
                optimal_force=500
            CoordinateActuator arm_add_r_actuator: min_control=-1 max_control=1 coordinate=arm_add_r optimal_force=500
            CoordinateActuator arm_rot_r_actuator: min_control=-1 max_control=1 coordinate=arm_rot_r optimal_force=500
            CoordinateActuator elbow_flex_r_actuator: min_control=-1 max_control=1 coordinate=elbow_flex_r
                optimal_force=500
            CoordinateActuator pro_sup_r_actuator: min_control=-1 max_control=1 coordinate=pro_sup_r optimal_force=500
            CoordinateActuator arm_flex_l_actuator: min_control=-1 max_control=1 coordinate=arm_flex_l
                optimal_force=500
            CoordinateActuator arm_add_l_actuator: min_control=-1 max_control=1 coordinate=arm_add_l optimal_force=500
            CoordinateActuator arm_rot_l_actuator: min_control=-1 max_control=1 coordinate=arm_rot_l optimal_force=500
            CoordinateActuator elbow_flex_l_actuator: min_control=-1 max_control=1 coordinate=elbow_flex_l
                optimal_force=500
            CoordinateActuator pro_sup_l_actuator: min_control=-1 max_control=1 coordinate=pro_sup_l optimal_force=500
            ObjectGroup R_hip_abd
            ObjectGroup R_hip_flex
            ObjectGroup R_hip_inrot
            ObjectGroup R_hip_exrot
            ObjectGroup R_hip_ext
            ObjectGroup R_hip_add
            ObjectGroup R_knee_bend
            ObjectGroup R_knee_ext
            ObjectGroup R_ankle_pf
            ObjectGroup R_inverter
            ObjectGroup R_ankle_df
            ObjectGroup R_everter
            ObjectGroup L_hip_abd
            ObjectGroup L_hip_flex
            ObjectGroup L_hip_inrot
            ObjectGroup L_hip_exrot
            ObjectGroup L_hip_ext
            ObjectGroup L_hip_add
            ObjectGroup L_knee_bend
            ObjectGroup L_knee_ext
            ObjectGroup L_ankle_pf
            ObjectGroup L_inverter
            ObjectGroup L_ankle_df
            ObjectGroup L_everter
            ObjectGroup back_ext
            ObjectGroup back_rlb
            ObjectGroup back_introt
            ObjectGroup back_llb
            ObjectGroup back_extrot
            ObjectGroup back_flex
          MarkerSet:
            Marker RACR: torso (-0.0134762 0.4157756 0.1510428)
            Marker LACR: torso (-0.0211924 0.4301773 -0.1640573)
            Marker C7: torso (-0.03446712 0.4344645 -0.009474087)
            Marker CLAV: torso (0.08709374 0.3706315 0.01474161)
            Marker RASH: torso (0.06011762 0.3862999 0.1391388)
            Marker RPSH: torso (-0.05805697 0.3768717 0.1462126)
            Marker LASH: torso (0.05279474 0.4022421 -0.1461549)
            Marker LPSH: torso (-0.06334004 0.3833127 -0.1606692)
            Marker RUA1: humerus_r (-0.004313713 -0.04212374 0.04028815)
            Marker RUA2: humerus_r (0.04627293 -0.1048461 0.0053551)
            Marker RUA3: humerus_r (-0.02580032 -0.1480054 0.01815653)
            Marker RLEL: humerus_r (0.01636746 -0.2575939 0.02947546)
            Marker RMEL: humerus_r (2.775796e-5 -0.2556179 -0.03229608)
            Marker RFAsuperior: ulna_r (0.04528175 -0.08269483 0.04585135)
            Marker RFAradius: radius_r (0.000565377 -0.2558774 0.04562143)
            Marker RFAulna: radius_r (-0.02824767 -0.2433649 -0.01513403)
            Marker LUA1: humerus_l (-0.01782194 -0.05383522 -0.05394514)
            Marker LUA2: humerus_l (-0.04410053 -0.1055923 -0.001391506)
            Marker LUA3: humerus_l (0.02852587 -0.1494156 -0.03948533)
            Marker LLEL: humerus_l (0.01373511 -0.2688355 -0.03214156)
            Marker LMEL: humerus_l (-0.005279093 -0.2620041 0.0288307)
            Marker LFAsuperior: ulna_l (0.02658684 -0.07171474 -0.05709462)
            Marker LFAradius: radius_l (-0.001709644 -0.256589 -0.04748201)
            Marker LFAulna: radius_l (-0.02680162 -0.2502853 0.01671577)
            Marker RASI: pelvis (0.006178656 0.00739323 0.1234261)
            Marker LASI: pelvis (0.01681974 0.0005258906 -0.1156754)
            Marker RPSI: pelvis (-0.158542 0.02726397 0.0392919)
            Marker LPSI: pelvis (-0.1550029 0.02567609 -0.05821025)
            Marker LHJC: femur_l (0.0210955 -0.004102874 0.00688459)
            Marker RHJC: femur_r (0.01502818 0.006936172 0.0005058849)
            Marker RTH1: femur_r (0.007660368 -0.09955781 0.09800789)
            Marker RTH2: femur_r (0.06039155 -0.2413842 0.07672297)
            Marker RTH3: femur_r (-0.01096168 -0.3306537 0.06563117)
            Marker RLFC: femur_r (0.008682372 -0.4341974 0.06833675)
            Marker RMFC: femur_r (-0.002053538 -0.438264 -0.05928297)
            Marker RTB1: tibia_r (0.03388741 -0.1411167 0.02041062)
            Marker RTB2: tibia_r (-0.02544727 -0.1905202 0.08213022)
            Marker RTB3: tibia_r (-0.001620554 -0.3176182 0.02349006)
            Marker RLMAL: tibia_r (-0.06541613 -0.4268193 0.05447181)
            Marker RMMAL: tibia_r (-0.04698788 -0.40942 -0.03298645)
            Marker RCAL: calcn_r (-0.07973429 0.05204138 -0.01029179)
            Marker RTOE: calcn_r (0.1328924 0.0480318 -0.021967)
            Marker RMT5: calcn_r (0.1168316 0.003797873 0.07639349)
            Marker LTH1: femur_l (0.02151173 -0.1135595 -0.09785352)
            Marker LTH2: femur_l (0.07443886 -0.2181478 -0.0704951)
            Marker LTH3: femur_l (-0.02297137 -0.329723 -0.0754893)
            Marker LLFC: femur_l (-0.01163938 -0.4314446 -0.07606759)
            Marker LMFC: femur_l (-0.02720676 -0.4445724 0.04405766)
            Marker LTB1: tibia_l (0.009783915 -0.1443679 -0.0333084)
            Marker LTB2: tibia_l (-0.04171141 -0.2315342 -0.08825238)
            Marker LTB3: tibia_l (-0.02906419 -0.3340724 -0.02624742)
            Marker LLMAL: tibia_l (-0.08902027 -0.4257856 -0.06554718)
            Marker LMMAL: tibia_l (-0.06732103 -0.4126581 0.02128897)
            Marker LCAL: calcn_l (-0.1026373 0.05829127 -0.007441199)
            Marker LTOE: calcn_l (0.1056077 0.04636066 0.01761692)
            Marker LMT5: calcn_l (0.0932382 0.007839728 -0.08503227)
          ComponentSet:
            ExternalLoads: datafile=Run_5_grf.mot
              ExternalForce: applied_to_body=calcn_l force_expressed_in_body=ground point_expressed_in_body=ground
                  force_identifier=L_ground_force_v point_identifier=L_ground_force_p
                  torque_identifier=L_ground_torque_ data_source_name=(Run_500 01_newCOP3_v24.mot)
              ExternalForce externalforce_0: applied_to_body=calcn_r force_expressed_in_body=ground
                  point_expressed_in_body=ground force_identifier=R_ground_force_v point_identifier=R_ground_force_p
                  torque_identifier=R_ground_torque_ data_source_name=(Run_500 01_newCOP3_v24.mot)
      MocoInitialBounds time_initial_bounds: bounds=0.18854
      MocoFinalBounds time_final_bounds: bounds=0.84375
      state_infos:
        MocoVariableInfo /jointset/ground_pelvis/pelvis_tilt/value: bounds=(-0.4535991 0.1280654)
        MocoVariableInfo /jointset/ground_pelvis/pelvis_list/value: bounds=(-0.3505972 0.3012915)
        MocoVariableInfo /jointset/ground_pelvis/pelvis_rotation/value: bounds=(-0.3230583 0.2964842)
        MocoVariableInfo /jointset/ground_pelvis/pelvis_tx/value: bounds=(0.8662036 1.421743)
        MocoVariableInfo /jointset/ground_pelvis/pelvis_ty/value: bounds=(0.8253553 1.140819)
        MocoVariableInfo /jointset/ground_pelvis/pelvis_tz/value: bounds=(-0.5299493 -0.08333282)
        MocoVariableInfo /jointset/hip_r/hip_flexion_r/value: bounds=(-0.4363866 1.217286)
        MocoVariableInfo /jointset/hip_r/hip_adduction_r/value: bounds=(-0.2121966 0.4061569)
        MocoVariableInfo /jointset/hip_r/hip_rotation_r/value: bounds=(-0.2315645 0.320045)
        MocoVariableInfo /jointset/knee_r/knee_angle_r/value: bounds=(-2.669153 0.1268695)
        MocoVariableInfo /jointset/ankle_r/ankle_angle_r/value: bounds=(-0.7292953 0.6002733)
        MocoVariableInfo /jointset/hip_l/hip_flexion_l/value: bounds=(-0.4972938 1.337123)
        MocoVariableInfo /jointset/hip_l/hip_adduction_l/value: bounds=(-0.285633 0.3623507)
        MocoVariableInfo /jointset/hip_l/hip_rotation_l/value: bounds=(-0.2561587 0.236687)
        MocoVariableInfo /jointset/knee_l/knee_angle_l/value: bounds=(-2.728635 0.1047807)
        MocoVariableInfo /jointset/ankle_l/ankle_angle_l/value: bounds=(-0.7997796 0.5360886)
        MocoVariableInfo /jointset/back/lumbar_extension/value: bounds=(-0.3847859 0.317526)
        MocoVariableInfo /jointset/back/lumbar_bending/value: bounds=(-0.3011274 0.3100135)
        MocoVariableInfo /jointset/back/lumbar_rotation/value: bounds=(-0.3627227 0.4508028)
        MocoVariableInfo /jointset/acromial_r/arm_flex_r/value: bounds=(-1.04182 -0.2652584)
        MocoVariableInfo /jointset/acromial_r/arm_add_r/value: bounds=(-0.3724887 -0.06524851)
        MocoVariableInfo /jointset/acromial_r/arm_rot_r/value: bounds=(-0.5557656 0.06059968)
        MocoVariableInfo /jointset/elbow_r/elbow_flex_r/value: bounds=(0.7038773 2.364645)
        MocoVariableInfo /jointset/radioulnar_r/pro_sup_r/value: bounds=(0.896356 1.713776)
        MocoVariableInfo /jointset/acromial_l/arm_flex_l/value: bounds=(-1.29235 0.006240583)
        MocoVariableInfo /jointset/acromial_l/arm_add_l/value: bounds=(-0.5762969 -0.1722762)
        MocoVariableInfo /jointset/acromial_l/arm_rot_l/value: bounds=(-0.4223061 0.2463279)
        MocoVariableInfo /jointset/elbow_l/elbow_flex_l/value: bounds=(1.058207 2.792533)
        MocoVariableInfo /jointset/radioulnar_l/pro_sup_l/value: bounds=(1.29586 1.941775)
      goals:
        MocoStateTrackingGoal state_tracking: weight=1 allow_unused_references=true scale_weights_with_range=false
          TableProcessor reference
          MocoWeightSet state_weights:
            MocoWeight /jointset/ground_pelvis/pelvis_tilt/value: weight=750
            MocoWeight /jointset/ground_pelvis/pelvis_tilt/speed: weight=7.5
            MocoWeight /jointset/ground_pelvis/pelvis_list/value: weight=250
            MocoWeight /jointset/ground_pelvis/pelvis_list/speed: weight=2.5
            MocoWeight /jointset/ground_pelvis/pelvis_rotation/value: weight=50
            MocoWeight /jointset/ground_pelvis/pelvis_rotation/speed: weight=0.5
            MocoWeight /jointset/ground_pelvis/pelvis_tx/value: weight=25
            MocoWeight /jointset/ground_pelvis/pelvis_tx/speed: weight=0.25
            MocoWeight /jointset/ground_pelvis/pelvis_ty/value: weight=100
            MocoWeight /jointset/ground_pelvis/pelvis_ty/speed: weight=1
            MocoWeight /jointset/ground_pelvis/pelvis_tz/value: weight=25
            MocoWeight /jointset/ground_pelvis/pelvis_tz/speed: weight=0.25
            MocoWeight /jointset/hip_r/hip_flexion_r/value: weight=75
            MocoWeight /jointset/hip_r/hip_flexion_r/speed: weight=0.75
            MocoWeight /jointset/hip_r/hip_adduction_r/value: weight=50
            MocoWeight /jointset/hip_r/hip_adduction_r/speed: weight=0.5
            MocoWeight /jointset/hip_r/hip_rotation_r/value: weight=10
            MocoWeight /jointset/hip_r/hip_rotation_r/speed: weight=0.1
            MocoWeight /jointset/knee_r/knee_angle_r/value: weight=10
            MocoWeight /jointset/knee_r/knee_angle_r/speed: weight=0.1
            MocoWeight /jointset/ankle_r/ankle_angle_r/value: weight=10
            MocoWeight /jointset/ankle_r/ankle_angle_r/speed: weight=0.1
            MocoWeight /jointset/subtalar_r/subtalar_angle_r/value: weight=0
            MocoWeight /jointset/subtalar_r/subtalar_angle_r/speed: weight=0
            MocoWeight /jointset/mtp_r/mtp_angle_r/value: weight=0
            MocoWeight /jointset/mtp_r/mtp_angle_r/speed: weight=0
            MocoWeight /jointset/hip_l/hip_flexion_l/value: weight=75
            MocoWeight /jointset/hip_l/hip_flexion_l/speed: weight=0.75
            MocoWeight /jointset/hip_l/hip_adduction_l/value: weight=50
            MocoWeight /jointset/hip_l/hip_adduction_l/speed: weight=0.5
            MocoWeight /jointset/hip_l/hip_rotation_l/value: weight=10
            MocoWeight /jointset/hip_l/hip_rotation_l/speed: weight=0.1
            MocoWeight /jointset/knee_l/knee_angle_l/value: weight=10
            MocoWeight /jointset/knee_l/knee_angle_l/speed: weight=0.1
            MocoWeight /jointset/ankle_l/ankle_angle_l/value: weight=10
            MocoWeight /jointset/ankle_l/ankle_angle_l/speed: weight=0.1
            MocoWeight /jointset/subtalar_l/subtalar_angle_l/value: weight=0
            MocoWeight /jointset/subtalar_l/subtalar_angle_l/speed: weight=0
            MocoWeight /jointset/mtp_l/mtp_angle_l/value: weight=0
            MocoWeight /jointset/mtp_l/mtp_angle_l/speed: weight=0
            MocoWeight /jointset/back/lumbar_extension/value: weight=75
            MocoWeight /jointset/back/lumbar_extension/speed: weight=0.75
            MocoWeight /jointset/back/lumbar_bending/value: weight=50
            MocoWeight /jointset/back/lumbar_bending/speed: weight=0.5
            MocoWeight /jointset/back/lumbar_rotation/value: weight=25
            MocoWeight /jointset/back/lumbar_rotation/speed: weight=0.25
            MocoWeight /jointset/acromial_r/arm_flex_r/value: weight=1
            MocoWeight /jointset/acromial_r/arm_flex_r/speed: weight=0.01
            MocoWeight /jointset/acromial_r/arm_add_r/value: weight=1
            MocoWeight /jointset/acromial_r/arm_add_r/speed: weight=0.01
            MocoWeight /jointset/acromial_r/arm_rot_r/value: weight=1
            MocoWeight /jointset/acromial_r/arm_rot_r/speed: weight=0.01
            MocoWeight /jointset/elbow_r/elbow_flex_r/value: weight=1
            MocoWeight /jointset/elbow_r/elbow_flex_r/speed: weight=0.01
            MocoWeight /jointset/radioulnar_r/pro_sup_r/value: weight=1
            MocoWeight /jointset/radioulnar_r/pro_sup_r/speed: weight=0.01
            MocoWeight /jointset/radius_hand_r/wrist_flex_r/value: weight=0
            MocoWeight /jointset/radius_hand_r/wrist_flex_r/speed: weight=0
            MocoWeight /jointset/radius_hand_r/wrist_dev_r/value: weight=0
            MocoWeight /jointset/radius_hand_r/wrist_dev_r/speed: weight=0
            MocoWeight /jointset/acromial_l/arm_flex_l/value: weight=1
            MocoWeight /jointset/acromial_l/arm_flex_l/speed: weight=0.01
            MocoWeight /jointset/acromial_l/arm_add_l/value: weight=1
            MocoWeight /jointset/acromial_l/arm_add_l/speed: weight=0.01
            MocoWeight /jointset/acromial_l/arm_rot_l/value: weight=1
            MocoWeight /jointset/acromial_l/arm_rot_l/speed: weight=0.01
            MocoWeight /jointset/elbow_l/elbow_flex_l/value: weight=1
            MocoWeight /jointset/elbow_l/elbow_flex_l/speed: weight=0.01
            MocoWeight /jointset/radioulnar_l/pro_sup_l/value: weight=1
            MocoWeight /jointset/radioulnar_l/pro_sup_l/speed: weight=0.01
            MocoWeight /jointset/radius_hand_l/wrist_flex_l/value: weight=0
            MocoWeight /jointset/radius_hand_l/wrist_flex_l/speed: weight=0
            MocoWeight /jointset/radius_hand_l/wrist_dev_l/value: weight=0
            MocoWeight /jointset/radius_hand_l/wrist_dev_l/speed: weight=0
        MocoControlGoal control_effort: weight=0.001
  MocoCasADiSolver solver:
    num_mesh_intervals: 66
    multibody_dynamics_mode: explicit
    optim_max_iterations: 1000
    optim_convergence_tolerance: 0.01
    optim_constraint_tolerance: 0.01
    optim_finite_difference_scheme: forward
