# OpenSim document version 40000
MocoStudy mocoOstrich:
  MocoProblem problem:
    MocoPhase phases:
      ModelProcessor model:
        model: Model Rankin2016_Ostrich:
          gravity: 0 -9.80665 0
          length_units: meters
          force_units: N
          credits:
            Jeffery W. Rankin, John R. Hutchinson (The Royal Veterinary College, University of London, UK) and Jonas Rubenson (Penn State University, USA). Adapted from the original model in published as part of the PeerJ reference provided in publications, below. See the publications section for the paper(s) you should cite when using this model. Do not remove either the credits of publications if you modify or add to this model.
          publications:
            Rankin, JW, Rubenson, J, and JR Hutchinson (in press). Inferring muscle functional roles of the ostrich pelvic limb during walking and running using computer optimization. Journal of the The Royal Society Interface. Hutchinson, JR, Rankin, JW, Rubenson, J, Rosenbluth, K, Siston, RA, and Delp, SL (2015). Musculoskeletal modelling of an ostrich (Struthio camelus) pelvic limb: Influence of limb orientation onmuscular capacity during locomotion. PeerJ. 3:e1001(12).
          Ground: meshes=
          BodySet:
            Body pelvis: mass=49.12423 [kg] mass_center=(0.0812 -0.167 0) inertia=(1.86807 0.831593 3.03712 0 0 0)
                meshes=pelvis7.vtp
              WrapCylinder R_ILFB_hip: active=false xyz_body_rotation=(0.298626 1.01002 -0.606676)
                  translation=(0.0309 -0.0609 0.0622) quadrant=-x radius=0.095 length=1
              WrapEllipsoid R_IFE_hip: translation=(-0.001 0.011 0.0302) quadrant=z dimensions=(0.09 0.06 0.06)
              WrapCylinder R_PIFM_L_hip: xyz_body_rotation=(0.156032 -0.0998328 -0.507193)
                  translation=(0.0129 0.1004 0.1) quadrant=all radius=0.19 length=0.5
              WrapEllipsoid R_FCL_hip: xyz_body_rotation=(-0.308051 0.143117 -1.46835)
                  translation=(-0.2258 -0.029 0.0532) quadrant=z dimensions=(0.075 0.5 0.05)
              WrapCylinder R_CFP_hip: xyz_body_rotation=(-0.148528 0.071733 0.622733)
                  translation=(-0.0211 0.0722 0.1396) quadrant=-x radius=0.09 length=0.5
              WrapEllipsoid R_IL_hip: xyz_body_rotation=(-0.487645 -0.0251327 -1.76156)
                  translation=(-0.002 -0.002 0.0649) quadrant=z dimensions=(0.1 0.2 0.05)
              WrapCylinder L_ILFB_hip: active=false xyz_body_rotation=(-0.298626 -1.01002 -0.606676)
                  translation=(0.0309 -0.0609 -0.0622) quadrant=-x radius=0.095 length=1
              WrapEllipsoid L_IFE_hip: translation=(-0.001 0.011 -0.0302) quadrant=-z dimensions=(0.09 0.06 0.06)
              WrapCylinder L_PIFM_L_hip: xyz_body_rotation=(-0.156032 0.0998328 -0.507193)
                  translation=(0.0129 0.1004 -0.1) quadrant=all radius=0.19 length=0.5
              WrapEllipsoid L_FCL_hip: xyz_body_rotation=(0.308051 -0.143117 -1.46835)
                  translation=(-0.2258 -0.029 -0.0532) quadrant=-z dimensions=(0.075 0.5 0.05)
              WrapCylinder L_CFP_hip: xyz_body_rotation=(0.148528 -0.071733 0.622733)
                  translation=(-0.0211 0.0722 -0.1396) quadrant=-x radius=0.09 length=0.5
              WrapEllipsoid L_IL_hip: xyz_body_rotation=(0.487645 0.0251327 -1.76156)
                  translation=(-0.002 -0.002 -0.0649) quadrant=-z dimensions=(0.1 0.2 0.05)
            Body R_femur: mass=7.833844 mass_center=(0.0624 -0.1312 0.032) inertia=(0.120521 0.072312 0.120521 0 0 0)
                meshes=R_femur6.vtp
              WrapCylinder R_ITC_ITM_hip: xyz_body_rotation=(-0.279253 0.342085 0) translation=(0.0086 -0.0017 -0.0067)
                  quadrant=x radius=0.02 length=0.5
              WrapCylinder R_ITCR_hip: xyz_body_rotation=(-0.279253 0.342085 0) translation=(0.0395 -0.0379 -0.0034)
                  quadrant=x radius=0.02 length=0.5
              WrapTorus R_ILFBp_ansa: xyz_body_rotation=(0.897623 -0.367915 -0.388161)
                  translation=(-0.0202 -0.1827 0.0609) quadrant=all inner_radius=0.01 outer_radius=0.08
              WrapCylinder R_ITCR_femur: xyz_body_rotation=(1.29154 0 -0.342085) translation=(0.0086 -0.0882 0.0181)
                  quadrant=all radius=0.055 length=0.5
              WrapCylinder R_deep_knee_flexors: xyz_body_rotation=(0.648564 0.706684 -0.355873)
                  translation=(-0.0197 -0.2006 0.0799) quadrant=all radius=0.015 length=0.2
            Body R_tibiotarsus: mass=5.30291 mass_center=(0.0232 -0.164 -0.0117)
                inertia=(0.132573 0.024104 0.132573 0 0 0) meshes=R_tibtar2.vtp
              WrapCylinder R_FMTIM_FMTL_knee: xyz_body_rotation=(0 0 0.78) translation=(-0.0014 0.0103 0.0093)
                  quadrant=x radius=0.038 length=0.5
              WrapCylinder R_Gastroc_ankle: translation=(-0.0058 -0.4435 -0.009) quadrant=-x radius=0.035 length=0.15
              WrapCylinder R_FPs_deep_ankle: xyz_body_rotation=(0.112923 -0.133343 0.705637)
                  translation=(0.0031 -0.4537 0.009) quadrant=-x radius=0.03 length=0.2
              WrapCylinder R_FDL_FHL_ankle: xyz_body_rotation=(0 0 0.698132) translation=(-0.0014 -0.4501 0.0001)
                  quadrant=-x radius=0.03 length=0.5
              WrapCylinder R_AMBd_knee: translation=(0.025 0.0126 -0.0012) quadrant=x radius=0.038 length=0.1
              WrapCylinder R_IC_knee: xyz_body_rotation=(0 0.872665 0) translation=(-0.0143 0.0098 -0.0054) quadrant=x
                  radius=0.03 length=0.5
              WrapCylinder R_EDL_TC_ankle: xyz_body_rotation=(0.0588176 -0.270002 0.00558505)
                  translation=(0.0111 -0.453 0.0009) quadrant=x radius=0.02 length=0.1
            Body R_tarsometatarsus: mass=1.037683 mass_center=(0.0156 -0.195 0.0034)
                inertia=(0.012052 1.2052e-7 0.012052 0 0 0) meshes=R_tmt2.vtp
              WrapCylinder R_toe_flexors_superficial: xyz_body_rotation=(0.0111701 -0.107687 -0.0263545)
                  translation=(-0.002 -0.4296 0.0002) quadrant=-x radius=0.023 length=0.1
              WrapCylinder R_toe_flexors_deep: xyz_body_rotation=(-0.0607375 -0.237539 -0.00506145)
                  translation=(0.0025 -0.4319 -0.0024) quadrant=-x radius=0.022 length=0.1
              WrapCylinder R_FPD4_toe: xyz_body_rotation=(0 -0.410865 0) translation=(0.0002 -0.4326 0.0025)
                  quadrant=-x radius=0.017 length=0.1
              WrapCylinder R_EDL_toes: xyz_body_rotation=(-0.0207694 -0.0469494 0.0118682)
                  translation=(0.0029 -0.4312 -0.0152) quadrant=x radius=0.023 length=0.1
            Body R_pes: mass=0.582115 mass_center=(0.0856 0.0182 0.00877) inertia=(1.20521e-8 0.048208 0.048208 0 0 0)
                meshes=(R_d3p1a.vtp R_d3p2a.vtp R_d3p3a.vtp R_d3p4a.vtp R_d4a.vtp)
            Body L_femur: mass=7.833844 mass_center=(0.0624 -0.1312 -0.032) inertia=(0.120521 0.072312 0.120521 0 0 0)
                meshes=L_femur6.vtp
            Body L_tibiotarsus: mass=5.30291 mass_center=(0.0232 -0.164 0.0117)
                inertia=(0.132573 0.024104 0.132573 0 0 0) meshes=L_tibtar2.vtp
            Body L_tarsometatarsus: mass=1.037683 mass_center=(0.0156 -0.195 -0.0034)
                inertia=(0.012052 1.2052e-7 0.012052 0 0 0) meshes=L_tmt2.vtp
            Body L_pes: mass=0.582115 mass_center=(0.0856 0.0182 -0.00877) inertia=(1.20521e-8 0.048208 0.048208 0 0 0)
                meshes=(L_d3p1a.vtp L_d3p2a.vtp L_d3p3a.vtp L_d3p4a.vtp L_d4a.vtp)
          JointSet:
            CustomJoint pelvis: socket_parent_frame=ground_offset socket_child_frame=pelvis_offset
              Coordinate pelvis_tilt: default_value=0 range=(-0.7853982 0.7853982) clamped=false
              Coordinate pelvis_list: default_value=0 range=(-1.745329 1.745329) clamped=false
              Coordinate pelvis_rotation: default_value=0 range=(-0.7853982 0.7853982) clamped=false
              Coordinate pelvis_tx: default_value=0 range=(-5 5) clamped=false
              Coordinate pelvis_ty: default_value=0 range=(-1 1) clamped=false
              Coordinate pelvis_tz: default_value=0 range=(-2 2) clamped=false
              PhysicalOffsetFrame ground_offset: socket_parent=/ground translation=(0 0 0) [meters]
              PhysicalOffsetFrame pelvis_offset: socket_parent=/bodyset/pelvis translation=(0 0 0)
              SpatialTransform:
                TransformAxis rotation1: coordinates=pelvis_tilt axis=(0 0 1) LinearFunction(coefficients=1 0)
                TransformAxis rotation2: coordinates=pelvis_list axis=(1 0 0) LinearFunction(coefficients=1 0)
                TransformAxis rotation3: coordinates=pelvis_rotation axis=(0 1 0) LinearFunction(coefficients=1 0)
                TransformAxis translation1: coordinates=pelvis_tx axis=(1 0 0) LinearFunction(coefficients=1 0)
                TransformAxis translation2: coordinates=pelvis_ty axis=(0 1 0) LinearFunction(coefficients=1 0)
                TransformAxis translation3: coordinates=pelvis_tz axis=(0 0 1) LinearFunction(coefficients=1 0)
            CustomJoint R_hip: socket_parent_frame=pelvis_offset socket_child_frame=R_femur_offset
              Coordinate R_hip_extension: default_value=0 range=(-1.134464 1.134464) clamped=false
              Coordinate R_hip_abduction: default_value=0 range=(-0.7853982 0.7853982) clamped=false
              Coordinate R_hip_rotation: default_value=0 range=(-0.7853982 0.7853982) clamped=false
              PhysicalOffsetFrame pelvis_offset: socket_parent=/bodyset/pelvis translation=(0 0 0.0355)
              PhysicalOffsetFrame R_femur_offset: socket_parent=/bodyset/R_femur translation=(0 0 0)
              SpatialTransform: axes_held_at_zero=(translation1 translation2 translation3)
                TransformAxis rotation1: coordinates=R_hip_extension axis=(0 0 1) LinearFunction(coefficients=1 0)
                TransformAxis rotation2: coordinates=R_hip_abduction axis=(1 0 0) LinearFunction(coefficients=1 0)
                TransformAxis rotation3: coordinates=R_hip_rotation axis=(0 1 0) LinearFunction(coefficients=1 0)
            CustomJoint knee: socket_parent_frame=R_femur_offset socket_child_frame=R_tibiotarsus_offset
              Coordinate R_knee_angle: default_value=0 range=(-3.141593 3.141593) clamped=false
              Coordinate R_knee_varus: default_value=0 range=(-0.7853982 0.7853982) clamped=false
              Coordinate R_knee_rotation: default_value=0 range=(-0.7853982 0.7853982) clamped=false
              PhysicalOffsetFrame R_femur_offset: socket_parent=/bodyset/R_femur translation=(0 -0.2338 0.0543)
              PhysicalOffsetFrame R_tibiotarsus_offset: socket_parent=/bodyset/R_tibiotarsus translation=(0 0 0)
              SpatialTransform: axes_held_at_zero=(translation1 translation2 translation3)
                TransformAxis rotation1: coordinates=R_knee_angle axis=(0 0 1) LinearFunction(coefficients=1 0)
                TransformAxis rotation2: coordinates=R_knee_varus axis=(1 0 0) LinearFunction(coefficients=1 0)
                TransformAxis rotation3: coordinates=R_knee_rotation axis=(0 1 0) LinearFunction(coefficients=1 0)
            CustomJoint R_ankle: socket_parent_frame=R_tibiotarsus_offset socket_child_frame=R_tarsometatarsus_offset
              Coordinate R_ankle_angle: default_value=0 range=(-0.1745329 3.141593) clamped=false
              Coordinate R_ankle_abduction: default_value=0.0872 range=(-0.7853982 0.7853982) clamped=false locked=true
                prescribed_function: SimmSpline: x=(-0.035 -0.03 -0.025 -0.02 -0.015 -0.01 -0.005 0 0.005 0.01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)
                    y=(-0.014754 -0.004851 0.005051 0.014954 0.024856 0.034759 0.044661 0.054564 0.064466 0.074699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)
              Coordinate R_ankle_rotation: default_value=-0.28 range=(-0.7853982 0.7853982) clamped=false locked=true
                prescribed_function: SimmSpline: x=(-0.035 -0.03 -0.025 -0.02 -0.015 -0.01 -0.005 0 0.005 0.01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)
                    y=(-0.344862 -0.349417 -0.353972 -0.358527 -0.363082 -0.367638 -0.372193 -0.376748 -0.381303 -0.385819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)
              PhysicalOffsetFrame R_tibiotarsus_offset: socket_parent=/bodyset/R_tibiotarsus translation=(0 -0.442 0)
              PhysicalOffsetFrame R_tarsometatarsus_offset: socket_parent=/bodyset/R_tarsometatarsus
                  translation=(0 0 0)
              SpatialTransform: axes_held_at_zero=(translation1 translation2 translation3)
                TransformAxis rotation1: coordinates=R_ankle_angle axis=(0 0 1) LinearFunction(coefficients=1 0)
                TransformAxis rotation2: coordinates=R_ankle_abduction axis=(1 0 0) LinearFunction(coefficients=1 0)
                TransformAxis rotation3: coordinates=R_ankle_rotation axis=(0 1 0) LinearFunction(coefficients=1 0)
            CustomJoint R_mtp: socket_parent_frame=R_tarsometatarsus_offset socket_child_frame=R_pes_offset
              Coordinate R_mtp_angle: default_value=0 range=(-3.141593 3.141593) clamped=false
              Coordinate R_mtp_abduction: default_value=0.4361 range=(-3.141593 3.141593) clamped=false locked=true
                prescribed_function: SimmSpline: x=(-0.035 -0.03 -0.025 -0.02 -0.015 -0.01 -0.005 0 0.005 0.01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)
                    y=(-0.272941 -0.277411 -0.28188 -0.286349 -0.290819 -0.295288 -0.299758 -0.304227 -0.308696 -0.312386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)
              Coordinate R_mtp_rotation: default_value=0.0523 range=(-3.141593 3.141593) clamped=false locked=true
                prescribed_function: SimmSpline: x=(-0.035 -0.03 -0.025 -0.02 -0.015 -0.01 -0.005 0 0.005 0.01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)
                    y=(-0.053432 -0.052564 -0.051696 -0.050827 -0.049959 -0.049091 -0.048223 -0.047355 -0.046487 -0.045529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)
              PhysicalOffsetFrame R_tarsometatarsus_offset: socket_parent=/bodyset/R_tarsometatarsus
                  translation=(0 -0.426 0)
              PhysicalOffsetFrame R_pes_offset: socket_parent=/bodyset/R_pes translation=(0 0 0)
              SpatialTransform: axes_held_at_zero=(translation1 translation2 translation3)
                TransformAxis rotation1: coordinates=R_mtp_angle axis=(0 0 1) LinearFunction(coefficients=1 0)
                TransformAxis rotation2: coordinates=R_mtp_abduction axis=(0 1 0) LinearFunction(coefficients=1 0)
                TransformAxis rotation3: coordinates=R_mtp_rotation axis=(1 0 0) LinearFunction(coefficients=1 0)
            CustomJoint L_hip: socket_parent_frame=pelvis_offset socket_child_frame=L_femur_offset
              Coordinate L_hip_extension: default_value=0 range=(-1.134464 1.134464) clamped=false
              Coordinate L_hip_abduction: default_value=0 range=(-0.7853982 0.7853982) clamped=false
              Coordinate L_hip_rotation: default_value=0 range=(-0.7853982 0.7853982) clamped=false
              PhysicalOffsetFrame pelvis_offset: socket_parent=/bodyset/pelvis translation=(0 0 -0.0355)
              PhysicalOffsetFrame L_femur_offset: socket_parent=/bodyset/L_femur translation=(0 0 0)
              SpatialTransform: axes_held_at_zero=(translation1 translation2 translation3)
                TransformAxis rotation1: coordinates=L_hip_extension axis=(0 0 1) LinearFunction(coefficients=1 0)
                TransformAxis rotation2: coordinates=L_hip_abduction axis=(-1 0 0) LinearFunction(coefficients=1 0)
                TransformAxis rotation3: coordinates=L_hip_rotation axis=(0 -1 0) LinearFunction(coefficients=1 0)
            CustomJoint knee_0: socket_parent_frame=L_femur_offset socket_child_frame=L_tibiotarsus_offset
              Coordinate L_knee_angle: default_value=0 range=(-3.141593 3.141593) clamped=false
              Coordinate L_knee_varus: default_value=0 range=(-0.7853982 0.7853982) clamped=false
              Coordinate L_knee_rotation: default_value=0 range=(-0.7853982 0.7853982) clamped=false
              PhysicalOffsetFrame L_femur_offset: socket_parent=/bodyset/L_femur translation=(0 -0.2338 -0.0543)
              PhysicalOffsetFrame L_tibiotarsus_offset: socket_parent=/bodyset/L_tibiotarsus translation=(0 0 0)
              SpatialTransform: axes_held_at_zero=(translation1 translation2 translation3)
                TransformAxis rotation1: coordinates=L_knee_angle axis=(0 0 1) LinearFunction(coefficients=1 0)
                TransformAxis rotation2: coordinates=L_knee_varus axis=(-1 0 0) LinearFunction(coefficients=1 0)
                TransformAxis rotation3: coordinates=L_knee_rotation axis=(0 -1 0) LinearFunction(coefficients=1 0)
            CustomJoint L_ankle: socket_parent_frame=L_tibiotarsus_offset socket_child_frame=L_tarsometatarsus_offset
              Coordinate L_ankle_angle: default_value=0 range=(-0.1745329 3.141593) clamped=false
              Coordinate L_ankle_abduction: default_value=0 range=(-0.7853982 0.7853982) clamped=false
              PhysicalOffsetFrame L_tibiotarsus_offset: socket_parent=/bodyset/L_tibiotarsus translation=(0 -0.442 0)
              PhysicalOffsetFrame L_tarsometatarsus_offset: socket_parent=/bodyset/L_tarsometatarsus
                  translation=(0 0 0)
              SpatialTransform: axes_held_at_zero=(translation1 translation2 translation3)
                TransformAxis rotation1: coordinates=L_ankle_angle axis=(0 0 1) LinearFunction(coefficients=1 0)
                TransformAxis rotation2: coordinates=L_ankle_abduction axis=(-1 0 0) LinearFunction(coefficients=1 0)
                TransformAxis rotation3: axis=(0 -1 0) Constant(value=-0.1033)
            CustomJoint L_mtp: socket_parent_frame=L_tarsometatarsus_offset socket_child_frame=L_pes_offset
              Coordinate L_mtp_angle: default_value=0 range=(-3.141593 3.141593) clamped=false
              PhysicalOffsetFrame L_tarsometatarsus_offset: socket_parent=/bodyset/L_tarsometatarsus
                  translation=(0 -0.426 0)
              PhysicalOffsetFrame L_pes_offset: socket_parent=/bodyset/L_pes translation=(0 0 0)
              SpatialTransform: axes_held_at_zero=(translation1 translation2 translation3)
                TransformAxis rotation1: coordinates=L_mtp_angle axis=(0 0 1) LinearFunction(coefficients=1 0)
                TransformAxis rotation2: axis=(-1 0 0) Constant(value=0.0523)
                TransformAxis rotation3: axis=(0 -1 0) Constant(value=0.4361)
          ForceSet:
            CoordinateActuator L_hip_ext: coordinate=L_hip_extension optimal_force=300
            CoordinateActuator L_hip_abd: coordinate=L_hip_abduction optimal_force=300
            CoordinateActuator L_hip_rot: coordinate=L_hip_rotation optimal_force=300
            CoordinateActuator L_knee_ext: coordinate=L_knee_angle optimal_force=300
            CoordinateActuator L_knee_var: coordinate=L_knee_varus optimal_force=300
            CoordinateActuator L_knee_rot: coordinate=L_knee_rotation optimal_force=300
            CoordinateActuator L_ankle_ext: coordinate=L_ankle_angle optimal_force=300
            CoordinateActuator L_ankle_abd: coordinate=L_ankle_abduction optimal_force=300
            CoordinateActuator L_mtp_ext: coordinate=L_mtp_angle optimal_force=300
            CoordinateActuator pelvis_tx_actuator: coordinate=pelvis_tx optimal_force=10
            CoordinateActuator pelvis_ty_actuator: coordinate=pelvis_ty optimal_force=10
            CoordinateActuator pelvis_tz_actuator: coordinate=pelvis_tz optimal_force=10
            CoordinateActuator pelvis_tilt_actuator: coordinate=pelvis_tilt optimal_force=25
            CoordinateActuator pelvis_list_actuator: coordinate=pelvis_list optimal_force=25
            CoordinateActuator pelvis_rotation_actuator: coordinate=pelvis_rotation optimal_force=25
            CoordinateActuator R_hip_extension_actuator: coordinate=R_hip_extension optimal_force=500
            CoordinateActuator R_hip_abduction_actuator: coordinate=R_hip_abduction optimal_force=500
            CoordinateActuator R_hip_rotation_actuator: coordinate=R_hip_rotation optimal_force=500
            CoordinateActuator R_knee_angle_actuator: coordinate=R_knee_angle optimal_force=500
            CoordinateActuator R_knee_varus_actuator: coordinate=R_knee_varus optimal_force=500
            CoordinateActuator R_knee_rotation_actuator: coordinate=R_knee_rotation optimal_force=500
            CoordinateActuator R_ankle_angle_actuator: coordinate=R_ankle_angle optimal_force=500
            CoordinateActuator R_mtp_angle_actuator: coordinate=R_mtp_angle optimal_force=500
            CoordinateActuator L_hip_extension_actuator: coordinate=L_hip_extension optimal_force=500
            CoordinateActuator L_hip_abduction_actuator: coordinate=L_hip_abduction optimal_force=500
            CoordinateActuator L_hip_rotation_actuator: coordinate=L_hip_rotation optimal_force=500
            CoordinateActuator L_knee_angle_actuator: coordinate=L_knee_angle optimal_force=500
            CoordinateActuator L_knee_varus_actuator: coordinate=L_knee_varus optimal_force=500
            CoordinateActuator L_knee_rotation_actuator: coordinate=L_knee_rotation optimal_force=500
            CoordinateActuator L_ankle_angle_actuator: coordinate=L_ankle_angle optimal_force=500
            CoordinateActuator L_ankle_abduction_actuator: coordinate=L_ankle_abduction optimal_force=500
            CoordinateActuator L_mtp_angle_actuator: coordinate=L_mtp_angle optimal_force=500
            ObjectGroup Right Side
          ComponentSet:
            ExternalLoads: datafile=Ostrich_Run_GRF_ground.mot
              ExternalForce: applied_to_body=L_pes force_expressed_in_body=ground point_expressed_in_body=ground
                  force_identifier=1_ground_force_v point_identifier=1_ground_force_p
                  torque_identifier=1_ground_torque_ data_source_name=Ostrich_Running_GRF_Data
              ExternalForce externalforce_0: applied_to_body=R_pes force_expressed_in_body=ground
                  point_expressed_in_body=ground force_identifier=ground_force_v point_identifier=ground_force_p
                  torque_identifier=ground_torque_ data_source_name=Ostrich_Running_GRF_Data
      MocoInitialBounds time_initial_bounds: bounds=0.137
      MocoFinalBounds time_final_bounds: bounds=0.573
      goals:
        MocoStateTrackingGoal state_tracking: weight=1 allow_unused_references=true scale_weights_with_range=false
          TableProcessor reference
          MocoWeightSet state_weights:
            MocoWeight /jointset/pelvis/pelvis_tilt/value: weight=750
            MocoWeight /jointset/pelvis/pelvis_tilt/speed: weight=7.5
            MocoWeight /jointset/pelvis/pelvis_list/value: weight=250
            MocoWeight /jointset/pelvis/pelvis_list/speed: weight=2.5
            MocoWeight /jointset/pelvis/pelvis_rotation/value: weight=50
            MocoWeight /jointset/pelvis/pelvis_rotation/speed: weight=0.5
            MocoWeight /jointset/pelvis/pelvis_tx/value: weight=25
            MocoWeight /jointset/pelvis/pelvis_tx/speed: weight=0.25
            MocoWeight /jointset/pelvis/pelvis_ty/value: weight=100
            MocoWeight /jointset/pelvis/pelvis_ty/speed: weight=1
            MocoWeight /jointset/pelvis/pelvis_tz/value: weight=25
            MocoWeight /jointset/pelvis/pelvis_tz/speed: weight=0.25
            MocoWeight /jointset/R_hip/R_hip_extension/value: weight=75
            MocoWeight /jointset/R_hip/R_hip_extension/speed: weight=0.75
            MocoWeight /jointset/R_hip/R_hip_abduction/value: weight=50
            MocoWeight /jointset/R_hip/R_hip_abduction/speed: weight=0.5
            MocoWeight /jointset/R_hip/R_hip_rotation/value: weight=10
            MocoWeight /jointset/R_hip/R_hip_rotation/speed: weight=0.1
            MocoWeight /jointset/knee/R_knee_angle/value: weight=10
            MocoWeight /jointset/knee/R_knee_angle/speed: weight=0.1
            MocoWeight /jointset/knee/R_knee_varus/value: weight=5
            MocoWeight /jointset/knee/R_knee_varus/speed: weight=0.05
            MocoWeight /jointset/knee/R_knee_rotation/value: weight=5
            MocoWeight /jointset/knee/R_knee_rotation/speed: weight=0.05
            MocoWeight /jointset/R_ankle/R_ankle_angle/value: weight=10
            MocoWeight /jointset/R_ankle/R_ankle_angle/speed: weight=0.1
            MocoWeight /jointset/R_ankle/R_ankle_abduction/value: weight=0
            MocoWeight /jointset/R_ankle/R_ankle_abduction/speed: weight=0
            MocoWeight /jointset/R_ankle/R_ankle_rotation/value: weight=0
            MocoWeight /jointset/R_ankle/R_ankle_rotation/speed: weight=0
            MocoWeight /jointset/R_mtp/R_mtp_angle/value: weight=5
            MocoWeight /jointset/R_mtp/R_mtp_angle/speed: weight=0.05
            MocoWeight /jointset/R_mtp/R_mtp_abduction/value: weight=0
            MocoWeight /jointset/R_mtp/R_mtp_abduction/speed: weight=0
            MocoWeight /jointset/R_mtp/R_mtp_rotation/value: weight=0
            MocoWeight /jointset/R_mtp/R_mtp_rotation/speed: weight=0
            MocoWeight /jointset/L_hip/L_hip_extension/value: weight=75
            MocoWeight /jointset/L_hip/L_hip_extension/speed: weight=0.75
            MocoWeight /jointset/L_hip/L_hip_abduction/value: weight=50
            MocoWeight /jointset/L_hip/L_hip_abduction/speed: weight=0.5
            MocoWeight /jointset/L_hip/L_hip_rotation/value: weight=10
            MocoWeight /jointset/L_hip/L_hip_rotation/speed: weight=0.1
            MocoWeight /jointset/knee_0/L_knee_angle/value: weight=10
            MocoWeight /jointset/knee_0/L_knee_angle/speed: weight=0.1
            MocoWeight /jointset/knee_0/L_knee_varus/value: weight=5
            MocoWeight /jointset/knee_0/L_knee_varus/speed: weight=0.05
            MocoWeight /jointset/knee_0/L_knee_rotation/value: weight=5
            MocoWeight /jointset/knee_0/L_knee_rotation/speed: weight=0.05
            MocoWeight /jointset/L_ankle/L_ankle_angle/value: weight=10
            MocoWeight /jointset/L_ankle/L_ankle_angle/speed: weight=0.1
            MocoWeight /jointset/L_ankle/L_ankle_abduction/value: weight=5
            MocoWeight /jointset/L_ankle/L_ankle_abduction/speed: weight=0.05
            MocoWeight /jointset/L_mtp/L_mtp_angle/value: weight=5
            MocoWeight /jointset/L_mtp/L_mtp_angle/speed: weight=0.05
        MocoControlGoal control_effort: weight=0.001
  MocoCasADiSolver solver:
    num_mesh_intervals: 44
    multibody_dynamics_mode: explicit
    optim_max_iterations: 1000
    optim_convergence_tolerance: 0.01
    optim_constraint_tolerance: 0.01
    optim_finite_difference_scheme: forward
