# OpenSim document version 40000
Model Rankin2016_Ostrich:
  gravity: 0 -9.80665 0
  length_units: meters
  force_units: N
  credits:
    Jeffery W. Rankin, John R. Hutchinson (The Royal Veterinary College, University of London, UK) and Jonas Rubenson (Penn State University, USA). Adapted from the original model in published as part of the PeerJ reference provided in publications, below. See the publications section for the paper(s) you should cite when using this model. Do not remove either the credits of publications if you modify or add to this model.
  publications:
    Rankin, JW, Rubenson, J, and JR Hutchinson (in press). Inferring muscle functional roles of the ostrich pelvic limb during walking and running using computer optimization. Journal of the The Royal Society Interface. Hutchinson, JR, Rankin, JW, Rubenson, J, Rosenbluth, K, Siston, RA, and Delp, SL (2015). Musculoskeletal modelling of an ostrich (Struthio camelus) pelvic limb: Influence of limb orientation onmuscular capacity during locomotion. PeerJ. 3:e1001(12).
  defaults: Millard2012EquilibriumMuscle default: min_control=0.02 optimal_force=1 max_isometric_force=10
      optimal_fiber_length=0.1 tendon_slack_length=0.1 pennation_angle_at_optimal=0 [radians]
      max_contraction_velocity=14 fiber_damping=0.01 default_activation=0.05 activation_time_constant=0.01 [seconds]
      deactivation_time_constant=0.015 [seconds] minimum_activation=0.02
    ActiveForceLengthCurve: min_norm_active_fiber_length=0.4441 transition_norm_fiber_length=0.73
        max_norm_active_fiber_length=1.8123 shallow_ascending_slope=0.8616 minimum_value=0
    ForceVelocityCurve: concentric_slope_at_vmax=0 concentric_slope_near_vmax=0.25 isometric_slope=5
        eccentric_slope_at_vmax=0 eccentric_slope_near_vmax=0.15 max_eccentric_velocity_force_multiplier=1.4
        concentric_curviness=0.6 eccentric_curviness=0.9
    FiberForceLengthCurve: strain_at_zero_force=0 strain_at_one_norm_force=0.5
    TendonForceLengthCurve: strain_at_one_norm_force=0.049
  Ground: meshes=
  BodySet:
    Body pelvis: mass=49.12423 [kg] mass_center=(0.0812 -0.167 0) inertia=(1.86807 0.831593 3.03712 0 0 0)
        meshes=pelvis7.vtp
      WrapCylinder R_ILFB_hip: active=false xyz_body_rotation=(0.298626 1.01002 -0.606676)
          translation=(0.0309 -0.0609 0.0622) quadrant=-x radius=0.095 length=1
      WrapEllipsoid R_IFE_hip: translation=(-0.001 0.011 0.0302) quadrant=z dimensions=(0.09 0.06 0.06)
      WrapCylinder R_PIFM_L_hip: xyz_body_rotation=(0.156032 -0.0998328 -0.507193) translation=(0.0129 0.1004 0.1)
          quadrant=all radius=0.19 length=0.5
      WrapEllipsoid R_FCL_hip: xyz_body_rotation=(-0.308051 0.143117 -1.46835) translation=(-0.2258 -0.029 0.0532)
          quadrant=z dimensions=(0.075 0.5 0.05)
      WrapCylinder R_CFP_hip: xyz_body_rotation=(-0.148528 0.071733 0.622733) translation=(-0.0211 0.0722 0.1396)
          quadrant=-x radius=0.09 length=0.5
      WrapEllipsoid R_IL_hip: xyz_body_rotation=(-0.487645 -0.0251327 -1.76156) translation=(-0.002 -0.002 0.0649)
          quadrant=z dimensions=(0.1 0.2 0.05)
      WrapCylinder L_ILFB_hip: active=false xyz_body_rotation=(-0.298626 -1.01002 -0.606676)
          translation=(0.0309 -0.0609 -0.0622) quadrant=-x radius=0.095 length=1
      WrapEllipsoid L_IFE_hip: translation=(-0.001 0.011 -0.0302) quadrant=-z dimensions=(0.09 0.06 0.06)
      WrapCylinder L_PIFM_L_hip: xyz_body_rotation=(-0.156032 0.0998328 -0.507193) translation=(0.0129 0.1004 -0.1)
          quadrant=all radius=0.19 length=0.5
      WrapEllipsoid L_FCL_hip: xyz_body_rotation=(0.308051 -0.143117 -1.46835) translation=(-0.2258 -0.029 -0.0532)
          quadrant=-z dimensions=(0.075 0.5 0.05)
      WrapCylinder L_CFP_hip: xyz_body_rotation=(0.148528 -0.071733 0.622733) translation=(-0.0211 0.0722 -0.1396)
          quadrant=-x radius=0.09 length=0.5
      WrapEllipsoid L_IL_hip: xyz_body_rotation=(0.487645 0.0251327 -1.76156) translation=(-0.002 -0.002 -0.0649)
          quadrant=-z dimensions=(0.1 0.2 0.05)
    Body R_femur: mass=7.833844 mass_center=(0.0624 -0.1312 0.032) inertia=(0.120521 0.072312 0.120521 0 0 0)
        meshes=R_femur6.vtp
      WrapCylinder R_ITC_ITM_hip: xyz_body_rotation=(-0.279253 0.342085 0) translation=(0.0086 -0.0017 -0.0067)
          quadrant=x radius=0.02 length=0.5
      WrapCylinder R_ITCR_hip: xyz_body_rotation=(-0.279253 0.342085 0) translation=(0.0395 -0.0379 -0.0034) quadrant=x
          radius=0.02 length=0.5
      WrapTorus R_ILFBp_ansa: xyz_body_rotation=(0.897623 -0.367915 -0.388161) translation=(-0.0202 -0.1827 0.0609)
          quadrant=all inner_radius=0.01 outer_radius=0.08
      WrapCylinder R_ITCR_femur: xyz_body_rotation=(1.29154 0 -0.342085) translation=(0.0086 -0.0882 0.0181)
          quadrant=all radius=0.055 length=0.5
      WrapCylinder R_deep_knee_flexors: xyz_body_rotation=(0.648564 0.706684 -0.355873)
          translation=(-0.0197 -0.2006 0.0799) quadrant=all radius=0.015 length=0.2
    Body R_tibiotarsus: mass=5.30291 mass_center=(0.0232 -0.164 -0.0117) inertia=(0.132573 0.024104 0.132573 0 0 0)
        meshes=R_tibtar2.vtp
      WrapCylinder R_FMTIM_FMTL_knee: xyz_body_rotation=(0 0 0.78) translation=(-0.0014 0.0103 0.0093) quadrant=x
          radius=0.038 length=0.5
      WrapCylinder R_Gastroc_ankle: translation=(-0.0058 -0.4435 -0.009) quadrant=-x radius=0.035 length=0.15
      WrapCylinder R_FPs_deep_ankle: xyz_body_rotation=(0.112923 -0.133343 0.705637) translation=(0.0031 -0.4537 0.009)
          quadrant=-x radius=0.03 length=0.2
      WrapCylinder R_FDL_FHL_ankle: xyz_body_rotation=(0 0 0.698132) translation=(-0.0014 -0.4501 0.0001) quadrant=-x
          radius=0.03 length=0.5
      WrapCylinder R_AMBd_knee: translation=(0.025 0.0126 -0.0012) quadrant=x radius=0.038 length=0.1
      WrapCylinder R_IC_knee: xyz_body_rotation=(0 0.872665 0) translation=(-0.0143 0.0098 -0.0054) quadrant=x
          radius=0.03 length=0.5
      WrapCylinder R_EDL_TC_ankle: xyz_body_rotation=(0.0588176 -0.270002 0.00558505)
          translation=(0.0111 -0.453 0.0009) quadrant=x radius=0.02 length=0.1
    Body R_tarsometatarsus: mass=1.037683 mass_center=(0.0156 -0.195 0.0034)
        inertia=(0.012052 1.2052e-7 0.012052 0 0 0) meshes=R_tmt2.vtp
      WrapCylinder R_toe_flexors_superficial: xyz_body_rotation=(0.0111701 -0.107687 -0.0263545)
          translation=(-0.002 -0.4296 0.0002) quadrant=-x radius=0.023 length=0.1
      WrapCylinder R_toe_flexors_deep: xyz_body_rotation=(-0.0607375 -0.237539 -0.00506145)
          translation=(0.0025 -0.4319 -0.0024) quadrant=-x radius=0.022 length=0.1
      WrapCylinder R_FPD4_toe: xyz_body_rotation=(0 -0.410865 0) translation=(0.0002 -0.4326 0.0025) quadrant=-x
          radius=0.017 length=0.1
      WrapCylinder R_EDL_toes: xyz_body_rotation=(-0.0207694 -0.0469494 0.0118682) translation=(0.0029 -0.4312 -0.0152)
          quadrant=x radius=0.023 length=0.1
    Body R_pes: mass=0.582115 mass_center=(0.0856 0.0182 0.00877) inertia=(1.20521e-8 0.048208 0.048208 0 0 0)
        meshes=(R_d3p1a.vtp R_d3p2a.vtp R_d3p3a.vtp R_d3p4a.vtp R_d4a.vtp)
    Body L_femur: mass=7.833844 mass_center=(0.0624 -0.1312 -0.032) inertia=(0.120521 0.072312 0.120521 0 0 0)
        meshes=L_femur6.vtp
    Body L_tibiotarsus: mass=5.30291 mass_center=(0.0232 -0.164 0.0117) inertia=(0.132573 0.024104 0.132573 0 0 0)
        meshes=L_tibtar2.vtp
    Body L_tarsometatarsus: mass=1.037683 mass_center=(0.0156 -0.195 -0.0034)
        inertia=(0.012052 1.2052e-7 0.012052 0 0 0) meshes=L_tmt2.vtp
    Body L_pes: mass=0.582115 mass_center=(0.0856 0.0182 -0.00877) inertia=(1.20521e-8 0.048208 0.048208 0 0 0)
        meshes=(L_d3p1a.vtp L_d3p2a.vtp L_d3p3a.vtp L_d3p4a.vtp L_d4a.vtp)
  JointSet:
    CustomJoint pelvis: socket_parent_frame=ground_offset socket_child_frame=pelvis_offset
      Coordinate pelvis_tilt: default_value=0 range=(-0.7853982 0.7853982) clamped=false
      Coordinate pelvis_list: default_value=0 range=(-1.745329 1.745329) clamped=false
      Coordinate pelvis_rotation: default_value=0 range=(-0.7853982 0.7853982) clamped=false
      Coordinate pelvis_tx: default_value=0 range=(-5 5) clamped=false
      Coordinate pelvis_ty: default_value=0 range=(-1 1) clamped=false
      Coordinate pelvis_tz: default_value=0 range=(-2 2) clamped=false
      PhysicalOffsetFrame ground_offset: socket_parent=/ground translation=(0 0 0) [meters]
      PhysicalOffsetFrame pelvis_offset: socket_parent=/bodyset/pelvis translation=(0 0 0)
      SpatialTransform:
        TransformAxis rotation1: coordinates=pelvis_tilt axis=(0 0 1) LinearFunction(coefficients=1 0)
        TransformAxis rotation2: coordinates=pelvis_list axis=(1 0 0) LinearFunction(coefficients=1 0)
        TransformAxis rotation3: coordinates=pelvis_rotation axis=(0 1 0) LinearFunction(coefficients=1 0)
        TransformAxis translation1: coordinates=pelvis_tx axis=(1 0 0) LinearFunction(coefficients=1 0)
        TransformAxis translation2: coordinates=pelvis_ty axis=(0 1 0) LinearFunction(coefficients=1 0)
        TransformAxis translation3: coordinates=pelvis_tz axis=(0 0 1) LinearFunction(coefficients=1 0)
    CustomJoint R_hip: socket_parent_frame=pelvis_offset socket_child_frame=R_femur_offset
      Coordinate R_hip_extension: default_value=0 range=(-1.134464 1.134464) clamped=false
      Coordinate R_hip_abduction: default_value=0 range=(-0.7853982 0.7853982) clamped=false
      Coordinate R_hip_rotation: default_value=0 range=(-0.7853982 0.7853982) clamped=false
      PhysicalOffsetFrame pelvis_offset: socket_parent=/bodyset/pelvis translation=(0 0 0.0355)
      PhysicalOffsetFrame R_femur_offset: socket_parent=/bodyset/R_femur translation=(0 0 0)
      SpatialTransform: axes_held_at_zero=(translation1 translation2 translation3)
        TransformAxis rotation1: coordinates=R_hip_extension axis=(0 0 1) LinearFunction(coefficients=1 0)
        TransformAxis rotation2: coordinates=R_hip_abduction axis=(1 0 0) LinearFunction(coefficients=1 0)
        TransformAxis rotation3: coordinates=R_hip_rotation axis=(0 1 0) LinearFunction(coefficients=1 0)
    CustomJoint knee: socket_parent_frame=R_femur_offset socket_child_frame=R_tibiotarsus_offset
      Coordinate R_knee_angle: default_value=0 range=(-3.141593 3.141593) clamped=false
      Coordinate R_knee_varus: default_value=0 range=(-0.7853982 0.7853982) clamped=false
      Coordinate R_knee_rotation: default_value=0 range=(-0.7853982 0.7853982) clamped=false
      PhysicalOffsetFrame R_femur_offset: socket_parent=/bodyset/R_femur translation=(0 -0.2338 0.0543)
      PhysicalOffsetFrame R_tibiotarsus_offset: socket_parent=/bodyset/R_tibiotarsus translation=(0 0 0)
      SpatialTransform: axes_held_at_zero=(translation1 translation2 translation3)
        TransformAxis rotation1: coordinates=R_knee_angle axis=(0 0 1) LinearFunction(coefficients=1 0)
        TransformAxis rotation2: coordinates=R_knee_varus axis=(1 0 0) LinearFunction(coefficients=1 0)
        TransformAxis rotation3: coordinates=R_knee_rotation axis=(0 1 0) LinearFunction(coefficients=1 0)
    CustomJoint R_ankle: socket_parent_frame=R_tibiotarsus_offset socket_child_frame=R_tarsometatarsus_offset
      Coordinate R_ankle_angle: default_value=0 range=(-0.1745329 3.141593) clamped=false
      Coordinate R_ankle_abduction: default_value=0.0872 range=(-0.7853982 0.7853982) clamped=false locked=true
        prescribed_function: SimmSpline: x=(-0.035 -0.03 -0.025 -0.02 -0.015 -0.01 -0.005 0 0.005 0.01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)
            y=(-0.014754 -0.004851 0.005051 0.014954 0.024856 0.034759 0.044661 0.054564 0.064466 0.074699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)
      Coordinate R_ankle_rotation: default_value=-0.28 range=(-0.7853982 0.7853982) clamped=false locked=true
        prescribed_function: SimmSpline: x=(-0.035 -0.03 -0.025 -0.02 -0.015 -0.01 -0.005 0 0.005 0.01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)
            y=(-0.344862 -0.349417 -0.353972 -0.358527 -0.363082 -0.367638 -0.372193 -0.376748 -0.381303 -0.385819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)
      PhysicalOffsetFrame R_tibiotarsus_offset: socket_parent=/bodyset/R_tibiotarsus translation=(0 -0.442 0)
      PhysicalOffsetFrame R_tarsometatarsus_offset: socket_parent=/bodyset/R_tarsometatarsus translation=(0 0 0)
      SpatialTransform: axes_held_at_zero=(translation1 translation2 translation3)
        TransformAxis rotation1: coordinates=R_ankle_angle axis=(0 0 1) LinearFunction(coefficients=1 0)
        TransformAxis rotation2: coordinates=R_ankle_abduction axis=(1 0 0) LinearFunction(coefficients=1 0)
        TransformAxis rotation3: coordinates=R_ankle_rotation axis=(0 1 0) LinearFunction(coefficients=1 0)
    CustomJoint R_mtp: socket_parent_frame=R_tarsometatarsus_offset socket_child_frame=R_pes_offset
      Coordinate R_mtp_angle: default_value=0 range=(-3.141593 3.141593) clamped=false
      Coordinate R_mtp_abduction: default_value=0.4361 range=(-3.141593 3.141593) clamped=false locked=true
        prescribed_function: SimmSpline: x=(-0.035 -0.03 -0.025 -0.02 -0.015 -0.01 -0.005 0 0.005 0.01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)
            y=(-0.272941 -0.277411 -0.28188 -0.286349 -0.290819 -0.295288 -0.299758 -0.304227 -0.308696 -0.312386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)
      Coordinate R_mtp_rotation: default_value=0.0523 range=(-3.141593 3.141593) clamped=false locked=true
        prescribed_function: SimmSpline: x=(-0.035 -0.03 -0.025 -0.02 -0.015 -0.01 -0.005 0 0.005 0.01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)
            y=(-0.053432 -0.052564 -0.051696 -0.050827 -0.049959 -0.049091 -0.048223 -0.047355 -0.046487 -0.045529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)
      PhysicalOffsetFrame R_tarsometatarsus_offset: socket_parent=/bodyset/R_tarsometatarsus translation=(0 -0.426 0)
      PhysicalOffsetFrame R_pes_offset: socket_parent=/bodyset/R_pes translation=(0 0 0)
      SpatialTransform: axes_held_at_zero=(translation1 translation2 translation3)
        TransformAxis rotation1: coordinates=R_mtp_angle axis=(0 0 1) LinearFunction(coefficients=1 0)
        TransformAxis rotation2: coordinates=R_mtp_abduction axis=(0 1 0) LinearFunction(coefficients=1 0)
        TransformAxis rotation3: coordinates=R_mtp_rotation axis=(1 0 0) LinearFunction(coefficients=1 0)
    CustomJoint L_hip: socket_parent_frame=pelvis_offset socket_child_frame=L_femur_offset
      Coordinate L_hip_extension: default_value=0 range=(-1.134464 1.134464) clamped=false
      Coordinate L_hip_abduction: default_value=0 range=(-0.7853982 0.7853982) clamped=false
      Coordinate L_hip_rotation: default_value=0 range=(-0.7853982 0.7853982) clamped=false
      PhysicalOffsetFrame pelvis_offset: socket_parent=/bodyset/pelvis translation=(0 0 -0.0355)
      PhysicalOffsetFrame L_femur_offset: socket_parent=/bodyset/L_femur translation=(0 0 0)
      SpatialTransform: axes_held_at_zero=(translation1 translation2 translation3)
        TransformAxis rotation1: coordinates=L_hip_extension axis=(0 0 1) LinearFunction(coefficients=1 0)
        TransformAxis rotation2: coordinates=L_hip_abduction axis=(-1 0 0) LinearFunction(coefficients=1 0)
        TransformAxis rotation3: coordinates=L_hip_rotation axis=(0 -1 0) LinearFunction(coefficients=1 0)
    CustomJoint knee_0: socket_parent_frame=L_femur_offset socket_child_frame=L_tibiotarsus_offset
      Coordinate L_knee_angle: default_value=0 range=(-3.141593 3.141593) clamped=false
      Coordinate L_knee_varus: default_value=0 range=(-0.7853982 0.7853982) clamped=false
      Coordinate L_knee_rotation: default_value=0 range=(-0.7853982 0.7853982) clamped=false
      PhysicalOffsetFrame L_femur_offset: socket_parent=/bodyset/L_femur translation=(0 -0.2338 -0.0543)
      PhysicalOffsetFrame L_tibiotarsus_offset: socket_parent=/bodyset/L_tibiotarsus translation=(0 0 0)
      SpatialTransform: axes_held_at_zero=(translation1 translation2 translation3)
        TransformAxis rotation1: coordinates=L_knee_angle axis=(0 0 1) LinearFunction(coefficients=1 0)
        TransformAxis rotation2: coordinates=L_knee_varus axis=(-1 0 0) LinearFunction(coefficients=1 0)
        TransformAxis rotation3: coordinates=L_knee_rotation axis=(0 -1 0) LinearFunction(coefficients=1 0)
    CustomJoint L_ankle: socket_parent_frame=L_tibiotarsus_offset socket_child_frame=L_tarsometatarsus_offset
      Coordinate L_ankle_angle: default_value=0 range=(-0.1745329 3.141593) clamped=false
      Coordinate L_ankle_abduction: default_value=0 range=(-0.7853982 0.7853982) clamped=false
      PhysicalOffsetFrame L_tibiotarsus_offset: socket_parent=/bodyset/L_tibiotarsus translation=(0 -0.442 0)
      PhysicalOffsetFrame L_tarsometatarsus_offset: socket_parent=/bodyset/L_tarsometatarsus translation=(0 0 0)
      SpatialTransform: axes_held_at_zero=(translation1 translation2 translation3)
        TransformAxis rotation1: coordinates=L_ankle_angle axis=(0 0 1) LinearFunction(coefficients=1 0)
        TransformAxis rotation2: coordinates=L_ankle_abduction axis=(-1 0 0) LinearFunction(coefficients=1 0)
        TransformAxis rotation3: axis=(0 -1 0) Constant(value=-0.1033)
    CustomJoint L_mtp: socket_parent_frame=L_tarsometatarsus_offset socket_child_frame=L_pes_offset
      Coordinate L_mtp_angle: default_value=0 range=(-3.141593 3.141593) clamped=false
      PhysicalOffsetFrame L_tarsometatarsus_offset: socket_parent=/bodyset/L_tarsometatarsus translation=(0 -0.426 0)
      PhysicalOffsetFrame L_pes_offset: socket_parent=/bodyset/L_pes translation=(0 0 0)
      SpatialTransform: axes_held_at_zero=(translation1 translation2 translation3)
        TransformAxis rotation1: coordinates=L_mtp_angle axis=(0 0 1) LinearFunction(coefficients=1 0)
        TransformAxis rotation2: axis=(-1 0 0) Constant(value=0.0523)
        TransformAxis rotation3: axis=(0 -1 0) Constant(value=0.4361)
  ForceSet:
    Millard2012EquilibriumMuscle [values shared by the 34 below unless stated]:
      ActiveForceLengthCurve: min_norm_active_fiber_length=0.4441 transition_norm_fiber_length=0.73
          max_norm_active_fiber_length=1.8123 shallow_ascending_slope=0.8616 minimum_value=0
      ForceVelocityCurve: concentric_slope_at_vmax=0 concentric_slope_near_vmax=0.25 isometric_slope=5
          eccentric_slope_at_vmax=0 eccentric_slope_near_vmax=0.15 max_eccentric_velocity_force_multiplier=1.4
          concentric_curviness=0.6 eccentric_curviness=0.9
      FiberForceLengthCurve: strain_at_zero_force=0 strain_at_one_norm_force=0.6
      TendonForceLengthCurve: strain_at_one_norm_force=0.049
    Millard2012EquilibriumMuscle R_IC: max_isometric_force=889.44 optimal_fiber_length=0.174 tendon_slack_length=0.0451
        pennation_angle_at_optimal=0 default_fiber_length=0.174 minimum_activation=0.02
      PathPoint P1: pelvis (0.15109 0.00525 0.02047)
      PathPoint P2: R_femur (0.04007 -0.21515 -0.0284)
      PathPoint P3: R_tibiotarsus (0.00922 -0.01128 -0.01565)
      PathWrap: wrap_object=R_IC_knee method=hybrid range=(2 -1)
    Millard2012EquilibriumMuscle R_ILa: max_isometric_force=1265.467 optimal_fiber_length=0.174
        tendon_slack_length=0.2432 pennation_angle_at_optimal=0.6458 default_fiber_length=0.174 minimum_activation=0.02
      PathPoint P1: pelvis (-0.07303 0.08977 0.04275)
      PathPoint P2: R_femur (0.04286 -0.16603 0.08141)
      PathPoint P3: R_tibiotarsus (0.0144 0.01634 0.02866)
      PathPoint P4: R_tibiotarsus (0.04358 -0.00834 0.01832)
      PathWrap: wrap_object=R_IL_hip method=axial
    Millard2012EquilibriumMuscle R_ILp: max_isometric_force=1265.467 optimal_fiber_length=0.174
        tendon_slack_length=0.3099 pennation_angle_at_optimal=0.6109 default_fiber_length=0.174 minimum_activation=0.02
      PathPoint P1: pelvis (-0.16526 0.08937 0.03111)
      PathPoint P2: R_femur (0.0362 -0.16587 0.10698)
      PathPoint P3: R_tibiotarsus (0.02376 0.00077 0.041)
      PathPoint P4: R_tibiotarsus (0.04388 -0.01463 0.02347)
      PathWrap: wrap_object=R_IL_hip method=hybrid
    Millard2012EquilibriumMuscle R_FMTL: max_isometric_force=1434.678 optimal_fiber_length=0.088
        tendon_slack_length=0.1746 pennation_angle_at_optimal=0.2617994 default_fiber_length=0.088
        minimum_activation=0.02
      PathPoint P1: R_femur (0.02641 -0.08096 0.05062)
      PathPoint P2: R_femur (0.0409 -0.16643 0.06183)
      PathPoint P3: R_tibiotarsus (0.03878 -0.02884 0.02914)
      PathWrap: wrap_object=R_FMTIM_FMTL_knee method=hybrid
    Millard2012EquilibriumMuscle R_FMTIM: max_isometric_force=1706.573 optimal_fiber_length=0.084
        tendon_slack_length=0.1863 pennation_angle_at_optimal=0.4363323 default_fiber_length=0.084
        minimum_activation=0.02
      PathPoint P1: R_femur (0.02044 -0.08193 0.01269)
      PathPoint P2: R_femur (0.026784 -0.18723 0)
      PathPoint P3: R_tibiotarsus (0.052 -0.014 0.011)
      PathWrap: wrap_object=R_FMTIM_FMTL_knee method=hybrid range=(2 3)
    Millard2012EquilibriumMuscle R_FMTM: max_isometric_force=1089.025 optimal_fiber_length=0.089
        tendon_slack_length=0.0603 pennation_angle_at_optimal=0.5235988 default_fiber_length=0.089
        minimum_activation=0.02
      PathPoint P1: R_femur (-0.01325 -0.12375 0.03101)
      PathPoint P2: R_femur (-0.01794 -0.20591 -0.0006)
      PathPoint P3: R_tibiotarsus (0.01038 -0.01164 -0.01091)
    Millard2012EquilibriumMuscle R_AMB1: max_isometric_force=971.8776 optimal_fiber_length=0.039
        tendon_slack_length=0.1648 pennation_angle_at_optimal=0.2617994 default_fiber_length=0.039
        minimum_activation=0.02
      PathPoint P1: pelvis (0.02844 -0.05941 0.0272701)
      PathPoint P2: R_femur (-0.03492 -0.20966 0.01377)
      PathPoint P3: R_tibiotarsus (0.00364 -0.01357 -0.01766)
    Millard2012EquilibriumMuscle R_AMB2: max_isometric_force=1793.347 optimal_fiber_length=0.044
        tendon_slack_length=0.3941 pennation_angle_at_optimal=0.1745329 default_fiber_length=0.044
        minimum_activation=0.02
      PathPoint P1: pelvis (0.08069 -0.00294 0.0371)
      PathPoint P2: R_femur (0.03086 -0.1818 -0.01991)
      PathPoint P3: R_tibiotarsus (0.08447 0.00169 0.00453)
      PathPoint P4: R_tibiotarsus (0.0412 -0.08594 0.02664)
      PathPoint P5: R_tibiotarsus (0.00575 -0.1057 0.0295)
      PathWrap: wrap_object=R_AMBd_knee method=hybrid
    Millard2012EquilibriumMuscle R_ILFBa: max_isometric_force=1253.897 optimal_fiber_length=0.176
        tendon_slack_length=0.2134 pennation_angle_at_optimal=0 default_fiber_length=0.176 minimum_activation=0.02
      PathPoint P1: pelvis (-0.11121 0.06804 0.03625)
      PathPoint P2: pelvis (-0.09196 0.04838 0.066)
      PathPoint P3: R_tibiotarsus (-0.00185 -0.14056 0.0336)
      PathWrap: wrap_object=R_ILFBp_ansa method=hybrid
      PathWrap pathwrap_0: wrap_object=R_ILFB_hip method=hybrid
    Millard2012EquilibriumMuscle R_ILFBp: max_isometric_force=1253.897 optimal_fiber_length=0.176
        tendon_slack_length=0.2733 pennation_angle_at_optimal=0 default_fiber_length=0.176 minimum_activation=0.02
      PathPoint P1: pelvis (-0.19603 0.07853 0.03103)
      PathPoint P2: pelvis (-0.16816 0.05213 0.06491)
      PathPoint P3: R_tibiotarsus (-0.00185 -0.14056 0.0336)
      PathWrap: wrap_object=R_ILFBp_ansa method=hybrid
      PathWrap pathwrap_0: wrap_object=R_ILFB_hip method=hybrid
    Millard2012EquilibriumMuscle R_IFE: max_isometric_force=478.7081 optimal_fiber_length=0.025
        tendon_slack_length=0.0667 pennation_angle_at_optimal=0.4712389 default_fiber_length=0.025
        minimum_activation=0.02
      PathPoint P1: pelvis (-0.02742 0.07075 0.06114)
      PathPoint P2: R_femur (0.04201 -0.0239 0.0387)
      PathWrap: wrap_object=R_IFE_hip method=hybrid
    Millard2012EquilibriumMuscle R_ITCA: max_isometric_force=896.6738 optimal_fiber_length=0.064
        tendon_slack_length=0.0469 pennation_angle_at_optimal=0.4363323 default_fiber_length=0.064
        minimum_activation=0.02
      PathPoint P1: pelvis (0.08303 0.04064 0.02235)
      PathPoint P2: pelvis (0.04856 0.05317 0.03956)
      PathPoint P3: R_femur (0.07284 -0.01077 0.0092)
      PathPoint P4: R_femur (0.05228 -0.01892 0.03164)
      PathWrap: wrap_object=R_ITC_ITM_hip method=hybrid
    Millard2012EquilibriumMuscle R_ITCP: max_isometric_force=896.6738 optimal_fiber_length=0.064
        tendon_slack_length=0.038 pennation_angle_at_optimal=0.4363323 default_fiber_length=0.064
        minimum_activation=0.02
      PathPoint P1: pelvis (0.04732 0.06322 0.02506)
      PathPoint P2: pelvis (0.0302 0.06423 0.04097)
      PathPoint P3: R_femur (0.07366 -0.00221 0.00802)
      PathPoint P4: R_femur (0.0509 -0.01365 0.03433)
      PathWrap: wrap_object=R_ITC_ITM_hip method=hybrid
    Millard2012EquilibriumMuscle R_ITCR: max_isometric_force=329.7445 optimal_fiber_length=0.053
        tendon_slack_length=0.0488 pennation_angle_at_optimal=0.1745329 default_fiber_length=0.053
        minimum_activation=0.02
      PathPoint P1: pelvis (0.09732 0.02463 0.02644)
      PathPoint P2: R_femur (0.06629 -0.0384 0.01056)
      PathPoint P3: R_femur (0.05231 -0.03508 0.0355)
      PathWrap: wrap_object=R_ITCR_femur method=hybrid
      PathWrap pathwrap_0: wrap_object=R_ITCR_hip method=hybrid
    Millard2012EquilibriumMuscle R_ITM: max_isometric_force=180.781 optimal_fiber_length=0.058
        tendon_slack_length=0.0241 pennation_angle_at_optimal=0 default_fiber_length=0.058 minimum_activation=0.02
      PathPoint P1: pelvis (0.04036 0.0378 0.0329111)
      PathPoint P2: pelvis (0.04404 0.03729 0.04915)
      PathPoint P3: R_femur (0.07469 -0.02248 0.0043)
      PathPoint P4: R_femur (0.05276 -0.02598 0.0319)
      PathWrap: wrap_object=R_ITC_ITM_hip method=hybrid
    Millard2012EquilibriumMuscle R_IFI: max_isometric_force=410.7344 optimal_fiber_length=0.041
        tendon_slack_length=0.0533 pennation_angle_at_optimal=0 default_fiber_length=0.041 minimum_activation=0.02
      PathPoint P1: pelvis (0.06345 0.03633 0.02551)
      PathPoint P2: pelvis (0.04185 -0.01171 0.04568)
      PathPoint P3: R_femur (-0.00619 -0.05886 0.01879)
    Millard2012EquilibriumMuscle R_FCLP: max_isometric_force=543.7894 optimal_fiber_length=0.24
        tendon_slack_length=0.2449 pennation_angle_at_optimal=0 default_fiber_length=0.24 minimum_activation=0.02
      PathPoint P1: pelvis (-0.26707 0.07255 0.03031)
      PathPoint P2: pelvis (-0.26278 0.05251 0.05724)
      PathPoint P3: R_femur (-0.0853 -0.13373 0.14293)
      PathPoint P4: R_tibiotarsus (-0.01369 -0.11967 0.0146)
      PathWrap: wrap_object=R_FCL_hip method=hybrid
    Millard2012EquilibriumMuscle R_FCM: max_isometric_force=1109.272 optimal_fiber_length=0.036
        tendon_slack_length=0.435 pennation_angle_at_optimal=0.6108652 default_fiber_length=0.036
        minimum_activation=0.02
      PathPoint P1: pelvis (-0.27716 -0.00684 0.06964)
      MovingPathPoint default: pelvis socket_x_coordinate=/jointset/knee/R_knee_angle
          socket_y_coordinate=/jointset/knee/R_knee_angle socket_z_coordinate=/jointset/knee/R_knee_angle
        x_location: SimmSpline: x=(-1.86422 -1.49438 -1.21273 -0.873188 -0.54716 -0.133759 0.797531)
            y=(-0.263857 -0.240643 -0.208543 -0.198344 -0.196358 -0.195991 -0.195818)
        y_location: SimmSpline: x=(-0.785398 0.785398) y=(-0.03959 -0.03959)
        z_location: SimmSpline: x=(-2.3426 -2.17709 -1.80065 -1.47977 -1.21773 -1.15727 -0.706185 -0.397928 -0.00124024)
            y=(0.116417 0.116344 0.116122 0.114791 0.103237 0.0978979 0.0950448 0.0920596 0.0921081)
      MovingPathPoint default_0: R_femur socket_x_coordinate=/jointset/knee/R_knee_angle
          socket_y_coordinate=/jointset/knee/R_knee_angle socket_z_coordinate=/jointset/knee/R_knee_angle
        x_location: SimmSpline: x=(-1.85097 -1.75673 -1.47019 -1.13742 -1.12247 -0.831058 1.77632e-7)
            y=(-0.0989422 -0.0983303 -0.0916003 -0.089232 -0.0892165 -0.0892015 -0.0892)
        y_location: SimmSpline: x=(-0.809267 0.785398) y=(-0.13389 -0.13389)
        z_location: SimmSpline: x=(-2.62596 -1.98178 -1.91504 -1.40711 -1.14411 -0.653995 -0.18452 0.200993)
            y=(0.162661 0.160408 0.158066 0.101929 0.0949484 0.0941605 0.0941617 0.0937862)
      PathPoint P4: R_tibiotarsus (-0.01611 -0.12023 0.00746)
    Millard2012EquilibriumMuscle R_PIFML: max_isometric_force=815.6839 optimal_fiber_length=0.089
        tendon_slack_length=0.1669 pennation_angle_at_optimal=0.2617994 default_fiber_length=0.089
        minimum_activation=0.02
      PathPoint R_PIFM_L-P1: pelvis (-0.15031 -0.02475 0.04656)
      PathPoint R_PIFM_L-P2: R_femur (-0.01522 -0.14908 0.05472)
      PathWrap: wrap_object=R_PIFM_L_hip method=hybrid
    Millard2012EquilibriumMuscle R_OM: max_isometric_force=3123.896 optimal_fiber_length=0.055
        tendon_slack_length=0.1651 pennation_angle_at_optimal=0.4101524 default_fiber_length=0.055
        minimum_activation=0.02
      PathPoint P1: pelvis (-0.15605 -0.05036 0.05791)
      PathPoint P2: pelvis (-0.04343 -0.04072 0.02799)
      PathPoint P3: pelvis (-0.03257 -0.03519 0.03411)
      PathPoint P4: R_femur (0.02169 0.00565 0.04932)
      PathPoint P5: R_femur (0.04177 0.00454 0.03871)
    Millard2012EquilibriumMuscle R_ISF: max_isometric_force=419.4119 optimal_fiber_length=0.033
        tendon_slack_length=0.0816 pennation_angle_at_optimal=0.2617994 default_fiber_length=0.033
        minimum_activation=0.02
      PathPoint P1: pelvis (-0.08332 -0.00676 0.03819)
      PathPoint P2: R_femur (0.01832 -0.00914 0.05298)
      PathPoint P3: R_femur (0.04091 -0.01021 0.04254)
    Millard2012EquilibriumMuscle R_CFP: max_isometric_force=1125.181 optimal_fiber_length=0.108
        tendon_slack_length=0.215 pennation_angle_at_optimal=0.2617994 default_fiber_length=0.108
        minimum_activation=0.02
      PathPoint P1: pelvis (-0.266 0.0697 0.02533)
      PathPoint P2: R_femur (0.00346 -0.07167 0.0494)
      PathWrap: wrap_object=R_CFP_hip method=hybrid
    Millard2012EquilibriumMuscle R_GL: max_isometric_force=1836 optimal_fiber_length=0.12 tendon_slack_length=0.5818
        pennation_angle_at_optimal=0.3490659 default_fiber_length=0.12 minimum_activation=0.02
      PathPoint P1: R_femur (0.01405 -0.19195 0.06649)
      PathPoint P2: R_femur (0.01349 -0.20099 0.09997)
      PathPoint P3: R_tibiotarsus (-0.001966 -0.02661 0.07206)
      PathPoint P4: R_tibiotarsus (-0.01765 -0.15983 0.03604)
      PathPoint P5: R_tibiotarsus (-0.02582 -0.36755 0.00184)
      PathPoint P6: R_tarsometatarsus (-0.0359 -0.05455 -0.00266)
      PathPoint P7: R_tarsometatarsus (-0.01602 -0.16255 0.00143)
      PathWrap: wrap_object=R_Gastroc_ankle method=hybrid
      PathWrap pathwrap_0: wrap_object=R_deep_knee_flexors method=hybrid
    Millard2012EquilibriumMuscle R_GIM: max_isometric_force=798.3289 optimal_fiber_length=0.125
        tendon_slack_length=0.507 pennation_angle_at_optimal=0.2617994 default_fiber_length=0.125
        minimum_activation=0.02
      PathPoint P1: R_femur (-0.02829 -0.15873 0.04962)
      PathPoint P2: R_femur (-0.04749 -0.18905 0.06308)
      PathPoint P3: R_tibiotarsus (-0.01754 -0.15905 0.03541)
      PathPoint P4: R_tibiotarsus (-0.02523 -0.36673 0.00128)
      PathPoint P5: R_tarsometatarsus (-0.03728 -0.05387 -0.00601)
      PathPoint P6: R_tarsometatarsus (-0.01663 -0.16231 -0.0011)
      PathWrap: wrap_object=R_Gastroc_ankle method=hybrid
      PathWrap pathwrap_0: wrap_object=R_deep_knee_flexors method=hybrid range=(2 3)
    Millard2012EquilibriumMuscle R_GM: max_isometric_force=3123.896 optimal_fiber_length=0.094
        tendon_slack_length=0.5957 pennation_angle_at_optimal=0.3490659 default_fiber_length=0.094
        minimum_activation=0.02
      PathPoint P1: R_tibiotarsus (0.05348 0.0342 -0.03327)
      PathPoint P2: R_tibiotarsus (0.02616 -0.09808 -0.03254)
      PathPoint P3: R_tibiotarsus (-0.02631 -0.36653 -0.00406)
      PathPoint P4: R_tarsometatarsus (-0.03806 -0.05337 -0.00886)
      PathPoint P5: R_tarsometatarsus (-0.0149 -0.16225 -0.00459)
      PathWrap: wrap_object=R_Gastroc_ankle method=hybrid range=(3 4)
    Millard2012EquilibriumMuscle R_EDL: max_isometric_force=833.0389 optimal_fiber_length=0.049
        tendon_slack_length=0.8512 pennation_angle_at_optimal=0.5235988 default_fiber_length=0.049
        minimum_activation=0.02
      PathPoint P1: R_tibiotarsus (0.01628 -0.1065 0.00604)
      PathPoint P2: R_tibiotarsus (0.02397 -0.28641 -0.0015)
      PathPoint P3: R_tibiotarsus (0.0153 -0.419 -0.001)
      PathPoint P4: R_tarsometatarsus (0.019 -0.034 0.00195)
      PathPoint P5: R_tarsometatarsus (0.01787 -0.07374 0.00164)
      PathPoint P6: R_tarsometatarsus (0.02376 -0.3198 -0.00102)
      PathPoint P7: R_tarsometatarsus (0.02491 -0.37246 -0.00247)
      PathPoint P8: R_pes (0.02633 0.02126 -0.00852)
      PathPoint P9: R_pes (0.09263 0.00685 -0.00626)
      PathPoint P10: R_pes (0.14211 0.00311 -0.00713)
      PathPoint P11: R_pes (0.15379 0.00315 -0.00398)
      PathWrap: wrap_object=R_EDL_toes method=axial range=(7 9)
      PathWrap pathwrap_0: wrap_object=R_EDL_TC_ankle method=hybrid
    Millard2012EquilibriumMuscle R_TCf: max_isometric_force=685.5216 optimal_fiber_length=0.045
        tendon_slack_length=0.4791 pennation_angle_at_optimal=0.4363323 default_fiber_length=0.045
        minimum_activation=0.02
      PathPoint P1: R_femur (0.00118 -0.23736 0.04849)
      PathPoint P2: R_tibiotarsus (0.01874 -0.02663 0.02283)
      PathPoint P3: R_tibiotarsus (0.02312 -0.15525 0.01127)
      PathPoint P4: R_tibiotarsus (0.02191 -0.403 -0.003)
      PathPoint P5: R_tarsometatarsus (0.03272 -0.04332 -0.01029)
      PathPoint P6: R_tarsometatarsus (0.02092 -0.09836 -0.0098)
      PathWrap: wrap_object=R_EDL_TC_ankle method=hybrid
    Millard2012EquilibriumMuscle R_TCt: max_isometric_force=685.5216 optimal_fiber_length=0.045
        tendon_slack_length=0.4215 pennation_angle_at_optimal=0.4363323 default_fiber_length=0.045
        minimum_activation=0.02
      PathPoint P1: R_tibiotarsus (0.0466 -0.04363 0.01982)
      PathPoint P2: R_tibiotarsus (0.02331 -0.155 0.009)
      PathPoint P3: R_tibiotarsus (0.0212 -0.402 -0.006)
      PathPoint P4: R_tarsometatarsus (0.03329 -0.04262 -0.01319)
      PathPoint P5: R_tarsometatarsus (0.02082 -0.09834 -0.01253)
      PathWrap: wrap_object=R_EDL_TC_ankle method=hybrid
    Millard2012EquilibriumMuscle R_FDL: max_isometric_force=1130.966 optimal_fiber_length=0.048
        tendon_slack_length=1.0366 pennation_angle_at_optimal=0.3490659 default_fiber_length=0.048
        minimum_activation=0.02
      PathPoint P1: R_tibiotarsus (-0.03149 -0.04311 0.01282)
      PathPoint P2: R_tibiotarsus (-0.01645 -0.14449 0.01218)
      PathPoint P3: R_tibiotarsus (-0.01492 -0.379 0.00623)
      PathPoint P4: R_tarsometatarsus (-0.0212 -0.0393 0.01152)
      PathPoint P5: R_tarsometatarsus (-0.01588 -0.2353 0.00762)
      PathPoint P6: R_tarsometatarsus (-0.00173 -0.38649 0.00023)
      PathPoint P7: R_tarsometatarsus (-0.0074092 -0.406804 -0.005)
      PathPoint P8: R_pes (0.02414 -0.03 -0.00376)
      PathPoint P9: R_pes (0.08396 -0.0177 -0.0009)
      PathPoint P10: R_pes (0.10561 -0.02251 -0.00089)
      PathPoint P11: R_pes (0.14683 -0.02055 0.00189)
      PathPoint P12: R_pes (0.18586 -0.02137 0.00253)
      PathPoint P13: R_pes (0.21953 -0.01434 0.00275)
      PathWrap: wrap_object=R_FDL_FHL_ankle method=hybrid range=(3 4)
      PathWrap pathwrap_0: wrap_object=R_toe_flexors_deep method=hybrid range=(7 8)
    Millard2012EquilibriumMuscle R_FHL: max_isometric_force=468.5844 optimal_fiber_length=0.04
        tendon_slack_length=1.0939 pennation_angle_at_optimal=0.4363323 default_fiber_length=0.04
        minimum_activation=0.02
      PathPoint P1: R_femur (-0.00851 -0.17653 0.0687)
      PathPoint P2: R_femur (-0.01509 -0.18369 0.07434)
      PathPoint P3: R_femur (-0.02648 -0.17945 0.07857)
      PathPoint P4: R_tibiotarsus (-0.01536 -0.14279 0.00575)
      PathPoint P5: R_tibiotarsus (-0.01053 -0.37852 -0.00023)
      PathPoint P6: R_tarsometatarsus (-0.02219 -0.03922 0.00897)
      PathPoint P7: R_tarsometatarsus (-0.01661 -0.23552 0.00381)
      PathPoint P8: R_tarsometatarsus (-0.00348 -0.38652 -0.00405)
      PathPoint P9: R_tarsometatarsus (-0.00722976 -0.407 -0.00611227)
      PathPoint P10: R_pes (0.02662 -0.0273 -0.00872)
      PathPoint P11: R_pes (0.08354 -0.01836 -0.00267)
      PathPoint P12: R_pes (0.10594 -0.02295 -0.00403)
      PathPoint P13: R_pes (0.14697 -0.02097 -0.00242)
      PathPoint P14: R_pes (0.18632 -0.02148 -0.00026)
      PathPoint P15: R_pes (0.22075 -0.01632 5e-5)
      PathWrap: wrap_object=R_FDL_FHL_ankle method=hybrid range=(5 6)
      PathWrap pathwrap_0: wrap_object=R_toe_flexors_deep method=hybrid range=(9 10)
      PathWrap pathwrap_1: wrap_object=R_deep_knee_flexors method=hybrid range=(3 4)
    Millard2012EquilibriumMuscle R_FP_PD3: max_isometric_force=1154.106 optimal_fiber_length=0.025
        tendon_slack_length=1.0737 pennation_angle_at_optimal=0.5235988 default_fiber_length=0.03
        minimum_activation=0.02
      PathPoint P1: R_tibiotarsus (-0.04937 0.00432 0.02582)
      PathPoint P2: R_tibiotarsus (-0.03999 -0.0713 0.02865)
      PathPoint P3: R_tibiotarsus (-0.01648 -0.36017 0.00526)
      PathPoint P4: R_tibiotarsus (-0.02482 -0.42377 -0.00778)
      PathPoint P5: R_tarsometatarsus (-0.02758 -0.04894 0.0022)
      PathPoint P6: R_tarsometatarsus (-0.01949 -0.23728 0.00109)
      PathPoint P7: R_tarsometatarsus (-0.00573 -0.39687 -0.00772)
      PathPoint P8: R_tarsometatarsus (-0.017 -0.405 -0.007)
      PathPoint P9: R_pes (0.02619 -0.02541 -0.00796)
      PathPoint P10: R_pes (0.08883 -0.02033 -0.00114)
      PathPoint P11: R_pes (0.1022 -0.02055 -0.00019)
      PathPoint P12: R_pes (0.14602 -0.01813 0.0025)
      PathPoint P13: R_pes (0.17459 -0.01803 0.00195)
      PathPoint P14: R_pes (0.18972 -0.0167 0.00148)
      PathWrap: wrap_object=R_toe_flexors_superficial method=hybrid range=(8 9)
      PathWrap pathwrap_0: wrap_object=R_FPs_deep_ankle method=hybrid range=(4 5)
    Millard2012EquilibriumMuscle R_FPD3: max_isometric_force=3210.671 optimal_fiber_length=0.017
        tendon_slack_length=1.02 pennation_angle_at_optimal=0.6108652 default_fiber_length=0.017
        minimum_activation=0.02
      PathPoint P1: R_femur (-0.01774 -0.17935 0.06824)
      PathPoint P2: R_femur (-0.025 -0.1793 0.07519)
      PathPoint P4: R_tibiotarsus (-0.036 -0.11 0.01744)
      PathPoint P5: R_tibiotarsus (-0.02065 -0.39468 0.00259)
      PathPoint P6: R_tibiotarsus (-0.02272 -0.43052 -0.0001)
      PathPoint P7: R_tarsometatarsus (-0.02736 -0.04498 -0.01532)
      PathPoint P8: R_tarsometatarsus (-0.02518 -0.08081 -0.01601)
      PathPoint P9: R_tarsometatarsus (-0.02121 -0.23829 -0.00829)
      PathPoint P10: R_tarsometatarsus (-0.00418 -0.39887 -0.01363)
      PathPoint P11: R_tarsometatarsus (-0.0161042 -0.405 -0.0117738)
      PathPoint P12: R_pes (0.02519 -0.02666 -0.01366)
      PathPoint P13: R_pes (0.08838 -0.02249 -0.0066)
      PathPoint P14: R_pes (0.10333 -0.02263 -0.00514)
      PathPoint P15: R_pes (0.14635 -0.01842 -0.00192)
      PathWrap: wrap_object=R_FPs_deep_ankle method=hybrid range=(5 6)
      PathWrap pathwrap_0: wrap_object=R_toe_flexors_superficial method=hybrid range=(10 11)
      PathWrap pathwrap_1: wrap_object=R_deep_knee_flexors method=hybrid range=(2 3)
      ForceVelocityCurve: concentric_slope_at_vmax=0 concentric_slope_near_vmax=0.25 isometric_slope=4
          eccentric_slope_at_vmax=0 eccentric_slope_near_vmax=0.15 max_eccentric_velocity_force_multiplier=1.4
          concentric_curviness=0.6 eccentric_curviness=0.9
    Millard2012EquilibriumMuscle R_FPD4: max_isometric_force=1434.678 optimal_fiber_length=0.026
        tendon_slack_length=0.9906 pennation_angle_at_optimal=0.3490659 default_fiber_length=0.026
        minimum_activation=0.02
      PathPoint P1: R_femur (-0.01026 -0.17495 0.07342)
      PathPoint P2: R_femur (-0.02017 -0.18234 0.07668)
      PathPoint P3: R_femur (-0.02493 -0.17931 0.07929)
      PathPoint P4: R_tibiotarsus (-0.0112 -0.14646 0.02737)
      PathPoint P5: R_tibiotarsus (-0.01799 -0.39676 0.00584)
      PathPoint P6: R_tibiotarsus (-0.0204 -0.42571 0.00346)
      PathPoint P7: R_tarsometatarsus (-0.02945 -0.04521 0.00942)
      PathPoint P8: R_tarsometatarsus (-0.02588 -0.08225 0.00485)
      PathPoint P9: R_tarsometatarsus (-0.02009 -0.23699 0.00369)
      PathPoint P10: R_tarsometatarsus (-0.00296 -0.40041 0.0057)
      PathPoint P12: R_pes (0.03326 -0.01329 0.02453)
      PathPoint P13: R_pes (0.03844 -0.01605 0.03246)
      PathPoint P14: R_pes (0.05964 -0.01946 0.04732)
      PathPoint P15: R_pes (0.08709 0.00219 0.07435)
      PathWrap: wrap_object=R_FPs_deep_ankle method=hybrid range=(6 8)
      PathWrap pathwrap_0: wrap_object=R_FPD4_toe method=hybrid range=(10 -1)
      PathWrap pathwrap_1: wrap_object=R_deep_knee_flexors method=hybrid range=(3 4)
    Millard2012EquilibriumMuscle R_FL: max_isometric_force=2270.61 optimal_fiber_length=0.081
        tendon_slack_length=0.9633 pennation_angle_at_optimal=0.3490659 default_fiber_length=0.081
        minimum_activation=0.02
      PathPoint P1: R_femur (0.02539 -0.28791 0.09404)
      PathPoint P2: R_tibiotarsus (0.04252 -0.08611 0.04356)
      PathPoint P3: R_tibiotarsus (0.01879 -0.22507 0.03632)
      PathPoint P4: R_tibiotarsus (0.01022 -0.39948 0.02306)
      PathPoint P5: R_tibiotarsus (-0.005 -0.45615 0.03352)
      PathPoint P6: R_tarsometatarsus (-0.00854 -0.03975 0.03128)
      PathPoint P7: R_tarsometatarsus (-0.01516 -0.09679 0.01417)
      PathPoint P8: R_tarsometatarsus (-0.02342 -0.13061 -0.0098)
      PathPoint P9: R_tarsometatarsus (-0.0218 -0.23755 -0.00256)
      PathPoint P10: R_tarsometatarsus (-0.00556 -0.39863 -0.01116)
      PathPoint P12: R_pes (0.02411 -0.03 -0.01108)
      PathPoint P13: R_pes (0.08668 -0.02238 -0.00331)
      PathPoint P14: R_pes (0.1029 -0.0211 -0.00313)
      PathPoint P15: R_pes (0.14587 -0.01904 0.00074)
      PathWrap: wrap_object=R_toe_flexors_superficial method=hybrid range=(10 12)
    CoordinateActuator L_hip_ext: coordinate=L_hip_extension optimal_force=300
    CoordinateActuator L_hip_abd: coordinate=L_hip_abduction optimal_force=300
    CoordinateActuator L_hip_rot: coordinate=L_hip_rotation optimal_force=300
    CoordinateActuator L_knee_ext: coordinate=L_knee_angle optimal_force=300
    CoordinateActuator L_knee_var: coordinate=L_knee_varus optimal_force=300
    CoordinateActuator L_knee_rot: coordinate=L_knee_rotation optimal_force=300
    CoordinateActuator L_ankle_ext: coordinate=L_ankle_angle optimal_force=300
    CoordinateActuator L_ankle_abd: coordinate=L_ankle_abduction optimal_force=300
    CoordinateActuator L_mtp_ext: coordinate=L_mtp_angle optimal_force=300
    ObjectGroup Right Side: members=(R_IC R_ILa R_ILp R_FMTL R_FMTIM R_FMTM R_AMB1 R_AMB2 R_ILFBa R_ILFBp R_IFE R_ITCA R_ITCP R_ITCR R_ITM R_IFI R_FCLP R_FCM R_PIFML R_OM R_ISF R_CFP R_GL R_GIM R_GM R_EDL R_TCf R_TCt R_FDL R_FHL R_FP_PD3 R_FPD3 R_FPD4 R_FL)
