# OpenSim document version 40000
Model:
  gravity: 0 -9.80665 0
  length_units: meters
  force_units: N
  credits:
    Rajagopal, A, Dembia, C.L., DeMers, M.S., Delp, D.D., Hicks, J.L., and Delp, S.L.
  publications:
    Rajagopal, Apoorva, et al. "Full-Body Musculoskeletal Model for Muscle-Driven Simulation of Human Gait." IEEE Transactions on Biomedical Engineering 63.10 (2016): 2068-2079. (2016)
  Ground
  BodySet:
    Body pelvis: mass=10.47372 [kg] mass_center=(-0.07485692 0 0) inertia=(0.08669382 0.08669382 0.04921327 0 0 0)
        meshes=(r_pelvis.vtp l_pelvis.vtp sacrum.vtp)
      WrapCylinder Gmax1_at_pelvis_r: xyz_body_rotation=(-0.6 0.45 0) translation=(-0.08152733 -0.08936344 0.05930924)
          quadrant=-x radius=0.03929249 length=0.1458039
      WrapCylinder Gmax2_at_pelvis_r: xyz_body_rotation=(-0.75 0.39 0) translation=(-0.08470372 -0.07492086 0.06611521)
          quadrant=all radius=0.03956383 length=0.09585653
      WrapCylinder Gmax3_at_pelvis_r: xyz_body_rotation=(-0.1 0 0) translation=(-0.08788011 -0.07943417 0.06611521)
          quadrant=all radius=0.03924356 length=0.09716133
      WrapCylinder Gmax1_at_pelvis_l: xyz_body_rotation=(0.6 -0.45 0) translation=(-0.08152733 -0.08936344 -0.05930924)
          quadrant=-x radius=0.03929249 length=0.1458039
      WrapCylinder Gmax2_at_pelvis_l: xyz_body_rotation=(0.75 -0.39 0)
          translation=(-0.08470372 -0.07492086 -0.06611521) quadrant=all radius=0.03956383 length=0.09585653
      WrapCylinder Gmax3_at_pelvis_l: xyz_body_rotation=(0.1 0 0) translation=(-0.08788011 -0.07943417 -0.06611521)
          quadrant=all radius=0.03924356 length=0.09716133
      WrapCylinder PS_at_brim_r: xyz_body_rotation=(-0.25 -0.27 0.1) translation=(-0.07835094 -0.05415966 0.06378174)
          quadrant=-y radius=0.04900049 length=0.09748915
      WrapCylinder PS_at_brim_l: xyz_body_rotation=(0.25 0.27 0.1) translation=(-0.07835094 -0.05415966 -0.06378174)
          quadrant=-y radius=0.04900049 length=0.09748915
      WrapCylinder IL_at_brim_r: xyz_body_rotation=(-0.32 -0.24 0.9) translation=(-0.07517456 -0.05867296 0.07350456)
          quadrant=-y radius=0.05403164 length=0.09711204
      WrapCylinder IL_at_brim_l: xyz_body_rotation=(0.32 0.24 0.9) translation=(-0.07517456 -0.05867296 -0.07350456)
          quadrant=-y radius=0.05403164 length=0.09711204
    Body femur_r: mass=8.272081 mass_center=(0 -0.1595392 0) inertia=(0.113641 0.04501839 0.113641 0 0 0)
        meshes=femur_r.vtp
      WrapCylinder Gastroc_at_condyles_r: translation=(0.006004518 -0.384771 0) quadrant=all radius=0.02674212
          length=0.1200904
      WrapCylinder KnExt_at_fem_r: xyz_body_rotation=(-0.0623366 0.0507601 0)
          translation=(0.004309179 -0.3779502 0.002511222) quadrant=all radius=0.02675659 length=0.1199998
      WrapCylinder AB_at_femshaft_r: xyz_body_rotation=(1.66157 0.186644 0)
          translation=(0.01758531 -0.1056666 0.02805911) quadrant=all radius=0.01973297 length=0.06657385
      WrapCylinder AL_at_femshaft_r: xyz_body_rotation=(1.77711 0.136489 0)
          translation=(0.03690701 -0.2176387 0.0181501) quadrant=all radius=0.02399743 length=0.09561578
      WrapCylinder AMprox_at_femshaft_r: xyz_body_rotation=(1.61126 0.18656 0)
          translation=(0.006224272 -0.06840928 0.03050656) quadrant=all radius=0.02525004 length=0.06644179
      WrapCylinder AMmid_at_femshaft_r: xyz_body_rotation=(1.61139 0.13656 0)
          translation=(0.0276358 -0.1508218 0.02471964) quadrant=all radius=0.02564886 length=0.1133369
      WrapCylinder AMdist_at_femshaft_r: xyz_body_rotation=(1.71188 0.186636 0)
          translation=(0.03795636 -0.2446918 0.01124598) quadrant=all radius=0.02604294 length=0.1908684
      WrapCylinder AMisch_at_condyles_r: xyz_body_rotation=(1.71115 -0.463363 0)
          translation=(-0.02720179 -0.353643 -0.003788094) quadrant=all radius=0.04701062 length=0.2402007
      WrapCylinder PECT_at_femshaft_r: xyz_body_rotation=(1.81295 0.276344 0)
          translation=(0.007308375 -0.07930309 0.03655611) quadrant=all radius=0.01778831 length=0.04879535
    Body tibia_r: mass=3.297218 mass_center=(0 -0.1748977 0) inertia=(0.03967694 0.004664698 0.03967694 0 0 0)
        meshes=(tibia_r.vtp r_fibula.vtp)
      WrapCylinder GasLat_at_shank_r: xyz_body_rotation=(2.96723 -0.279725 -1.47812)
          translation=(-0.007504559 -0.06932205 -0.003346628) quadrant=-y radius=0.05371473 length=0.1012059
      WrapCylinder GasMed_at_shank_r: xyz_body_rotation=(2.96723 0.0279725 -1.47812)
          translation=(-0.007504559 -0.06932205 -0.003346628) quadrant=-y radius=0.05371786 length=0.101189
      WrapCylinder GR_at_condyles_r: xyz_body_rotation=(0 -0.4 0) translation=(-0.003042389 -0.01873569 0) quadrant=all
          radius=0.03511645 length=0.101413
      WrapCylinder SM_at_condyles_r: xyz_body_rotation=(0 -0.1 0) translation=(-0.00101413 -0.01873569 0) quadrant=all
          radius=0.03433609 length=0.101413
      WrapCylinder ST_at_condyles_r: xyz_body_rotation=(0 -0.2 0) translation=(-0.002028259 -0.01920408 0) quadrant=all
          radius=0.04145692 length=0.101413
      WrapCylinder BF_at_gastroc_r: translation=(-0.05881952 -0.05620707 0) quadrant=y radius=0.02926371
          length=0.1521194
    Body patella_r: mass=0.07666087 mass_center=(0.001689239 0.0247755 0)
        inertia=(2.247943e-6 1.026848e-5 1.026848e-5 0 0 0) meshes=r_patella.vtp
    Body talus_r: mass=0.08893372 mass_center=(0 0 0) inertia=(0.0008448889 0.0008797678 0.0008797678 0 0 0)
        meshes=r_talus.vtp
    Body calcn_r: mass=1.111672 mass_center=(0.09597593 0.03414117 0)
        inertia=(0.001612534 0.003427714 0.003427714 0 0 0) meshes=r_foot.vtp
    Body toes_r: mass=0.1926304 mass_center=(0.03320767 0.006828234 -0.01991568)
        inertia=(0.000115181 0.0001804708 0.0001804708 0 0 0) meshes=r_bofoot.vtp
    Body femur_l: mass=8.272081 mass_center=(0 -0.1606741 0) inertia=(0.1142662 0.04366644 0.1142662 0 0 0)
        meshes=femur_l.vtp
      WrapCylinder Gastroc_at_condyles_l: translation=(0.00591367 -0.3875082 0) quadrant=all radius=0.02659845
          length=0.1182734
      WrapCylinder KnExt_at_fem_l: xyz_body_rotation=(0.0623366 -0.0507601 0)
          translation=(0.004243981 -0.3806389 -0.002473227) quadrant=all radius=0.02661139 length=0.1181906
      WrapCylinder AB_at_femshaft_l: xyz_body_rotation=(-1.66157 -0.186644 0)
          translation=(0.01731925 -0.1064183 -0.02763458) quadrant=all radius=0.01944021 length=0.06694844
      WrapCylinder AL_at_femshaft_l: xyz_body_rotation=(-1.77711 -0.136489 0)
          translation=(0.03634861 -0.2191869 -0.01787549) quadrant=all radius=0.02364431 length=0.09609769
      WrapCylinder AMprox_at_femshaft_l: xyz_body_rotation=(-1.61126 -0.18656 0)
          translation=(0.006130098 -0.06889594 -0.03004499) quadrant=all radius=0.02487431 length=0.06683021
      WrapCylinder AMmid_at_femshaft_l: xyz_body_rotation=(-1.61139 -0.13656 0)
          translation=(0.02721767 -0.1518947 -0.02434563) quadrant=all radius=0.02526436 length=0.1140619
      WrapCylinder AMdist_at_femshaft_l: xyz_body_rotation=(-1.71188 -0.186636 0)
          translation=(0.03738208 -0.2464325 -0.01107583) quadrant=all radius=0.02565859 length=0.19187
      WrapCylinder AMisch_at_condyles_l: xyz_body_rotation=(-1.71115 0.463363 0)
          translation=(-0.02679023 -0.3561588 0.003730781) quadrant=all radius=0.04637297 length=0.2402649
      WrapCylinder PECT_at_femshaft_l: xyz_body_rotation=(-1.81295 -0.276344 0)
          translation=(0.0071978 -0.07986724 -0.03600301) quadrant=all radius=0.01753517 length=0.04893453
    Body tibia_l: mass=3.297218 mass_center=(0 -0.1748249 0) inertia=(0.03943164 0.004236254 0.03943164 0 0 0)
        meshes=(tibia_l.vtp l_fibula.vtp)
      WrapCylinder GasLat_at_shank_l: xyz_body_rotation=(-2.96723 0.279725 -1.47812)
          translation=(-0.007151619 -0.06929319 0.003189235) quadrant=-y radius=0.05235162 length=0.09656125
      WrapCylinder GasMed_at_shank_l: xyz_body_rotation=(-2.96723 -0.0279725 -1.47812)
          translation=(-0.007151619 -0.06929319 0.003189235) quadrant=-y radius=0.05235323 length=0.09655453
      WrapCylinder GR_at_condyles_l: xyz_body_rotation=(0 0.4 0) translation=(-0.002899305 -0.01872789 0) quadrant=all
          radius=0.03425093 length=0.0966435
      WrapCylinder SM_at_condyles_l: xyz_body_rotation=(0 0.1 0) translation=(-0.000966435 -0.01872789 0) quadrant=all
          radius=0.0334898 length=0.0966435
      WrapCylinder ST_at_condyles_l: xyz_body_rotation=(0 0.2 0) translation=(-0.00193287 -0.01919609 0) quadrant=all
          radius=0.04043513 length=0.0966435
      WrapCylinder BF_at_gastroc_l: translation=(-0.05605323 -0.05618367 0) quadrant=all radius=0.02854244
          length=0.1449652
    Body patella_l: mass=0.07666087 mass_center=(0.001701256 0.02495175 0)
        inertia=(2.28004e-6 1.04151e-5 1.04151e-5 0 0 0) meshes=l_patella.vtp
    Body talus_l: mass=0.08893372 mass_center=(0 0 0) inertia=(0.0008048186 0.0008177283 0.0008177283 0 0 0)
        meshes=l_talus.vtp
    Body calcn_l: mass=1.111672 mass_center=(0.09228634 0.03278138 0)
        inertia=(0.001486642 0.003167091 0.003167091 0 0 0) meshes=l_foot.vtp
    Body toes_l: mass=0.1926304 mass_center=(0.03193108 0.006556276 0.01912247)
        inertia=(0.0001061887 0.0001667086 0.0001667086 0 0 0) meshes=l_bofoot.vtp
    Body torso: mass=23.85789 mass_center=(-0.03311943 0.3108152 0) inertia=(1.368116 0.8958471 1.368116 0 0 0)
        meshes=(hat_spine.vtp hat_jaw.vtp hat_skull.vtp hat_ribs_scap.vtp)
    Body humerus_r: mass=1.807578 mass_center=(0 -0.1821486 0) inertia=(0.01222781 0.002897812 0.01222781 0 0 0)
        meshes=humerus_rv.vtp
    Body ulna_r: mass=0.5402724 mass_center=(0 -0.1110494 0) inertia=(0.002338004 0.0006699993 0.002338004 0 0 0)
        meshes=ulna_rv.vtp
    Body radius_r: mass=0.5402724 mass_center=(0 -0.1110494 0) inertia=(0.002338004 0.0006699993 0.002338004 0 0 0)
        meshes=radius_rv.vtp
    Body hand_r: mass=0.4068718 mass_center=(0 -0.07259617 0) inertia=(0.0009860799 0.0007218054 0.0009860799 0 0 0)
        meshes=(pisiform_rvs.vtp lunate_rvs.vtp scaphoid_rvs.vtp triquetrum_rvs.vtp hamate_rvs.vtp capitate_rvs.vtp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)
    Body humerus_l: mass=1.807578 mass_center=(0 -0.1741317 0) inertia=(0.01157258 0.003443233 0.01157258 0 0 0)
        meshes=humerus_lv.vtp
    Body ulna_l: mass=0.5402724 mass_center=(0 -0.1168977 0) inertia=(0.002513309 0.0005875552 0.002513309 0 0 0)
        meshes=ulna_lv.vtp
    Body radius_l: mass=0.5402724 mass_center=(0 -0.1168977 0) inertia=(0.002513309 0.0005875552 0.002513309 0 0 0)
        meshes=radius_lv.vtp
    Body hand_l: mass=0.4068718 mass_center=(0 -0.06933567 0) inertia=(0.0009381636 0.0007357646 0.0009381636 0 0 0)
        meshes=(pisiform_lvs.vtp lunate_lvs.vtp scaphoid_lvs.vtp triquetrum_lvs.vtp hamate_lvs.vtp capitate_lvs.vtp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)
  JointSet:
    CustomJoint ground_pelvis: socket_parent_frame=ground_offset socket_child_frame=pelvis_offset
      Coordinate pelvis_tilt: default_value=0 range=(-1.570796 1.570796) clamped=true
      Coordinate pelvis_list: default_value=0 range=(-1.570796 1.570796) clamped=true
      Coordinate pelvis_rotation: default_value=0 range=(-1.570796 1.570796) clamped=true
      Coordinate pelvis_tx: default_value=0 range=(-5 5) clamped=true
      Coordinate pelvis_ty: default_value=0.94 range=(-1 2) clamped=true
      Coordinate pelvis_tz: default_value=0 range=(-3 3) clamped=true
      PhysicalOffsetFrame ground_offset: socket_parent=/ground translation=(0 0 0) [meters]
      PhysicalOffsetFrame pelvis_offset: socket_parent=/bodyset/pelvis translation=(0 0 0)
      SpatialTransform:
        TransformAxis rotation1: coordinates=pelvis_tilt axis=(0 0 1) LinearFunction(coefficients=1 0)
        TransformAxis rotation2: coordinates=pelvis_list axis=(1 0 0) LinearFunction(coefficients=1 0)
        TransformAxis rotation3: coordinates=pelvis_rotation axis=(0 1 0) LinearFunction(coefficients=1 0)
        TransformAxis translation1: coordinates=pelvis_tx axis=(1 0 0) LinearFunction(coefficients=1 0)
        TransformAxis translation2: coordinates=pelvis_ty axis=(0 1 0) LinearFunction(coefficients=1 0)
        TransformAxis translation3: coordinates=pelvis_tz axis=(0 0 1) LinearFunction(coefficients=1 0)
    CustomJoint hip_r: socket_parent_frame=pelvis_offset socket_child_frame=femur_r_offset
      Coordinate hip_flexion_r: default_value=0 range=(-0.5235988 2.094395) clamped=true
      Coordinate hip_adduction_r: default_value=0 range=(-0.8726646 0.5235988) clamped=true
      Coordinate hip_rotation_r: default_value=0 range=(-0.6981317 0.6981317) clamped=true
      PhysicalOffsetFrame pelvis_offset: socket_parent=/bodyset/pelvis translation=(-0.05958483 -0.07084986 0.07511855)
      PhysicalOffsetFrame femur_r_offset: socket_parent=/bodyset/femur_r translation=(0 0 0)
      SpatialTransform: axes_held_at_zero=(translation1 translation2 translation3)
        TransformAxis rotation1: coordinates=hip_flexion_r axis=(0 0 1) LinearFunction(coefficients=1 0)
        TransformAxis rotation2: coordinates=hip_adduction_r axis=(1 0 0) LinearFunction(coefficients=1 0)
        TransformAxis rotation3: coordinates=hip_rotation_r axis=(0 1 0) LinearFunction(coefficients=1 0)
    CustomJoint walker_knee_r: socket_parent_frame=femur_r_offset socket_child_frame=tibia_r_offset
      Coordinate knee_angle_r: default_value=0 range=(0 2.0944) clamped=true
      PhysicalOffsetFrame femur_r_offset: socket_parent=/bodyset/femur_r
          translation=(-0.009715311 -0.3828565 -0.003302485) orientation=(-1.64157 1.44618 1.5708) [radians]
      PhysicalOffsetFrame tibia_r_offset: socket_parent=/bodyset/tibia_r
          translation=(-0.008203842 -0.003311346 -0.001505719) orientation=(-1.64157 1.44618 1.5708)
      SpatialTransform: axes_held_at_zero=translation3
        TransformAxis rotation1: coordinates=knee_angle_r axis=(1 0 0) LinearFunction(coefficients=1 0)
        TransformAxis rotation2: coordinates=knee_angle_r axis=(0 0 1)
          SimmSpline: x=(0 0.174533 0.349066 0.523599 0.698132 0.872665 1.0472 1.22173 1.39626 1.5708 1.74533 1.91986 2.0944)
              y=(0 0.0126809 0.0226969 0.0296054 0.0332049 0.0335354 0.0308779 0.0257548 0.0189295 0.011407 0.00443314 -0.00050475 -0.0016782)
        TransformAxis rotation3: coordinates=knee_angle_r axis=(0 1 0)
          SimmSpline: x=(0 0.174533 0.349066 0.523599 0.698132 0.872665 1.0472 1.22173 1.39626 1.5708 1.74533 1.91986 2.0944)
              y=(0 0.059461 0.109399 0.150618 0.18392 0.210107 0.229983 0.24435 0.254012 0.25977 0.262428 0.262788 0.261654)
        TransformAxis translation1: coordinates=knee_angle_r axis=(0 1 0)
          MultiplierFunction: scale=0.9384658
            SimmSpline: x=(0 0.174533 0.349066 0.523599 0.698132 0.872665 1.0472 1.22173 1.39626 1.5708 1.74533 1.91986 2.0944)
                y=(0 0.000479 0.000835 0.001086 0.001251 0.001346 0.001391 0.001403 0.0014 0.0014 0.001421 0.001481 0.001599)
        TransformAxis translation2: coordinates=knee_angle_r axis=(0 0 1)
          MultiplierFunction: scale=1.200904
            SimmSpline: x=(0 0.174533 0.349066 0.523599 0.698132 0.872665 1.0472 1.22173 1.39626 1.5708 1.74533 1.91986 2.0944)
                y=(0 0.000988 0.001899 0.002734 0.003492 0.004173 0.004777 0.005305 0.005756 0.00613 0.006427 0.006648 0.006792)
    CustomJoint patellofemoral_r: socket_parent_frame=femur_r_offset socket_child_frame=patella_r_offset
      Coordinate knee_angle_r_beta: default_value=0 range=(-99999.9 99999.9) clamped=false
      PhysicalOffsetFrame femur_r_offset: socket_parent=/bodyset/femur_r
          translation=(-0.009715311 -0.3828565 -0.003302485)
      PhysicalOffsetFrame patella_r_offset: socket_parent=/bodyset/patella_r translation=(0 0 0)
      SpatialTransform: axes_held_at_zero=(rotation2 rotation3)
        TransformAxis rotation1: coordinates=knee_angle_r_beta axis=(0 0 1)
          SimmSpline: x=(0 0.174533 0.349066 0.523599 0.698132 0.872665 1.0472 1.22173 1.39626 1.5708 1.74533 1.91986 2.0944)
              y=(0.00113686 -0.00629212 -0.105582 -0.253683 -0.414245 -0.579047 -0.747244 -0.91799 -1.09044 -1.26379 -1.43763 -1.61186 -1.78634)
        TransformAxis translation1: coordinates=knee_angle_r_beta axis=(1 0 0)
          MultiplierFunction: scale=1.200904
            SimmSpline: x=(0 0.174533 0.349066 0.523599 0.698132 0.872665 1.0472 1.22173 1.39626 1.5708 1.74533 1.91986 2.0944)
                y=(0.0524 0.0488 0.0437 0.0371 0.0296 0.0216 0.0136 0.0057 -0.0019 -0.0088 -0.0148 -0.0196 -0.0227)
        TransformAxis translation2: coordinates=knee_angle_r_beta axis=(0 1 0)
          MultiplierFunction: scale=0.9384658
            SimmSpline: x=(0 0.174533 0.349066 0.523599 0.698132 0.872665 1.0472 1.22173 1.39626 1.5708 1.74533 1.91986 2.0944)
                y=(-0.0108 -0.019 -0.0263 -0.0322 -0.0367 -0.0395 -0.0408 -0.0404 -0.0384 -0.0349 -0.0301 -0.0245 -0.0187)
        TransformAxis translation3: axis=(0 0 1) MultiplierFunction(scale=1.200904, Constant(value=0.00275))
    PinJoint ankle_r: socket_parent_frame=tibia_r_offset socket_child_frame=talus_r_offset
      Coordinate ankle_angle_r: default_value=0 range=(-0.6981317 0.5235988) clamped=true
      PhysicalOffsetFrame tibia_r_offset: socket_parent=/bodyset/tibia_r translation=(-0.0101413 -0.3747138 0)
          orientation=(0.175895 -0.105208 0.0186622)
      PhysicalOffsetFrame talus_r_offset: socket_parent=/bodyset/talus_r translation=(0 0 0)
          orientation=(0.175895 -0.105208 0.0186622)
    CustomJoint hip_l: socket_parent_frame=pelvis_offset socket_child_frame=femur_l_offset
      Coordinate hip_flexion_l: default_value=0 range=(-0.5235988 2.094395) clamped=true
      Coordinate hip_adduction_l: default_value=0 range=(-0.8726646 0.5235988) clamped=true
      Coordinate hip_rotation_l: default_value=0 range=(-0.6981317 0.6981317) clamped=true
      PhysicalOffsetFrame pelvis_offset: socket_parent=/bodyset/pelvis
          translation=(-0.05958483 -0.07084986 -0.07511855)
      PhysicalOffsetFrame femur_l_offset: socket_parent=/bodyset/femur_l translation=(0 0 0)
      SpatialTransform: axes_held_at_zero=(translation1 translation2 translation3)
        TransformAxis rotation1: coordinates=hip_flexion_l axis=(0 0 1) LinearFunction(coefficients=1 0)
        TransformAxis rotation2: coordinates=hip_adduction_l axis=(1 0 0) LinearFunction(coefficients=-1 0)
        TransformAxis rotation3: coordinates=hip_rotation_l axis=(0 1 0) LinearFunction(coefficients=-1 0)
    CustomJoint walker_knee_l: socket_parent_frame=femur_l_offset socket_child_frame=tibia_l_offset
      Coordinate knee_angle_l: default_value=0 range=(0 2.0944) clamped=true
      PhysicalOffsetFrame femur_l_offset: socket_parent=/bodyset/femur_l
          translation=(-0.009568318 -0.3855801 0.003252518) orientation=(1.64157 -1.44618 1.5708)
      PhysicalOffsetFrame tibia_l_offset: socket_parent=/bodyset/tibia_l
          translation=(-0.007818015 -0.003309967 0.001434905) orientation=(1.64157 -1.44618 1.5708)
      SpatialTransform: axes_held_at_zero=translation3
        TransformAxis rotation1: coordinates=knee_angle_l axis=(-1 0 0) LinearFunction(coefficients=1 0)
        TransformAxis rotation2: coordinates=knee_angle_l axis=(0 0 1)
          SimmSpline: x=(0 0.174533 0.349066 0.523599 0.698132 0.872665 1.0472 1.22173 1.39626 1.5708 1.74533 1.91986 2.0944)
              y=(0 0.0126809 0.0226969 0.0296054 0.0332049 0.0335354 0.0308779 0.0257548 0.0189295 0.011407 0.00443314 -0.00050475 -0.0016782)
        TransformAxis rotation3: coordinates=knee_angle_l axis=(0 1 0)
          SimmSpline: x=(0 0.174533 0.349066 0.523599 0.698132 0.872665 1.0472 1.22173 1.39626 1.5708 1.74533 1.91986 2.0944)
              y=(0 -0.059461 -0.109399 -0.150618 -0.18392 -0.210107 -0.229983 -0.24435 -0.254012 -0.25977 -0.262428 -0.262788 -0.261654)
        TransformAxis translation1: coordinates=knee_angle_l axis=(0 1 0)
          MultiplierFunction: scale=0.945142
            SimmSpline: x=(0 0.174533 0.349066 0.523599 0.698132 0.872665 1.0472 1.22173 1.39626 1.5708 1.74533 1.91986 2.0944)
                y=(0 0.000479 0.000835 0.001086 0.001251 0.001346 0.001391 0.001403 0.0014 0.0014 0.001421 0.001481 0.001599)
        TransformAxis translation2: coordinates=knee_angle_l axis=(0 0 1)
          MultiplierFunction: scale=1.182734
            SimmSpline: x=(0 0.174533 0.349066 0.523599 0.698132 0.872665 1.0472 1.22173 1.39626 1.5708 1.74533 1.91986 2.0944)
                y=(0 -0.000988 -0.001899 -0.002734 -0.003492 -0.004173 -0.004777 -0.005305 -0.005756 -0.00613 -0.006427 -0.006648 -0.006792)
    CustomJoint patellofemoral_l: socket_parent_frame=femur_l_offset socket_child_frame=patella_l_offset
      Coordinate knee_angle_l_beta: default_value=0 range=(-99999.9 99999.9) clamped=false
      PhysicalOffsetFrame femur_l_offset: socket_parent=/bodyset/femur_l
          translation=(-0.009568318 -0.3855801 0.003252518)
      PhysicalOffsetFrame patella_l_offset: socket_parent=/bodyset/patella_l translation=(0 0 0)
      SpatialTransform: axes_held_at_zero=(rotation2 rotation3)
        TransformAxis rotation1: coordinates=knee_angle_l_beta axis=(0 0 1)
          SimmSpline: x=(0 0.174533 0.349066 0.523599 0.698132 0.872665 1.0472 1.22173 1.39626 1.5708 1.74533 1.91986 2.0944)
              y=(0.00113686 -0.00629212 -0.105582 -0.253683 -0.414245 -0.579047 -0.747244 -0.91799 -1.09044 -1.26379 -1.43763 -1.61186 -1.78634)
        TransformAxis translation1: coordinates=knee_angle_l_beta axis=(1 0 0)
          MultiplierFunction: scale=1.182734
            SimmSpline: x=(0 0.174533 0.349066 0.523599 0.698132 0.872665 1.0472 1.22173 1.39626 1.5708 1.74533 1.91986 2.0944)
                y=(0.0524 0.0488 0.0437 0.0371 0.0296 0.0216 0.0136 0.0057 -0.0019 -0.0088 -0.0148 -0.0196 -0.0227)
        TransformAxis translation2: coordinates=knee_angle_l_beta axis=(0 1 0)
          MultiplierFunction: scale=0.945142
            SimmSpline: x=(0 0.174533 0.349066 0.523599 0.698132 0.872665 1.0472 1.22173 1.39626 1.5708 1.74533 1.91986 2.0944)
                y=(-0.0108 -0.019 -0.0263 -0.0322 -0.0367 -0.0395 -0.0408 -0.0404 -0.0384 -0.0349 -0.0301 -0.0245 -0.0187)
        TransformAxis translation3: axis=(0 0 1) MultiplierFunction(scale=1.182734, Constant(value=-0.00275))
    PinJoint ankle_l: socket_parent_frame=tibia_l_offset socket_child_frame=talus_l_offset
      Coordinate ankle_angle_l: default_value=0 range=(-0.6981317 0.5235988) clamped=true
      PhysicalOffsetFrame tibia_l_offset: socket_parent=/bodyset/tibia_l translation=(-0.00966435 -0.3745578 0)
          orientation=(-0.175895 0.105208 0.0186622)
      PhysicalOffsetFrame talus_l_offset: socket_parent=/bodyset/talus_l translation=(0 0 0)
          orientation=(-0.175895 0.105208 0.0186622)
    CustomJoint back: socket_parent_frame=pelvis_offset socket_child_frame=torso_offset
      Coordinate lumbar_extension: default_value=0 range=(-1.570796 1.570796) clamped=true
      Coordinate lumbar_bending: default_value=0 range=(-1.570796 1.570796) clamped=true
      Coordinate lumbar_rotation: default_value=0 range=(-1.570796 1.570796) clamped=true
      PhysicalOffsetFrame pelvis_offset: socket_parent=/bodyset/pelvis translation=(-0.1066208 0.07356687 0)
      PhysicalOffsetFrame torso_offset: socket_parent=/bodyset/torso translation=(0 0 0)
      SpatialTransform: axes_held_at_zero=(translation1 translation2 translation3)
        TransformAxis rotation1: coordinates=lumbar_extension axis=(0 0 1) LinearFunction(coefficients=1 0)
        TransformAxis rotation2: coordinates=lumbar_bending axis=(1 0 0) LinearFunction(coefficients=1 0)
        TransformAxis rotation3: coordinates=lumbar_rotation axis=(0 1 0) LinearFunction(coefficients=1 0)
    CustomJoint acromial_r: socket_parent_frame=torso_offset socket_child_frame=humerus_r_offset
      Coordinate arm_flex_r: default_value=0 range=(-1.570796 1.570796) clamped=true
      Coordinate arm_add_r: default_value=0 range=(-2.094395 1.570796) clamped=true
      Coordinate arm_rot_r: default_value=0 range=(-1.570796 1.570796) clamped=true
      PhysicalOffsetFrame torso_offset: socket_parent=/bodyset/torso translation=(0.003483061 0.360837 0.2053148)
      PhysicalOffsetFrame humerus_r_offset: socket_parent=/bodyset/humerus_r translation=(0 0 0)
      SpatialTransform: axes_held_at_zero=(translation1 translation2 translation3)
        TransformAxis rotation1: coordinates=arm_flex_r axis=(0 0 1) LinearFunction(coefficients=1 0)
        TransformAxis rotation2: coordinates=arm_add_r axis=(1 0 0) LinearFunction(coefficients=1 0)
        TransformAxis rotation3: coordinates=arm_rot_r axis=(0 1 0) LinearFunction(coefficients=1 0)
    PinJoint elbow_r: socket_parent_frame=humerus_r_offset socket_child_frame=ulna_r_offset
      Coordinate elbow_flex_r: default_value=0 range=(0 2.618) clamped=true
      PhysicalOffsetFrame humerus_r_offset: socket_parent=/bodyset/humerus_r
          translation=(0.01168767 -0.3169824 -0.008531895) orientation=(-0.0228627 0.228018 0.0051689)
      PhysicalOffsetFrame ulna_r_offset: socket_parent=/bodyset/ulna_r translation=(0 0 0)
          orientation=(-0.0228627 0.228018 0.0051689)
    PinJoint radioulnar_r: socket_parent_frame=ulna_r_offset socket_child_frame=radius_r_offset
      Coordinate pro_sup_r: default_value=0 range=(0 1.570796) clamped=true
      PhysicalOffsetFrame ulna_r_offset: socket_parent=/bodyset/ulna_r translation=(-0.007427303 -0.0119844 0.02879833)
          orientation=(-1.56884 0.056428 1.53614)
      PhysicalOffsetFrame radius_r_offset: socket_parent=/bodyset/radius_r translation=(0 0 0)
          orientation=(-1.56884 0.056428 1.53614)
    UniversalJoint radius_hand_r: socket_parent_frame=radius_r_offset socket_child_frame=hand_r_offset
      Coordinate wrist_flex_r: default_value=0 range=(-1.22173 1.22173) clamped=true
      Coordinate wrist_dev_r: default_value=0 range=(-0.4363323 0.6108652) clamped=true
      PhysicalOffsetFrame radius_r_offset: socket_parent=/bodyset/radius_r
          translation=(-0.009712796 -0.2172993 0.01502685) orientation=(-1.5708 0 -1.5708)
      PhysicalOffsetFrame hand_r_offset: socket_parent=/bodyset/hand_r translation=(0 0 0)
          orientation=(-1.5708 0 -1.5708)
    CustomJoint acromial_l: socket_parent_frame=torso_offset socket_child_frame=humerus_l_offset
      Coordinate arm_flex_l: default_value=0 range=(-1.570796 1.570796) clamped=true
      Coordinate arm_add_l: default_value=0 range=(-2.094395 1.570796) clamped=true
      Coordinate arm_rot_l: default_value=0 range=(-1.570796 1.570796) clamped=true
      PhysicalOffsetFrame torso_offset: socket_parent=/bodyset/torso translation=(0.003483061 0.360837 -0.2053148)
      PhysicalOffsetFrame humerus_l_offset: socket_parent=/bodyset/humerus_l translation=(0 0 0)
      SpatialTransform: axes_held_at_zero=(translation1 translation2 translation3)
        TransformAxis rotation1: coordinates=arm_flex_l axis=(0 0 1) LinearFunction(coefficients=1 0)
        TransformAxis rotation2: coordinates=arm_add_l axis=(-1 0 0) LinearFunction(coefficients=1 0)
        TransformAxis rotation3: coordinates=arm_rot_l axis=(0 -1 0) LinearFunction(coefficients=1 0)
    PinJoint elbow_l: socket_parent_frame=humerus_l_offset socket_child_frame=ulna_l_offset
      Coordinate elbow_flex_l: default_value=0 range=(0 2.618) clamped=true
      PhysicalOffsetFrame humerus_l_offset: socket_parent=/bodyset/humerus_l
          translation=(0.0127402 -0.3030311 0.009300229) orientation=(0.0228627 -0.228018 0.0051689)
      PhysicalOffsetFrame ulna_l_offset: socket_parent=/bodyset/ulna_l translation=(0 0 0)
          orientation=(0.0228627 -0.228018 0.0051689)
    PinJoint radioulnar_l: socket_parent_frame=ulna_l_offset socket_child_frame=radius_l_offset
      Coordinate pro_sup_l: default_value=0 range=(0 1.570796) clamped=true
      PhysicalOffsetFrame ulna_l_offset: socket_parent=/bodyset/ulna_l
          translation=(-0.006955339 -0.01261554 -0.02696835) orientation=(1.56884 -0.056428 1.53614)
      PhysicalOffsetFrame radius_l_offset: socket_parent=/bodyset/radius_l translation=(0 0 0)
          orientation=(1.56884 -0.056428 1.53614)
    UniversalJoint radius_hand_l: socket_parent_frame=radius_l_offset socket_child_frame=hand_l_offset
      Coordinate wrist_flex_l: default_value=0 range=(-1.22173 1.22173) clamped=true
      Coordinate wrist_dev_l: default_value=0 range=(-0.4363323 0.6108652) clamped=true
      PhysicalOffsetFrame radius_l_offset: socket_parent=/bodyset/radius_l
          translation=(-0.009095602 -0.2287432 -0.01407197) orientation=(1.5708 0 1.5708)
      PhysicalOffsetFrame hand_l_offset: socket_parent=/bodyset/hand_l translation=(0 0 0)
          orientation=(1.5708 0 1.5708)
    WeldJoint subtalar_r: socket_parent_frame=talus_r_offset socket_child_frame=calcn_r_offset
      PhysicalOffsetFrame talus_r_offset: socket_parent=/bodyset/talus_r
          translation=(-0.0494591 -0.03929811 0.008031906) orientation=(-1.76819 0.906223 1.8196)
      PhysicalOffsetFrame calcn_r_offset: socket_parent=/bodyset/calcn_r translation=(0 0 0)
          orientation=(-1.76819 0.906223 1.8196)
    WeldJoint subtalar_l: socket_parent_frame=talus_l_offset socket_child_frame=calcn_l_offset
      PhysicalOffsetFrame talus_l_offset: socket_parent=/bodyset/talus_l
          translation=(-0.04713303 -0.03928175 -0.007654165) orientation=(1.76819 -0.906223 1.8196)
      PhysicalOffsetFrame calcn_l_offset: socket_parent=/bodyset/calcn_l translation=(0 0 0)
          orientation=(1.76819 -0.906223 1.8196)
    WeldJoint mtp_r: socket_parent_frame=calcn_r_offset socket_child_frame=toes_r_offset
      PhysicalOffsetFrame calcn_r_offset: socket_parent=/bodyset/calcn_r
          translation=(0.171605 -0.002276078 0.001229082) orientation=(-3.14159 0.619901 0)
      PhysicalOffsetFrame toes_r_offset: socket_parent=/bodyset/toes_r translation=(0 0 0)
          orientation=(-3.14159 0.619901 0)
    WeldJoint mtp_l: socket_parent_frame=calcn_l_offset socket_child_frame=toes_l_offset
      PhysicalOffsetFrame calcn_l_offset: socket_parent=/bodyset/calcn_l
          translation=(0.165008 -0.002185425 -0.00118013) orientation=(-3.14159 -0.619901 0)
      PhysicalOffsetFrame toes_l_offset: socket_parent=/bodyset/toes_l translation=(0 0 0)
          orientation=(-3.14159 -0.619901 0)
  ConstraintSet:
    CoordinateCouplerConstraint patellofemoral_knee_angle_r_con: independent_coordinate_names=knee_angle_r
        dependent_coordinate_name=knee_angle_r_beta scale_factor=1
        coupled_coordinates_function=LinearFunction(coefficients=1 0)
    CoordinateCouplerConstraint patellofemoral_knee_angle_l_con: independent_coordinate_names=knee_angle_l
        dependent_coordinate_name=knee_angle_l_beta scale_factor=1
        coupled_coordinates_function=LinearFunction(coefficients=1 0)
  ForceSet:
    CoordinateActuator pelvis_tx_actuator: coordinate=pelvis_tx optimal_force=1
    CoordinateActuator pelvis_ty_actuator: coordinate=pelvis_ty optimal_force=1
    CoordinateActuator pelvis_tz_actuator: coordinate=pelvis_tz optimal_force=1
    CoordinateActuator pelvis_tilt_actuator: coordinate=pelvis_tilt optimal_force=1
    CoordinateActuator pelvis_list_actuator: coordinate=pelvis_list optimal_force=1
    CoordinateActuator pelvis_rotation_actuator: coordinate=pelvis_rotation optimal_force=1
    CoordinateActuator hip_flexion_r_actuator: coordinate=hip_flexion_r optimal_force=300
    CoordinateActuator hip_adduction_r_actuator: coordinate=hip_adduction_r optimal_force=200
    CoordinateActuator hip_rotation_r_actuator: coordinate=hip_rotation_r optimal_force=100
    CoordinateActuator knee_angle_r_actuator: coordinate=knee_angle_r optimal_force=300
    CoordinateActuator ankle_angle_r_actuator: coordinate=ankle_angle_r optimal_force=300
    CoordinateActuator hip_flexion_l_actuator: coordinate=hip_flexion_l optimal_force=300
    CoordinateActuator hip_adduction_l_actuator: coordinate=hip_adduction_l optimal_force=200
    CoordinateActuator hip_rotation_l_actuator: coordinate=hip_rotation_l optimal_force=100
    CoordinateActuator knee_angle_l_actuator: coordinate=knee_angle_l optimal_force=300
    CoordinateActuator ankle_angle_l_actuator: coordinate=ankle_angle_l optimal_force=300
    CoordinateActuator lumbar_extension_actuator: coordinate=lumbar_extension optimal_force=300
    CoordinateActuator lumbar_bending_actuator: coordinate=lumbar_bending optimal_force=200
    CoordinateActuator lumbar_rotation_actuator: coordinate=lumbar_rotation optimal_force=100
    CoordinateActuator arm_flex_r_actuator: coordinate=arm_flex_r optimal_force=300
    CoordinateActuator arm_add_r_actuator: coordinate=arm_add_r optimal_force=200
    CoordinateActuator arm_rot_r_actuator: coordinate=arm_rot_r optimal_force=100
    CoordinateActuator elbow_flex_r_actuator: coordinate=elbow_flex_r optimal_force=300
    CoordinateActuator pro_sup_r_actuator: coordinate=pro_sup_r optimal_force=100
    CoordinateActuator wrist_flex_r_actuator: coordinate=wrist_flex_r optimal_force=100
    CoordinateActuator wrist_dev_r_actuator: coordinate=wrist_dev_r optimal_force=100
    CoordinateActuator arm_flex_l_actuator: coordinate=arm_flex_l optimal_force=300
    CoordinateActuator arm_add_l_actuator: coordinate=arm_add_l optimal_force=200
    CoordinateActuator arm_rot_l_actuator: coordinate=arm_rot_l optimal_force=100
    CoordinateActuator elbow_flex_l_actuator: coordinate=elbow_flex_l optimal_force=300
    CoordinateActuator pro_sup_l_actuator: coordinate=pro_sup_l optimal_force=100
    CoordinateActuator wrist_flex_l_actuator: coordinate=wrist_flex_l optimal_force=100
    CoordinateActuator wrist_dev_l_actuator: coordinate=wrist_dev_l optimal_force=100
  MarkerSet:
    Marker CV7: torso (-0.08081202 0.4187419 0.002736873)
    Marker SJN: torso (0.0509591 0.3691584 -0.001388093)
    Marker R_SAE: torso (-0.006777742 0.3678408 0.1814809)
    Marker L_SAE: torso (-0.01756672 0.3762512 -0.1812389)
    Marker R_SAA: torso (-0.05626511 0.3573072 0.1878704)
    Marker L_SAA: torso (-0.0584372 0.3617038 -0.1899659)
    Marker R_HLE: humerus_r (0.0293139 -0.2959866 0.01918968)
    Marker R_HME: humerus_r (-0.00689088 -0.305656 -0.04863795)
    Marker R_RSP: radius_r (0.002788501 -0.1977244 0.05152149)
    Marker R_UHE: radius_r (-0.03808123 -0.1807198 -0.01902757)
    Marker L_HLE: humerus_l (0.02528418 -0.2742221 -0.02431188)
    Marker L_HME: humerus_l (0.0001492073 -0.2948109 0.05365887)
    Marker L_RSP: radius_l (0.004696237 -0.2055246 -0.04943893)
    Marker L_UHE: radius_l (-0.02834795 -0.1968741 0.02067777)
    Marker R_IAS: pelvis (0.002186324 0.01582161 0.1291206)
    Marker L_IAS: pelvis (0.0236549 0.01688649 -0.1131501)
    Marker R_IPS: pelvis (-0.1717529 0.0101294 0.03996798)
    Marker L_IPS: pelvis (-0.1624421 0.01422071 -0.04926619)
    Marker R_FLE: femur_r (-0.003994422 -0.376784 0.07344186)
    Marker R_FME: femur_r (-0.01104408 -0.3935509 -0.04526311)
    Marker R_FAL: tibia_r (-0.01885544 -0.3768535 0.04303162)
    Marker R_TAM: tibia_r (0.007110154 -0.3578098 -0.04573367)
    Marker R_FCC: calcn_r (0.003022004 -0.01272562 -0.01479104)
    Marker R_FM1: calcn_r (0.1847595 0.02627111 -0.04825355)
    Marker R_FM5: calcn_r (0.1444909 0.007661662 0.06569138)
    Marker L_FLE: femur_l (-0.00525099 -0.3748287 -0.06697279)
    Marker L_FME: femur_l (0.00522248 -0.3884034 0.05005127)
    Marker L_FAL: tibia_l (-0.01818249 -0.3736687 -0.03808992)
    Marker L_TAM: tibia_l (0.0003122766 -0.3620704 0.04920649)
    Marker L_FCC: calcn_l (0.002179396 -0.007297825 0.01190888)
    Marker L_FM1: calcn_l (0.1787636 0.02754069 0.04355279)
    Marker L_FM5: calcn_l (0.1393761 0.007905169 -0.06529174)
    Marker SXS: torso (0.1178073 0.2148442 -0.002369473)
    Marker TV10: torso (-0.1145413 0.17527 -0.004089576)
    Marker L_UOA: ulna_l (-0.01139644 0.007481072 0.0007937168)
    Marker R_UOA: ulna_r (-0.01172359 0.006459269 -0.003721313)
    Marker R_FAX: tibia_r (-0.01708173 -0.06217944 0.08142538)
    Marker L_FAX: tibia_l (-0.02512339 -0.05172826 -0.07416538)
    Marker L_TTC: tibia_l (0.03367805 -0.07094795 -0.02362256)
    Marker R_TTC: tibia_r (0.03606871 -0.06527834 0.02378333)
    Marker R_FM2: calcn_r (0.1960383 0.03502745 0.01426045)
    Marker L_FM2: calcn_l (0.188655 0.0333385 -0.0182608)
    Marker R_HM2: hand_r (-0.0006813474 -0.07223344 0.04396786)
    Marker R_HM5: hand_r (0.0008692973 -0.05707855 -0.05599357)
    Marker L_HM2: hand_l (0.001899273 -0.06420447 -0.04423754)
    Marker L_HM5: hand_l (0.0004897017 -0.05223976 0.05713775)
    Marker R_FTC: femur_r (-0.005320563 -0.02805138 0.09904674)
    Marker L_FTC: femur_l (0.02194674 -0.02512575 -0.09836982)
    Marker R_FM1_ground: calcn_r (0.1896866 0.002431169 -0.05039785)
    Marker R_FM2_ground: calcn_r (0.203335 -0.0002781608 0.01108487)
    Marker R_FM5_ground: calcn_r (0.1494105 -0.01614201 0.06355034)
    Marker R_FCC_ground: calcn_r (0.008258577 -0.03806298 -0.01707003)
    Marker L_FM1_ground: calcn_l (0.182815 0.0007436004 0.04613661)
    Marker L_FM2_ground: calcn_l (0.1942097 -0.003401399 -0.01471827)
    Marker L_FM5_ground: calcn_l (0.1429609 -0.01580557 -0.06300551)
    Marker L_FCC_ground: calcn_l (0.005485248 -0.02916361 0.01401721)
  ComponentSet:
    ExternalLoads: datafile=2014001_C3_01_grf.mot
      ExternalForce grf1: applied_to_body=calcn_l force_expressed_in_body=ground point_expressed_in_body=ground
          force_identifier=ground_force_1_v point_identifier=ground_force_1_p torque_identifier=ground_force_1_m
          data_source_name=2014001_C3_01_grf
      ExternalForce grf2: applied_to_body=calcn_l force_expressed_in_body=ground point_expressed_in_body=ground
          force_identifier=ground_force_2_v point_identifier=ground_force_2_p torque_identifier=ground_force_2_m
          data_source_name=2014001_C3_01_grf
