# OpenSim document version 40000
Model:
  gravity: 0 -9.80665 0
  length_units: meters
  force_units: N
  credits:
    Rajagopal Model w/ torso, arms, updated knee, modified for movements involving high hip and knee flexion
  publications:
    Lai,A.K.M., Arnold, A.S., Wakeling, J.M. (2017) Why are antagonist muscles co-activated in my simulation? A musculoskeletal model for analysing human locomotor tasks. Annals of Biomedical Engineering
  Ground
  BodySet:
    Body pelvis: mass=12.50603 [kg] mass_center=(-0.07597 0 0) inertia=(0.07346073 0.07346073 0.0597428 0 0 0)
        meshes=(r_pelvis.vtp l_pelvis.vtp sacrum.vtp)
      WrapCylinder Gmax1_at_pelvis_r: xyz_body_rotation=(-0.6 0.45 0) translation=(-0.0827396 -0.08952301 0.0454781)
          quadrant=-x radius=0.03770079 length=0.1287573
      WrapCylinder Gmax2_at_pelvis_r: xyz_body_rotation=(-0.75 0.39 0) translation=(-0.08596323 -0.07505464 0.05069689)
          quadrant=all radius=0.03752484 length=0.08639878
      WrapCylinder Gmax3_at_pelvis_r: xyz_body_rotation=(-0.1 0 0) translation=(-0.08918685 -0.07957601 0.05069689)
          quadrant=all radius=0.03954738 length=0.07472909
      WrapCylinder Gmax1_at_pelvis_l: xyz_body_rotation=(0.6 -0.45 0) translation=(-0.0827396 -0.08952301 -0.0454781)
          quadrant=-x radius=0.03770079 length=0.1287573
      WrapCylinder Gmax2_at_pelvis_l: xyz_body_rotation=(0.75 -0.39 0)
          translation=(-0.08596323 -0.07505464 -0.05069689) quadrant=all radius=0.03752484 length=0.08639878
      WrapCylinder Gmax3_at_pelvis_l: xyz_body_rotation=(0.1 0 0) translation=(-0.08918685 -0.07957601 -0.05069689)
          quadrant=all radius=0.03954738 length=0.07472909
      WrapCylinder PS_at_brim_r: xyz_body_rotation=(-0.25 -0.27 0.1) translation=(-0.07951598 -0.05425637 0.04890759)
          quadrant=-y radius=0.04876046 length=0.07831504
      WrapCylinder PS_at_brim_l: xyz_body_rotation=(0.25 0.27 0.1) translation=(-0.07951598 -0.05425637 -0.04890759)
          quadrant=-y radius=0.04876046 length=0.07831504
      WrapCylinder IL_at_brim_r: xyz_body_rotation=(-0.32 -0.24 0.9) translation=(-0.07629236 -0.05877773 0.05636302)
          quadrant=-y radius=0.0537048 length=0.07836559
      WrapCylinder IL_at_brim_l: xyz_body_rotation=(0.32 0.24 0.9) translation=(-0.07629236 -0.05877773 -0.05636302)
          quadrant=-y radius=0.0537048 length=0.07836559
    Body femur_r: mass=9.877185 mass_center=(0 -0.1870234 0) inertia=(0.1865019 0.07393217 0.1865019 0 0 0)
        meshes=femur_r.vtp
      WrapCylinder GasLat_at_condyles_r: translation=(0.007041915 -0.4510563 0) quadrant=all radius=0.03261076
          length=0.1408383
      WrapCylinder GasMed_at_condyles_r: translation=(0.007041915 -0.4510563 0) quadrant=all radius=0.0313565
          length=0.1408383
      WrapCylinder KnExt_at_fem_r: xyz_body_rotation=(-0.0623366 0.0507601 0)
          translation=(0.005053672 -0.4430605 0.002945084) quadrant=all radius=0.03137351 length=0.140732
      WrapCylinder KnExtVL_at_fem_r: xyz_body_rotation=(-0.0623366 0.0507601 0)
          translation=(0.002659421 -0.4430605 0.002945084) quadrant=all radius=0.03137351 length=0.140732
      WrapCylinder AB_at_femshaft_r: xyz_body_rotation=(1.66157 0.186644 0)
          translation=(0.02062351 -0.12387 0.03290687) quadrant=all radius=0.02314209 length=0.0780449
      WrapCylinder AL_at_femshaft_r: xyz_body_rotation=(1.77711 0.136489 0)
          translation=(0.04328341 -0.2551318 0.02128588) quadrant=all radius=0.02814323 length=0.1120922
      WrapCylinder AMprox_at_femshaft_r: xyz_body_rotation=(1.61126 0.18656 0)
          translation=(0.007299635 -0.0801943 0.03577715) quadrant=all radius=0.02961233 length=0.07788977
      WrapCylinder AMmid_at_femshaft_r: xyz_body_rotation=(1.61139 0.13656 0)
          translation=(0.03241041 -0.1768042 0.02899044) quadrant=all radius=0.03008011 length=0.1328635
      WrapCylinder AMdist_at_femshaft_r: xyz_body_rotation=(1.71188 0.186636 0)
          translation=(0.04451405 -0.2868454 0.01318894) quadrant=all radius=0.03054215 length=0.2237577
      WrapCylinder AMisch_at_condyles_r: xyz_body_rotation=(1.71115 -0.463363 0)
          translation=(-0.03190142 -0.4145659 -0.004442561) quadrant=all radius=0.05513098 length=0.2816177
      WrapCylinder PECT_at_femshaft_r: xyz_body_rotation=(1.81295 0.276344 0)
          translation=(0.008571038 -0.0929648 0.04287188) quadrant=all radius=0.02086123 length=0.05720612
    Body tibia_r: mass=3.937005 mass_center=(0 -0.1857627 0) inertia=(0.05287291 0.005139469 0.05287291 0 0 0)
        meshes=(tibia_r.vtp r_fibula.vtp)
      WrapCylinder GasLat_at_shank_r: xyz_body_rotation=(2.96723 -0.279725 -1.47812)
          translation=(-0.007208806 -0.07362851 -0.003214738) quadrant=-y radius=0.0541359 length=0.09747477
      WrapCylinder GasMed_at_shank_r: xyz_body_rotation=(2.96723 0.0279725 -1.47812)
          translation=(-0.007208806 -0.07362851 -0.003214738) quadrant=-y radius=0.05807153 length=0.09747955
      WrapCylinder GR_at_condyles_r: xyz_body_rotation=(0 -0.4 0) translation=(-0.002922489 -0.0198996 0) quadrant=all
          radius=0.03544457 length=0.0974163
      WrapCylinder SM_at_condyles_r: xyz_body_rotation=(0 -0.1 0) translation=(-0.000974163 -0.0198996 0) quadrant=all
          radius=0.03396771 length=0.0974163
      WrapCylinder ST_at_condyles_r: xyz_body_rotation=(0 -0.2 0) translation=(-0.001948326 -0.02039709 0) quadrant=all
          radius=0.04184429 length=0.0974163
      WrapCylinder BF140_at_gastroc_r: translation=(-0.03799236 -0.05969879 0) quadrant=y radius=0.02855257
          length=0.1461245
    Body patella_r: mass=0.09153604 mass_center=(0.001980247 0.02904363 0)
        inertia=(3.688592e-6 1.684928e-5 1.684928e-5 0 0 0) meshes=r_patella.vtp
    Body talus_r: mass=0.1061903 mass_center=(0 0 0) inertia=(0.001029273 0.001018506 0.001018506 0 0 0)
        meshes=r_talus.vtp
    Body calcn_r: mass=1.327379 mass_center=(0.103881 0.07401492 0) inertia=(0.00447061 0.005902274 0.005902274 0 0 0)
        meshes=r_foot.vtp
    Body toes_r: mass=0.2300082 mass_center=(0.03594283 0.01480298 -0.02133015)
        inertia=(0.0003193293 0.0003315538 0.0003315538 0 0 0) meshes=r_bofoot.vtp
    Body femur_l: mass=9.877185 mass_center=(0 -0.1808778 0) inertia=(0.1773939 0.07504826 0.1773939 0 0 0)
        meshes=femur_l.vtp
      WrapCylinder GasLat_at_condyles_l: translation=(0.007094868 -0.4362346 0) quadrant=all radius=0.03227849
          length=0.1418974
      WrapCylinder GasMed_at_condyles_l: translation=(0.007094868 -0.4362346 0) quadrant=all radius=0.03103701
          length=0.1418974
      WrapCylinder KnExt_at_fem_l: xyz_body_rotation=(0.0623366 -0.0507601 0)
          translation=(0.005091675 -0.4285016 -0.00296723) quadrant=all radius=0.03105705 length=0.1417771
      WrapCylinder KnExtVL_at_fem_l: xyz_body_rotation=(0.0623366 -0.0507601 0)
          translation=(0.00267942 -0.4285016 -0.00296723) quadrant=all radius=0.03105705 length=0.1417771
      WrapCylinder AB_at_femshaft_l: xyz_body_rotation=(-1.66157 -0.186644 0)
          translation=(0.0207786 -0.1197996 -0.03315432) quadrant=all radius=0.02330416 length=0.07569754
      WrapCylinder AL_at_femshaft_l: xyz_body_rotation=(-1.77711 -0.136489 0)
          translation=(0.04360889 -0.2467481 -0.02144594) quadrant=all radius=0.0283343 length=0.1088435
      WrapCylinder AMprox_at_femshaft_l: xyz_body_rotation=(-1.61126 -0.18656 0)
          translation=(0.007354526 -0.07755912 -0.03604619) quadrant=all radius=0.02982201 length=0.07551518
      WrapCylinder AMmid_at_femshaft_l: xyz_body_rotation=(-1.61139 -0.13656 0)
          translation=(0.03265413 -0.1709944 -0.02920844) quadrant=all radius=0.03029895 length=0.1286761
      WrapCylinder AMdist_at_femshaft_l: xyz_body_rotation=(-1.71188 -0.186636 0)
          translation=(0.04484879 -0.2774197 -0.01328812) quadrant=all radius=0.03075186 length=0.217186
      WrapCylinder AMisch_at_condyles_l: xyz_body_rotation=(-1.71115 0.463363 0)
          translation=(-0.03214131 -0.4009433 0.004475968) quadrant=all radius=0.05539323 length=0.2759431
      WrapCylinder PECT_at_femshaft_l: xyz_body_rotation=(-1.81295 -0.276344 0)
          translation=(0.00863549 -0.08990998 -0.04319427) quadrant=all radius=0.0209851 length=0.05578065
    Body tibia_l: mass=3.937005 mass_center=(0 -0.1886524 0) inertia=(0.05451709 0.005273543 0.05451709 0 0 0)
        meshes=(tibia_l.vtp l_fibula.vtp)
      WrapCylinder GasLat_at_shank_l: xyz_body_rotation=(-2.96723 0.279725 -1.47812)
          translation=(-0.007302229 -0.07477383 0.003256399) quadrant=-y radius=0.05490663 length=0.09874534
      WrapCylinder GasMed_at_shank_l: xyz_body_rotation=(-2.96723 -0.0279725 -1.47812)
          translation=(-0.007302229 -0.07477383 0.003256399) quadrant=-y radius=0.05889808 length=0.09875078
      WrapCylinder GR_at_condyles_l: xyz_body_rotation=(0 0.4 0) translation=(-0.002960363 -0.02020914 0) quadrant=all
          radius=0.03595041 length=0.09867877
      WrapCylinder SM_at_condyles_l: xyz_body_rotation=(0 0.1 0) translation=(-0.0009867877 -0.02020914 0) quadrant=all
          radius=0.03445247 length=0.09867877
      WrapCylinder ST_at_condyles_l: xyz_body_rotation=(0 0.2 0) translation=(-0.001973575 -0.02071437 0) quadrant=all
          radius=0.04244145 length=0.09867877
      WrapCylinder BF140_at_gastroc_l: translation=(-0.03848472 -0.06062743 0) quadrant=all radius=0.02896005
          length=0.1480182
    Body patella_l: mass=0.09153604 mass_center=(0.001915177 0.02808926 0)
        inertia=(3.450161e-6 1.576014e-5 1.576014e-5 0 0 0) meshes=l_pat.vtp
    Body talus_l: mass=0.1061903 mass_center=(0 0 0) inertia=(0.001058831 0.001046429 0.001046429 0 0 0)
        meshes=l_talus.vtp
    Body calcn_l: mass=1.327379 mass_center=(0.1041981 0.07233043 0) inertia=(0.00421443 0.005796602 0.005796602 0 0 0)
        meshes=l_foot.vtp
    Body toes_l: mass=0.2300082 mass_center=(0.03605253 0.01446609 0.02057616)
        inertia=(0.0003010307 0.0003234554 0.0003234554 0 0 0) meshes=l_bofoot.vtp
    Body torso: mass=28.48725 mass_center=(-0.03291825 0.2894338 0) inertia=(1.423038 0.940524 1.423038 0 0 0)
        meshes=(hat_spine.vtp hat_jaw.vtp hat_skull.vtp hat_ribs_scap.vtp)
  JointSet:
    CustomJoint ground_pelvis: socket_parent_frame=ground_offset socket_child_frame=pelvis_offset
      Coordinate pelvis_tilt: default_value=0 range=(-1.570796 1.570796) clamped=true
      Coordinate pelvis_list: default_value=0 range=(-1.570796 1.570796) clamped=true
      Coordinate pelvis_rotation: default_value=0 range=(-3.1416 3.1416) clamped=true
      Coordinate pelvis_tx: default_value=0 range=(-5 5) clamped=true
      Coordinate pelvis_ty: default_value=0.93 range=(-1 2) clamped=true
      Coordinate pelvis_tz: default_value=0 range=(-3 3) clamped=true
      PhysicalOffsetFrame ground_offset: socket_parent=/ground translation=(0 0 0) [meters]
      PhysicalOffsetFrame pelvis_offset: socket_parent=/bodyset/pelvis translation=(0 0 0)
      SpatialTransform:
        TransformAxis rotation1: coordinates=pelvis_tilt axis=(0 0 1) LinearFunction(coefficients=1 0)
        TransformAxis rotation2: coordinates=pelvis_list axis=(1 0 0) LinearFunction(coefficients=1 0)
        TransformAxis rotation3: coordinates=pelvis_rotation axis=(0 1 0) LinearFunction(coefficients=1 0)
        TransformAxis translation1: coordinates=pelvis_tx axis=(1 0 0) LinearFunction(coefficients=1 0)
        TransformAxis translation2: coordinates=pelvis_ty axis=(0 1 0) LinearFunction(coefficients=1 0)
        TransformAxis translation3: coordinates=pelvis_tz axis=(0 0 1) LinearFunction(coefficients=1 0)
    CustomJoint hip_r: socket_parent_frame=pelvis_offset socket_child_frame=femur_r_offset
      Coordinate hip_flexion_r: default_value=2.332052e-9 range=(-0.5235988 2.094395) clamped=true
      Coordinate hip_adduction_r: default_value=-1.199293e-9 range=(-0.8726646 0.5235988) clamped=true
      Coordinate hip_rotation_r: default_value=0 range=(-0.6981317 0.6981317) clamped=true
      PhysicalOffsetFrame pelvis_offset: socket_parent=/bodyset/pelvis translation=(-0.06047083 -0.07097637 0.05760062)
      PhysicalOffsetFrame femur_r_offset: socket_parent=/bodyset/femur_r translation=(0 0 0)
      SpatialTransform: axes_held_at_zero=(translation1 translation2 translation3)
        TransformAxis rotation1: coordinates=hip_flexion_r axis=(0 0 1) LinearFunction(coefficients=1 0)
        TransformAxis rotation2: coordinates=hip_adduction_r axis=(1 0 0) LinearFunction(coefficients=1 0)
        TransformAxis rotation3: coordinates=hip_rotation_r axis=(0 1 0) LinearFunction(coefficients=1 0)
    CustomJoint knee_r: socket_parent_frame=femur_r_offset socket_child_frame=tibia_r_offset
      Coordinate knee_angle_r: default_value=4.877666e-5 range=(0 2.443461) clamped=true
      Coordinate knee_rotation_r: default_value=0 range=(-0.7853982 0.5235988) clamped=false
      Coordinate knee_adduction_r: default_value=0 range=(-0.5235988 0.5235988) clamped=false
      PhysicalOffsetFrame femur_r_offset: socket_parent=/bodyset/femur_r
          translation=(-0.006337723 -0.4506163 -0.00246467) orientation=(-1.64157 1.44618 1.5708) [radians]
      PhysicalOffsetFrame tibia_r_offset: socket_parent=/bodyset/tibia_r
          translation=(-0.007880531 -0.003517055 -0.001446379) orientation=(-1.64157 1.44618 1.5708)
      SpatialTransform:
        TransformAxis rotation1: coordinates=knee_angle_r axis=(1 0 0) LinearFunction(coefficients=1 0)
        TransformAxis rotation2: coordinates=knee_rotation_r axis=(0 1 0) LinearFunction(coefficients=1 0)
        TransformAxis rotation3: coordinates=knee_adduction_r axis=(0 0 1) LinearFunction(coefficients=1 0)
        TransformAxis translation1: coordinates=knee_angle_r axis=(1 0 0)
          MultiplierFunction: scale=1.408383
            SimmSpline: x=(0 0.174533 0.349066 0.523599 0.698132 0.872665 1.0472 1.22173 1.39626 1.5708 1.74533 1.91986 2.0944)
                y=(0 5.3e-5 0.000188 0.000378 0.000597 0.000825 0.001045 0.001247 0.00142 0.001558 0.001661 0.001728 0.00176)
        TransformAxis translation2: coordinates=knee_angle_r axis=(0 1 0)
          MultiplierFunction: scale=1.100137
            SimmSpline: x=(0 0.174533 0.349066 0.523599 0.698132 0.872665 1.0472 1.22173 1.39626 1.5708 1.74533 1.91986 2.0944)
                y=(0 0.000301 0.000143 -0.000401 -0.001233 -0.002243 -0.003316 -0.004346 -0.005239 -0.005924 -0.006361 -0.006539 -0.00648)
        TransformAxis translation3: coordinates=knee_angle_r axis=(0 0 1)
          MultiplierFunction: scale=1.408383
            SimmSpline: x=(0 0.174533 0.349066 0.523599 0.698132 0.872665 1.0472 1.22173 1.39626 1.5708 1.74533 1.91986 2.0944)
                y=(0 0.001055 0.002061 0.00289 0.003447 0.003676 0.003559 0.00311 0.002373 0.001418 0.000329 -0.000805 -0.001898)
    CustomJoint patellofemoral_r: socket_parent_frame=femur_r_offset socket_child_frame=patella_r_offset
      Coordinate knee_angle_r_beta: default_value=4.877666e-5 range=(-99999.9 99999.9) clamped=false
      PhysicalOffsetFrame femur_r_offset: socket_parent=/bodyset/femur_r
          translation=(-0.01139382 -0.4488121 -0.003873053)
      PhysicalOffsetFrame patella_r_offset: socket_parent=/bodyset/patella_r translation=(0 0 0)
      SpatialTransform: axes_held_at_zero=(rotation2 rotation3)
        TransformAxis rotation1: coordinates=knee_angle_r_beta axis=(0 0 1)
          SimmSpline: x=(0 0.174533 0.349066 0.523599 0.698132 0.872665 1.0472 1.22173 1.39626 1.5708 1.74533 1.91986 2.0944)
              y=(0.00113686 -0.00629212 -0.105582 -0.253683 -0.414245 -0.579047 -0.747244 -0.91799 -1.09044 -1.26379 -1.43763 -1.61186 -1.78634)
        TransformAxis translation1: coordinates=knee_angle_r_beta axis=(1 0 0)
          MultiplierFunction: scale=1.408383
            SimmSpline: x=(0 0.174533 0.349066 0.523599 0.698132 0.872665 1.0472 1.22173 1.39626 1.5708 1.74533 1.91986 2.0944)
                y=(0.0524 0.0488 0.0437 0.0371 0.0296 0.0216 0.0136 0.0057 -0.0019 -0.0088 -0.0148 -0.0196 -0.0227)
        TransformAxis translation2: coordinates=knee_angle_r_beta axis=(0 1 0)
          MultiplierFunction: scale=1.100137
            SimmSpline: x=(0 0.174533 0.349066 0.523599 0.698132 0.872665 1.0472 1.22173 1.39626 1.5708 1.74533 1.91986 2.0944)
                y=(-0.0108 -0.019 -0.0263 -0.0322 -0.0367 -0.0395 -0.0408 -0.0404 -0.0384 -0.0349 -0.0301 -0.0245 -0.0187)
        TransformAxis translation3: axis=(0 0 1) MultiplierFunction(scale=1.408383, Constant(value=0.00275))
    PinJoint ankle_r: socket_parent_frame=tibia_r_offset socket_child_frame=talus_r_offset
      Coordinate ankle_angle_r: default_value=-1.182866e-9 range=(-0.6981317 0.5235988) clamped=true
      PhysicalOffsetFrame tibia_r_offset: socket_parent=/bodyset/tibia_r translation=(-0.00974163 -0.397992 0)
          orientation=(0.175895 -0.105208 0.0186622)
      PhysicalOffsetFrame talus_r_offset: socket_parent=/bodyset/talus_r translation=(0 0 0)
          orientation=(0.175895 -0.105208 0.0186622)
    PinJoint subtalar_r: socket_parent_frame=talus_r_offset socket_child_frame=calcn_r_offset
      Coordinate subtalar_angle_r: default_value=0 range=(-0.6108652 0.6108652) clamped=true locked=true
      PhysicalOffsetFrame talus_r_offset: socket_parent=/bodyset/talus_r
          translation=(-0.04750993 -0.04173941 0.007715371) orientation=(-1.76819 0.906223 1.8196)
      PhysicalOffsetFrame calcn_r_offset: socket_parent=/bodyset/calcn_r translation=(0 0 0)
          orientation=(-1.76819 0.906223 1.8196)
    PinJoint mtp_r: socket_parent_frame=calcn_r_offset socket_child_frame=toes_r_offset
      Coordinate mtp_angle_r: default_value=0 range=(-0.5235988 0.5235988) clamped=true locked=true
      PhysicalOffsetFrame calcn_r_offset: socket_parent=/bodyset/calcn_r
          translation=(0.1857393 -0.004934328 0.001316375) orientation=(-3.14159 0.619901 0)
      PhysicalOffsetFrame toes_r_offset: socket_parent=/bodyset/toes_r translation=(0 0 0)
          orientation=(-3.14159 0.619901 0)
    CustomJoint hip_l: socket_parent_frame=pelvis_offset socket_child_frame=femur_l_offset
      Coordinate hip_flexion_l: default_value=2.332052e-9 range=(-0.5235988 2.094395) clamped=true
      Coordinate hip_adduction_l: default_value=-1.199293e-9 range=(-0.8726646 0.5235988) clamped=true
      Coordinate hip_rotation_l: default_value=0 range=(-0.6981317 0.6981317) clamped=true
      PhysicalOffsetFrame pelvis_offset: socket_parent=/bodyset/pelvis
          translation=(-0.06047083 -0.07097637 -0.05760062)
      PhysicalOffsetFrame femur_l_offset: socket_parent=/bodyset/femur_l translation=(0 0 0)
      SpatialTransform: axes_held_at_zero=(translation1 translation2 translation3)
        TransformAxis rotation1: coordinates=hip_flexion_l axis=(0 0 1) LinearFunction(coefficients=1 0)
        TransformAxis rotation2: coordinates=hip_adduction_l axis=(1 0 0) LinearFunction(coefficients=-1 0)
        TransformAxis rotation3: coordinates=hip_rotation_l axis=(0 1 0) LinearFunction(coefficients=-1 0)
    CustomJoint knee_l: socket_parent_frame=femur_l_offset socket_child_frame=tibia_l_offset
      Coordinate knee_angle_l: default_value=4.877992e-5 range=(0 2.443461) clamped=true
      Coordinate knee_rotation_l: default_value=0 range=(-0.7853982 0.5235988) clamped=false
      Coordinate knee_adduction_l: default_value=0 range=(-0.5235988 0.5235988) clamped=false
      PhysicalOffsetFrame femur_l_offset: socket_parent=/bodyset/femur_l
          translation=(-0.006385381 -0.4358091 0.002483204) orientation=(1.64157 -1.44618 1.5708)
      PhysicalOffsetFrame tibia_l_offset: socket_parent=/bodyset/tibia_l
          translation=(-0.007982659 -0.003571764 0.001465123) orientation=(1.64157 -1.44618 1.5708)
      SpatialTransform:
        TransformAxis rotation1: coordinates=knee_angle_l axis=(-1 0 0) LinearFunction(coefficients=1 0)
        TransformAxis rotation2: coordinates=knee_rotation_l axis=(0 -1 0) LinearFunction(coefficients=1 0)
        TransformAxis rotation3: coordinates=knee_adduction_l axis=(0 0 1) LinearFunction(coefficients=1 0)
        TransformAxis translation1: coordinates=knee_angle_l axis=(1 0 0)
          MultiplierFunction: scale=1.418974
            SimmSpline: x=(0 0.174533 0.349066 0.523599 0.698132 0.872665 1.0472 1.22173 1.39626 1.5708 1.74533 1.91986 2.0944)
                y=(0 5.3e-5 0.000188 0.000378 0.000597 0.000825 0.001045 0.001247 0.00142 0.001558 0.001661 0.001728 0.00176)
        TransformAxis translation2: coordinates=knee_angle_l axis=(0 1 0)
          MultiplierFunction: scale=1.063987
            SimmSpline: x=(0 0.174533 0.349066 0.523599 0.698132 0.872665 1.0472 1.22173 1.39626 1.5708 1.74533 1.91986 2.0944)
                y=(0 0.000301 0.000143 -0.000401 -0.001233 -0.002243 -0.003316 -0.004346 -0.005239 -0.005924 -0.006361 -0.006539 -0.00648)
        TransformAxis translation3: coordinates=knee_angle_l axis=(0 0 1)
          MultiplierFunction: scale=1.418974
            SimmSpline: x=(0 0.174533 0.349066 0.523599 0.698132 0.872665 1.0472 1.22173 1.39626 1.5708 1.74533 1.91986 2.0944)
                y=(0 -0.001055 -0.002061 -0.00289 -0.003447 -0.003676 -0.003559 -0.00311 -0.002373 -0.001418 -0.000329 0.000805 0.001898)
    CustomJoint patellofemoral_l: socket_parent_frame=femur_l_offset socket_child_frame=patella_l_offset
      Coordinate knee_angle_l_beta: default_value=4.877992e-5 range=(-99999.9 99999.9) clamped=false
      PhysicalOffsetFrame femur_l_offset: socket_parent=/bodyset/femur_l
          translation=(-0.0114795 -0.4340641 0.003902178)
      PhysicalOffsetFrame patella_l_offset: socket_parent=/bodyset/patella_l translation=(0 0 0)
      SpatialTransform: axes_held_at_zero=(rotation2 rotation3)
        TransformAxis rotation1: coordinates=knee_angle_l_beta axis=(0 0 1)
          SimmSpline: x=(0 0.174533 0.349066 0.523599 0.698132 0.872665 1.0472 1.22173 1.39626 1.5708 1.74533 1.91986 2.0944)
              y=(0.00113686 -0.00629212 -0.105582 -0.253683 -0.414245 -0.579047 -0.747244 -0.91799 -1.09044 -1.26379 -1.43763 -1.61186 -1.78634)
        TransformAxis translation1: coordinates=knee_angle_l_beta axis=(1 0 0)
          MultiplierFunction: scale=1.418974
            SimmSpline: x=(0 0.174533 0.349066 0.523599 0.698132 0.872665 1.0472 1.22173 1.39626 1.5708 1.74533 1.91986 2.0944)
                y=(0.0524 0.0488 0.0437 0.0371 0.0296 0.0216 0.0136 0.0057 -0.0019 -0.0088 -0.0148 -0.0196 -0.0227)
        TransformAxis translation2: coordinates=knee_angle_l_beta axis=(0 1 0)
          MultiplierFunction: scale=1.063987
            SimmSpline: x=(0 0.174533 0.349066 0.523599 0.698132 0.872665 1.0472 1.22173 1.39626 1.5708 1.74533 1.91986 2.0944)
                y=(-0.0108 -0.019 -0.0263 -0.0322 -0.0367 -0.0395 -0.0408 -0.0404 -0.0384 -0.0349 -0.0301 -0.0245 -0.0187)
        TransformAxis translation3: axis=(0 0 1) MultiplierFunction(scale=1.418974, Constant(value=-0.00275))
    PinJoint ankle_l: socket_parent_frame=tibia_l_offset socket_child_frame=talus_l_offset
      Coordinate ankle_angle_l: default_value=8.352658e-11 range=(-0.6981317 0.5235988) clamped=true
      PhysicalOffsetFrame tibia_l_offset: socket_parent=/bodyset/tibia_l translation=(-0.009867877 -0.4041829 0)
          orientation=(-0.175895 0.105208 0.0186622)
      PhysicalOffsetFrame talus_l_offset: socket_parent=/bodyset/talus_l translation=(0 0 0)
          orientation=(-0.175895 0.105208 0.0186622)
    PinJoint subtalar_l: socket_parent_frame=talus_l_offset socket_child_frame=calcn_l_offset
      Coordinate subtalar_angle_l: default_value=0 range=(-0.6108652 0.6108652) clamped=true locked=true
      PhysicalOffsetFrame talus_l_offset: socket_parent=/bodyset/talus_l
          translation=(-0.04812564 -0.04238868 -0.007815359) orientation=(1.76819 -0.906223 1.8196)
      PhysicalOffsetFrame calcn_l_offset: socket_parent=/bodyset/calcn_l translation=(0 0 0)
          orientation=(1.76819 -0.906223 1.8196)
    PinJoint mtp_l: socket_parent_frame=calcn_l_offset socket_child_frame=toes_l_offset
      Coordinate mtp_angle_l: default_value=0 range=(-0.5235988 0.5235988) clamped=true locked=true
      PhysicalOffsetFrame calcn_l_offset: socket_parent=/bodyset/calcn_l
          translation=(0.1863062 -0.004822029 -0.001269843) orientation=(-3.14159 -0.619901 0)
      PhysicalOffsetFrame toes_l_offset: socket_parent=/bodyset/toes_l translation=(0 0 0)
          orientation=(-3.14159 -0.619901 0)
    CustomJoint back: socket_parent_frame=pelvis_offset socket_child_frame=torso_offset
      Coordinate lumbar_extension: default_value=0 range=(-1.570796 1.570796) clamped=true
      Coordinate lumbar_bending: default_value=0 range=(-1.570796 1.570796) clamped=true
      Coordinate lumbar_rotation: default_value=0 range=(-1.570796 1.570796) clamped=true
      PhysicalOffsetFrame pelvis_offset: socket_parent=/bodyset/pelvis translation=(-0.1082062 0.07369823 0)
      PhysicalOffsetFrame torso_offset: socket_parent=/bodyset/torso translation=(0 0 0)
      SpatialTransform: axes_held_at_zero=(translation1 translation2 translation3)
        TransformAxis rotation1: coordinates=lumbar_extension axis=(0 0 1) LinearFunction(coefficients=1 0)
        TransformAxis rotation2: coordinates=lumbar_bending axis=(1 0 0) LinearFunction(coefficients=1 0)
        TransformAxis rotation3: coordinates=lumbar_rotation axis=(0 1 0) LinearFunction(coefficients=1 0)
  ConstraintSet:
    CoordinateCouplerConstraint patellofemoral_knee_angle_r_con: independent_coordinate_names=knee_angle_r
        dependent_coordinate_name=knee_angle_r_beta scale_factor=1
        coupled_coordinates_function=LinearFunction(coefficients=1 0)
    CoordinateCouplerConstraint patellofemoral_knee_angle_l_con: independent_coordinate_names=knee_angle_l
        dependent_coordinate_name=knee_angle_l_beta scale_factor=1
        coupled_coordinates_function=LinearFunction(coefficients=1 0)
  MarkerSet:
    Marker CLAV: torso (0.04038564 0.3422726 0.02207492) fixed=true
    Marker C5: torso (-0.07293048 0.4093951 -0.0004594774) fixed=true
    Marker RACR: torso (0.01020679 0.3766004 0.1732031) fixed=true
    Marker LACR: torso (0.01020679 0.3766004 -0.1732031) fixed=true
    Marker MTOR: torso (-0.00307237 0.3761735 0.005448856) fixed=true
    Marker LASIS: pelvis (0.01090476 0.007595195 -0.09394731) fixed=true
    Marker RASIS: pelvis (0.01090476 0.007595195 0.09394731) fixed=true
    Marker RPSIS: pelvis (-0.1691445 0.03025326 0.03857504) fixed=true
    Marker LPSIS: pelvis (-0.1691445 0.03025326 -0.03857504) fixed=true
    Marker MPEL: pelvis (-0.07908617 0.0188993 0) fixed=true
    Marker LGT: femur_l (-0.02854251 -0.02601576 -0.1085635) fixed=true
    Marker LHJC: femur_l (0 0 0) fixed=true
    Marker LTHI1: femur_l (-0.01822947 -0.172397 -0.1260709)
    Marker LTHI2: femur_l (0.06133175 -0.1894293 -0.1069954)
    Marker LTHI3: femur_l (0.03606407 -0.2750802 -0.1006742)
    Marker LTHI4: femur_l (-0.02763495 -0.2722347 -0.1087258)
    Marker LLKN: femur_l (0.009338748 -0.4292081 -0.07226563) fixed=true
    Marker LMKN: femur_l (0.01462848 -0.4211611 0.07022728) fixed=true
    Marker LKJC: femur_l (0.01191938 -0.4251692 -0.0009932816) fixed=true
    Marker LTIB1: tibia_l (-0.08480542 -0.03090643 -0.08718252)
    Marker LTIB2: tibia_l (-0.00628597 -0.04798675 -0.07728857)
    Marker LTIB3: tibia_l (-0.02812409 -0.132531 -0.09402763)
    Marker LTIB4: tibia_l (-0.08690421 -0.1310831 -0.09552223)
    Marker LLM: tibia_l (-0.0005226393 -0.4140379 -0.05590399) fixed=true
    Marker LMM: tibia_l (0.0006717301 -0.4049852 0.03418844) fixed=true
    Marker LAJC: tibia_l (9.867877e-5 -0.4095383 -0.01085466) fixed=true
    Marker fLAJC: tibia_l (9.867877e-5 -0.4501031 -0.01085466) fixed=true
    Marker LHEEL: calcn_l (-0.02098259 0.02307352 -0.001039787)
    Marker fLHEEL: calcn_l (-0.01992178 -0.01891936 0.000150341)
    Marker LTOE1: toes_l (-0.0002650017 0.06577513 0.03723508) fixed=true
    Marker LTOE3: toes_l (-0.02073542 0.05762325 -0.00776015) fixed=true
    Marker LTOE5: toes_l (-0.04111718 0.04965388 -0.05276491) fixed=true
    Marker fLTOE1: toes_l (-0.0002634971 -0.003589446 0.03723508) fixed=true
    Marker fLTOE3: toes_l (-0.02073542 -0.003589446 -0.00776015) fixed=true
    Marker fLTOE5: toes_l (-0.04111718 -0.003589446 -0.05276491) fixed=true
    Marker RGT: femur_r (-0.02832948 -0.02689968 0.1077533) fixed=true
    Marker RHJC: femur_r (0 0 0) fixed=true
    Marker RTHI1: femur_r (-0.01998335 -0.1766049 0.1200335)
    Marker RTHI2: femur_r (0.06887254 -0.1983973 0.1060198)
    Marker RTHI3: femur_r (0.04618453 -0.2783747 0.102063)
    Marker RTHI4: femur_r (-0.01654696 -0.2771089 0.1033012)
    Marker RLKN: femur_r (0.009269047 -0.443791 0.07172627) fixed=true
    Marker RMKN: femur_r (0.0145193 -0.4354707 -0.06970312) fixed=true
    Marker RKJC: femur_r (0.01183042 -0.4396149 0.000985868) fixed=true
    Marker RTIB1: tibia_r (-0.08403401 -0.01343644 0.07945618)
    Marker RTIB2: tibia_r (-0.002437494 -0.03170638 0.08474715)
    Marker RTIB3: tibia_r (-0.02544833 -0.1166769 0.09635524)
    Marker RTIB4: tibia_r (-0.08463533 -0.1168457 0.0882522)
    Marker RLM: tibia_r (-0.0005159528 -0.407696 0.05518877) fixed=true
    Marker RMM: tibia_r (0.0006631361 -0.398782 -0.03375105) fixed=true
    Marker RAJC: tibia_r (9.74163e-5 -0.4032653 0.01071579) fixed=true
    Marker fRAJC: tibia_r (9.74163e-5 -0.4432088 0.01071579) fixed=true
    Marker RHEEL: calcn_r (-0.02237536 0.02851899 -0.0009282926)
    Marker fRHEEL: calcn_r (-0.02091994 -0.01872379 -0.002089761)
    Marker RTOE1: toes_r (-0.0002641954 0.06730695 -0.03859952) fixed=true
    Marker RTOE3: toes_r (-0.02067232 0.05896522 0.008044513) fixed=true
    Marker RTOE5: toes_r (-0.04099208 0.05081026 0.05469842) fixed=true
    Marker fRTOE1: toes_r (-0.0002641954 -0.00367304 -0.03859952) fixed=true
    Marker fRTOE3: toes_r (-0.02067232 -0.00367304 0.008044513) fixed=true
    Marker fRTOE5: toes_r (-0.04099208 -0.00367304 0.05469842) fixed=true
